// SBML level 3 version 1

model Koenig_Galactose()
  // model units - substance: mole, time: s, volume: m3, area: m2, length: m, extent: mole

  // Compartments:
  compartment PP; PP has m3;
  compartment S001; S001 has m3;
  compartment D001; D001 has m3;
  compartment S002; S002 has m3;
  compartment D002; D002 has m3;
  compartment S003; S003 has m3;
  compartment D003; D003 has m3;
  compartment PV; PV has m3;
  compartment H01; H01 has m3;

  // Species:
  species $PP__gal in PP = 0;
  species S001__gal in S001 = 0;
  species D001__gal in D001 = 0;
  species S002__gal in S002 = 0;
  species D002__gal in D002 = 0;
  species S003__gal in S003 = 0;
  species D003__gal in D003 = 0;
  species PV__gal in PV = 0;
  species PP__galM in PP = 0;
  species S001__galM in S001 = 0;
  species D001__galM in D001 = 0;
  species S002__galM in S002 = 0;
  species D002__galM in D002 = 0;
  species S003__galM in S003 = 0;
  species D003__galM in D003 = 0;
  species PV__galM in PV = 0;
  species H01__gal in H01 = 0.00012;
  species H01__galM in H01 = 0;
  species H01__h2oM in H01 = 0;
  species H01__glc1p in H01 = 0.012;
  species H01__glc6p in H01 = 0.12;
  species H01__gal1p in H01 = 0.001;
  species H01__udpglc in H01 = 0.34;
  species H01__udpgal in H01 = 0.11;
  species H01__galtol in H01 = 0.001;
  species H01__atp in H01 = 2.7;
  species H01__adp in H01 = 1.2;
  species H01__utp in H01 = 0.27;
  species H01__udp in H01 = 0.09;
  species H01__phos in H01 = 5;
  species H01__ppi in H01 = 0.008;
  species H01__nadp in H01 = 0.1;
  species H01__nadph in H01 = 0.1;

  // Parameters:
  L = 0.0005 m;
  y_sin = 4.4e-6 m;
  y_dis = 8e-7 m;
  y_cell = 6.25e-6 m;
  flow_sin = 6e-5 m_per_s;
  Nc = 1 dimensionless;
  Nf = 3 dimensionless;
  Nb has dimensionless;
  x_cell has m;
  x_sin has m;
  A_sin has m2;
  A_dis has m2;
  A_sindis has m2;
  Vol_sin has m3;
  Vol_dis has m3;
  Vol_cell has m3;
  Vol_pp has m3;
  Vol_pv has m3;
  Dgal = 4e-10 m2_per_s;
  Dx_sin_gal has m3_per_s;
  Dx_dis_gal has m3_per_s;
  Dy_sindis_gal has m3_per_s;
  DgalM = 4e-10 m2_per_s;
  Dx_sin_galM has m3_per_s;
  Dx_dis_galM has m3_per_s;
  Dy_sindis_galM has m3_per_s;
  scale_f = 2e-16 dimensionless;
  scale has dimensionless;
  REF_P = 1 mM;
  deficiency = 0 dimensionless;
  H01__nadp_tot has mole_per_m3;
  H01__adp_tot has mole_per_m3;
  H01__udp_tot has mole_per_m3;
  H01__phos_tot has mole_per_m3;
  GALK_PA = 4 mole;
  GALK_keq = 50 dimensionless;
  GALK_k_gal1p = 1.5 mM;
  GALK_k_adp = 0.8 mM;
  GALK_ki_gal1p = 5.3 mM;
  GALK_kcat = 8.7 per_s;
  GALK_k_gal = 0.97 mM;
  GALK_k_atp = 0.034 mM;
  H01__GALK_P = 1 mM;
  H01__GALK_Vmax has mole_per_s;
  H01__GALK_dm has DIMENSIONLESS;
  IMP_f = 0.05 dimensionless;
  IMP_k_gal1p = 0.35 mM;
  H01__IMP_P = 1 mM;
  H01__IMP_Vmax has mole_per_s;
  ATPS_f = 20 dimensionless;
  ATPS_keq = 0.58 per_mM;
  ATPS_k_adp = 0.1 mM;
  ATPS_k_atp = 0.5 mM;
  ATPS_k_phos = 0.1 mM;
  H01__ATPS_P = 1 mM;
  H01__ATPS_Vmax has mole_per_s;
  ALDR_f = 1e11 dimensionless;
  ALDR_keq = 4 dimensionless;
  ALDR_k_gal = 40 mM;
  ALDR_k_galtol = 40 mM;
  ALDR_k_nadp = 0.1 mM;
  ALDR_k_nadph = 0.1 mM;
  H01__ALDR_P = 1 mM;
  H01__ALDR_Vmax has mole_per_s;
  NADPR_f = 1e-10 dimensionless;
  NADPR_keq = 1 dimensionless;
  NADPR_k_nadp = 0.015 mM;
  NADPR_ki_nadph = 0.01 mM;
  H01__NADPR_P = 1 mM;
  H01__NADPR_Vmax has mole_per_s;
  GALT_f = 0.0533 dimensionless;
  GALT_keq = 1 dimensionless;
  GALT_k_glc1p = 0.37 mM;
  GALT_k_udpgal = 0.5 mM;
  GALT_ki_utp = 0.13 mM;
  GALT_ki_udp = 0.35 mM;
  GALT_vm = 804 dimensionless;
  GALT_k_gal1p = 1.25 mM;
  GALT_k_udpglc = 0.43 mM;
  H01__GALT_P = 1 mM;
  H01__GALT_Vmax has mole_per_s;
  GALE_f = 0.5 dimensionless;
  GALE_PA = 0.0278 s;
  GALE_kcat = 36 per_s;
  GALE_keq = 0.33 dimensionless;
  GALE_k_udpglc = 0.069 mM;
  GALE_k_udpgal = 0.3 mM;
  H01__GALE_P = 1 mM;
  H01__GALE_Vmax has mole_per_s;
  UGP_f = 20 dimensionless;
  UGALP_f = 0.01 dimensionless;
  UGP_keq = 0.45 dimensionless;
  UGP_k_utp = 0.563 mM;
  UGP_k_glc1p = 0.172 mM;
  UGP_k_udpglc = 0.049 mM;
  UGP_k_ppi = 0.166 mM;
  UGP_k_gal1p = 5 mM;
  UGP_k_udpgal = 0.42 mM;
  UGP_ki_utp = 0.643 mM;
  UGP_ki_udpglc = 0.643 mM;
  H01__UGP_P = 1 mM;
  H01__UGP_Vmax has mole_per_s;
  H01__UGP_dm has DIMENSIONLESS;
  PPASE_f = 4e-6 dimensionless;
  PPASE_k_pp = 0.008 mM;
  PPASE_n = 3 dimensionless;
  H01__PPASE_P = 1 mM;
  H01__PPASE_Vmax has mole_per_s;
  NDKU_f = 10 dimensionless;
  NDKU_keq = 1 dimensionless;
  NDKU_k_atp = 1.33 mM;
  NDKU_k_adp = 0.042 mM;
  NDKU_k_utp = 27 mM;
  NDKU_k_udp = 0.19 mM;
  H01__NDKU_P = 1 mM;
  H01__NDKU_Vmax has mole_per_s;
  PGM1_f = 12 dimensionless;
  PGM1_keq = 10 dimensionless;
  PGM1_k_glc6p = 0.67 mM;
  PGM1_k_glc1p = 0.045 mM;
  H01__PGM1_P = 1 mM;
  H01__PGM1_Vmax has mole_per_s;
  GTF_f = 2e-5 dimensionless;
  GTF_k_udpgal = 0.1 mM;
  GTF_k_udpglc = 0.1 mM;
  H01__GTF_P = 1 mM;
  H01__GTF_Vmax has mole_per_s;
  GLUT2_f = 1000000 dimensionless;
  GLUT2_k_gal = 85.5 mM;
  H01__GLUT2_P = 1 mM;
  H01__GLUT2_Vmax has mole_per_s;
  H01__GLUT2_dm has DIMENSIONLESS;

  // Assignment rules:
  Nb := Nf*Nc;
  x_cell := L/Nc;
  x_sin := x_cell/Nf;
  A_sin := pi*y_sin^2;
  A_dis := pi*(y_sin + y_dis)^2 - A_sin;
  A_sindis := 2*pi*y_sin*x_sin;
  Vol_sin := A_sin*x_sin;
  Vol_dis := A_dis*x_sin;
  Vol_cell := pi*(y_sin + y_dis + y_cell)^2*x_cell - pi*(y_sin + y_dis)^2*x_cell;
  Vol_pp := 10*Vol_sin;
  Vol_pv := Vol_sin;
  PP := Vol_pp;
  S001 := Vol_sin;
  D001 := Vol_dis;
  S002 := Vol_sin;
  D002 := Vol_dis;
  S003 := Vol_sin;
  D003 := Vol_dis;
  PV := Vol_pv;
  Dx_sin_gal := Dgal/x_sin*A_sin;
  Dx_dis_gal := Dgal/x_sin*A_dis;
  Dy_sindis_gal := Dgal/y_dis*A_sindis;
  Dx_sin_galM := DgalM/x_sin*A_sin;
  Dx_dis_galM := DgalM/x_sin*A_dis;
  Dy_sindis_galM := DgalM/y_dis*A_sindis;
  H01 := Vol_cell;
  scale := scale_f/Nc;
  H01__nadp_tot := H01__nadp + H01__nadph;
  H01__adp_tot := H01__atp + H01__adp;
  H01__udp_tot := H01__utp + H01__udp + H01__udpglc + H01__udpgal;
  H01__phos_tot := 3*H01__atp + 2*H01__adp + 3*H01__utp + 2*H01__udp + H01__phos + 2*H01__ppi + H01__glc1p + H01__glc6p + H01__gal1p + 2*H01__udpglc + 2*H01__udpgal;
  H01__GALK_Vmax := scale*GALK_PA*GALK_kcat*H01__GALK_P/REF_P;
  H01__GALK_dm := (1 + (H01__gal + H01__galM)/GALK_k_gal)*(1 + H01__atp/GALK_k_atp) + (1 + H01__gal1p/GALK_k_gal1p)*(1 + H01__adp/GALK_k_adp) - 1;
  H01__IMP_Vmax := IMP_f*H01__GALK_Vmax*H01__IMP_P/REF_P;
  H01__ATPS_Vmax := ATPS_f*H01__GALK_Vmax*H01__ATPS_P/REF_P;
  H01__ALDR_Vmax := ALDR_f*H01__GALK_Vmax*H01__ALDR_P/REF_P;
  H01__NADPR_Vmax := NADPR_f*H01__ALDR_Vmax*H01__NADPR_P/REF_P;
  H01__GALT_Vmax := H01__GALT_P/REF_P*GALT_f*H01__GALK_Vmax*GALT_vm;
  H01__GALE_Vmax := GALE_f*H01__GALK_Vmax*GALE_PA*GALE_kcat*H01__GALE_P/REF_P;
  H01__UGP_Vmax := UGP_f*H01__GALK_Vmax*H01__UGP_P/REF_P;
  H01__UGP_dm := (1 + H01__utp/UGP_k_utp + H01__udpglc/UGP_ki_udpglc)*(1 + H01__glc1p/UGP_k_glc1p + H01__gal1p/UGP_k_gal1p) + (1 + H01__udpglc/UGP_k_udpglc + H01__udpgal/UGP_k_udpgal + H01__utp/UGP_ki_utp)*(1 + H01__ppi/UGP_k_ppi) - 1;
  H01__PPASE_Vmax := PPASE_f*H01__UGP_Vmax*H01__PPASE_P/REF_P;
  H01__NDKU_Vmax := NDKU_f*H01__UGP_Vmax*H01__NDKU_P/REF_P;
  H01__PGM1_Vmax := PGM1_f*H01__GALK_Vmax*H01__PGM1_P/REF_P;
  H01__GTF_Vmax := GTF_f*H01__GALK_Vmax*H01__GTF_P/REF_P;
  H01__GLUT2_Vmax := GLUT2_f*scale*H01__GLUT2_P/REF_P;
  H01__GLUT2_dm := 1 + (D001__gal + D001__galM)/GLUT2_k_gal + (H01__gal + H01__galM)/GLUT2_k_gal;

  // Reactions:
  FlowPPS001_gal: $PP__gal -> S001__gal; flow_sin*PP__gal*A_sin;
  FlowS001S002_gal: S001__gal -> S002__gal; flow_sin*S001__gal*A_sin;
  FlowS002S003_gal: S002__gal -> S003__gal; flow_sin*S002__gal*A_sin;
  FlowS003PV_gal: S003__gal -> PV__gal; flow_sin*S003__gal*A_sin;
  FlowPVNULL_gal: PV__gal -> ; flow_sin*PV__gal*A_sin;
  FlowPPS001_galM: PP__galM -> S001__galM; flow_sin*PP__galM*A_sin;
  FlowS001S002_galM: S001__galM -> S002__galM; flow_sin*S001__galM*A_sin;
  FlowS002S003_galM: S002__galM -> S003__galM; flow_sin*S002__galM*A_sin;
  FlowS003PV_galM: S003__galM -> PV__galM; flow_sin*S003__galM*A_sin;
  FlowPVNULL_galM: PV__galM -> ; flow_sin*PV__galM*A_sin;
  DiffPPS001_gal: $PP__gal -> S001__gal; Dx_sin_gal*(PP__gal - S001__gal);
  DiffS001S002_gal: S001__gal -> S002__gal; Dx_sin_gal*(S001__gal - S002__gal);
  DiffS002S003_gal: S002__gal -> S003__gal; Dx_sin_gal*(S002__gal - S003__gal);
  DiffS003PV_gal: S003__gal -> PV__gal; Dx_sin_gal*(S003__gal - PV__gal);
  DiffD001D002_gal: D001__gal -> D002__gal; Dx_dis_gal*(D001__gal - D002__gal);
  DiffD002D003_gal: D002__gal -> D003__gal; Dx_dis_gal*(D002__gal - D003__gal);
  DiffS001D001_gal: S001__gal -> D001__gal; Dy_sindis_gal*(S001__gal - D001__gal);
  DiffS002D002_gal: S002__gal -> D002__gal; Dy_sindis_gal*(S002__gal - D002__gal);
  DiffS003D003_gal: S003__gal -> D003__gal; Dy_sindis_gal*(S003__gal - D003__gal);
  DiffPPS001_galM: PP__galM -> S001__galM; Dx_sin_galM*(PP__galM - S001__galM);
  DiffS001S002_galM: S001__galM -> S002__galM; Dx_sin_galM*(S001__galM - S002__galM);
  DiffS002S003_galM: S002__galM -> S003__galM; Dx_sin_galM*(S002__galM - S003__galM);
  DiffS003PV_galM: S003__galM -> PV__galM; Dx_sin_galM*(S003__galM - PV__galM);
  DiffD001D002_galM: D001__galM -> D002__galM; Dx_dis_galM*(D001__galM - D002__galM);
  DiffD002D003_galM: D002__galM -> D003__galM; Dx_dis_galM*(D002__galM - D003__galM);
  DiffS001D001_galM: S001__galM -> D001__galM; Dy_sindis_galM*(S001__galM - D001__galM);
  DiffS002D002_galM: S002__galM -> D002__galM; Dy_sindis_galM*(S002__galM - D002__galM);
  DiffS003D003_galM: S003__galM -> D003__galM; Dy_sindis_galM*(S003__galM - D003__galM);
  H01__GALK: H01__gal + H01__atp -> H01__gal1p + H01__adp; H01__GALK_Vmax/(GALK_k_gal*GALK_k_atp)*1/(1 + H01__gal1p/GALK_ki_gal1p)*(H01__gal*H01__atp - H01__gal1p*H01__adp/GALK_keq)/H01__GALK_dm; H01__GALK is "Galactokinase H01";
  H01__GALKM: H01__galM + H01__atp => H01__gal1p + H01__adp; H01__GALK_Vmax/(GALK_k_gal*GALK_k_atp)*1/(1 + H01__gal1p/GALK_ki_gal1p)*H01__galM*H01__atp/H01__GALK_dm; H01__GALKM is "Galactokinase H01";
  H01__IMP: H01__gal1p => H01__gal + H01__phos; H01__IMP_Vmax/IMP_k_gal1p*H01__gal1p/(1 + H01__gal1p/IMP_k_gal1p); H01__IMP is "Inositol monophosphatase H01";
  H01__ATPS: H01__adp + H01__phos -> H01__atp; H01__ATPS_Vmax/(ATPS_k_adp*ATPS_k_phos)*(H01__adp*H01__phos - H01__atp/ATPS_keq)/((1 + H01__adp/ATPS_k_adp)*(1 + H01__phos/ATPS_k_phos) + H01__atp/ATPS_k_atp); H01__ATPS is "ATP synthase H01";
  H01__ALDR: H01__gal + H01__nadph -> H01__galtol + H01__nadp; H01__ALDR_Vmax/(ALDR_k_gal*ALDR_k_nadp)*(H01__gal*H01__nadph - H01__galtol*H01__nadp/ALDR_keq)/((1 + H01__gal/ALDR_k_gal)*(1 + H01__nadph/ALDR_k_nadph) + (1 + H01__galtol/ALDR_k_galtol)*(1 + H01__nadp/ALDR_k_nadp) - 1); H01__ALDR is "Aldose reductase H01";
  H01__NADPR: H01__nadp => H01__nadph; H01__NADPR_Vmax/NADPR_k_nadp*(H01__nadp - H01__nadph/NADPR_keq)/(1 + H01__nadp/NADPR_k_nadp + H01__nadph/NADPR_ki_nadph); H01__NADPR is "NADP Reductase H01";
  H01__GALT: H01__gal1p + H01__udpglc -> H01__glc1p + H01__udpgal; H01__GALT_Vmax/(GALT_k_gal1p*GALT_k_udpglc)*(H01__gal1p*H01__udpglc - H01__glc1p*H01__udpgal/GALT_keq)/((1 + H01__gal1p/GALT_k_gal1p)*(1 + H01__udpglc/GALT_k_udpglc + H01__udp/GALT_ki_udp + H01__utp/GALT_ki_utp) + (1 + H01__glc1p/GALT_k_glc1p)*(1 + H01__udpgal/GALT_k_udpgal) - 1); H01__GALT is "Galactose-1-phosphate uridyl transferase H01";  // modifiers: H01__udp, H01__utp
  H01__GALE: H01__udpglc -> H01__udpgal; H01__GALE_Vmax/GALE_k_udpglc*(H01__udpglc - H01__udpgal/GALE_keq)/(1 + H01__udpglc/GALE_k_udpglc + H01__udpgal/GALE_k_udpgal); H01__GALE is "UDP-glucose 4-epimerase H01";
  H01__UGP: H01__glc1p + H01__utp -> H01__udpglc + H01__ppi; H01__UGP_Vmax/(UGP_k_utp*UGP_k_glc1p)*(H01__glc1p*H01__utp - H01__udpglc*H01__ppi/UGP_keq)/H01__UGP_dm; H01__UGP is "UDP-glucose pyrophosphorylase H01";
  H01__UGALP: H01__gal1p + H01__utp -> H01__udpgal + H01__ppi; UGALP_f*H01__UGP_Vmax/(UGP_k_utp*UGP_k_gal1p)*(H01__gal1p*H01__utp - H01__udpgal*H01__ppi/UGP_keq)/H01__UGP_dm; H01__UGALP is "UDP-galactose pyrophosphorylase H01";
  H01__PPASE: H01__ppi => 2 H01__phos; H01__PPASE_Vmax*H01__ppi^PPASE_n/(H01__ppi^PPASE_n + PPASE_k_pp^PPASE_n); H01__PPASE is "Pyrophosphatase H01";
  H01__NDKU: H01__atp + H01__udp -> H01__adp + H01__utp; H01__NDKU_Vmax/NDKU_k_atp/NDKU_k_udp*(H01__atp*H01__udp - H01__adp*H01__utp/NDKU_keq)/((1 + H01__atp/NDKU_k_atp)*(1 + H01__udp/NDKU_k_udp) + (1 + H01__adp/NDKU_k_adp)*(1 + H01__utp/NDKU_k_utp) - 1); H01__NDKU is "ATP:UDP phosphotransferase H01";
  H01__PGM1: H01__glc1p -> H01__glc6p + H01__phos; H01__PGM1_Vmax/PGM1_k_glc1p*(H01__glc1p - H01__glc6p/PGM1_keq)/(1 + H01__glc1p/PGM1_k_glc1p + H01__glc6p/PGM1_k_glc6p); H01__PGM1 is "Phosphoglucomutase-1 H01";
  H01__GTFGAL: H01__udpgal => H01__udp; H01__GTF_Vmax*H01__udpgal/(H01__udpgal + GTF_k_udpgal); H01__GTFGAL is "Glycosyltransferase galactose H01";
  H01__GTFGLC: H01__udpglc => H01__udp; 0*H01__GTF_Vmax*H01__udpglc/(H01__udpglc + GTF_k_udpglc); H01__GTFGLC is "Glycosyltransferase glucose H01";
  D001__GLUT2_GAL: D001__gal -> H01__gal; H01__GLUT2_Vmax/(GLUT2_k_gal*Nf)*(D001__gal - H01__gal)/H01__GLUT2_dm; D001__GLUT2_GAL is "galactose transport";
  D001__GLUT2_GALM: D001__galM -> H01__galM; H01__GLUT2_Vmax/(GLUT2_k_gal*Nf)*(D001__galM - H01__galM)/H01__GLUT2_dm; D001__GLUT2_GALM is "galactose transport";
  D002__GLUT2_GAL: D002__gal -> H01__gal; H01__GLUT2_Vmax/(GLUT2_k_gal*Nf)*(D002__gal - H01__gal)/H01__GLUT2_dm; D002__GLUT2_GAL is "galactose transport";
  D002__GLUT2_GALM: D002__galM -> H01__galM; H01__GLUT2_Vmax/(GLUT2_k_gal*Nf)*(D002__galM - H01__galM)/H01__GLUT2_dm; D002__GLUT2_GALM is "galactose transport";
  D003__GLUT2_GAL: D003__gal -> H01__gal; H01__GLUT2_Vmax/(GLUT2_k_gal*Nf)*(D003__gal - H01__gal)/H01__GLUT2_dm; D003__GLUT2_GAL is "galactose transport";
  D003__GLUT2_GALM: D003__galM -> H01__galM; H01__GLUT2_Vmax/(GLUT2_k_gal*Nf)*(D003__galM - H01__galM)/H01__GLUT2_dm; D003__GLUT2_GALM is "galactose transport";

  // Events:
  EDEF_00: at ((time > 0) && (deficiency == 0)), t0=false: GALK_kcat = 8.7, GALK_k_gal = 0.97, GALK_k_atp = 0.034, GALT_vm = 804, GALT_k_gal1p = 1.25, GALT_k_udpglc = 0.95, GALE_kcat = 36, GALE_k_udpglc = 0.069;
  EDEF_01: at ((time > 0) && (deficiency == 1)), t0=false: GALK_kcat = 2, GALK_k_gal = 7.7, GALK_k_atp = 0.13;
  EDEF_02: at ((time > 0) && (deficiency == 2)), t0=false: GALK_kcat = 3.9, GALK_k_gal = 0.43, GALK_k_atp = 0.11;
  EDEF_03: at ((time > 0) && (deficiency == 3)), t0=false: GALK_kcat = 5.9, GALK_k_gal = 0.66, GALK_k_atp = 0.026;
  EDEF_04: at ((time > 0) && (deficiency == 4)), t0=false: GALK_kcat = 0.4, GALK_k_gal = 1.1, GALK_k_atp = 0.005;
  EDEF_05: at ((time > 0) && (deficiency == 5)), t0=false: GALK_kcat = 1.1, GALK_k_gal = 13, GALK_k_atp = 0.089;
  EDEF_06: at ((time > 0) && (deficiency == 6)), t0=false: GALK_kcat = 1.8, GALK_k_gal = 1.7, GALK_k_atp = 0.039;
  EDEF_07: at ((time > 0) && (deficiency == 7)), t0=false: GALK_kcat = 6.7, GALK_k_gal = 1.9, GALK_k_atp = 0.035;
  EDEF_08: at ((time > 0) && (deficiency == 8)), t0=false: GALK_kcat = 0.9, GALK_k_gal = 0.14, GALK_k_atp = 0.0039;
  EDEF_09: at ((time > 0) && (deficiency == 9)), t0=false: GALT_vm = 396, GALT_k_gal1p = 1.89, GALT_k_udpglc = 0.58;
  EDEF_10: at ((time > 0) && (deficiency == 10)), t0=false: GALT_vm = 253, GALT_k_gal1p = 2.34, GALT_k_udpglc = 0.69;
  EDEF_11: at ((time > 0) && (deficiency == 11)), t0=false: GALT_vm = 297, GALT_k_gal1p = 1.12, GALT_k_udpglc = 0.76;
  EDEF_12: at ((time > 0) && (deficiency == 12)), t0=false: GALT_vm = 45, GALT_k_gal1p = 1.98, GALT_k_udpglc = 1.23;
  EDEF_13: at ((time > 0) && (deficiency == 13)), t0=false: GALT_vm = 306, GALT_k_gal1p = 2.14, GALT_k_udpglc = 0.48;
  EDEF_14: at ((time > 0) && (deficiency == 14)), t0=false: GALT_vm = 385, GALT_k_gal1p = 2.68, GALT_k_udpglc = 0.95;
  EDEF_15: at ((time > 0) && (deficiency == 15)), t0=false: GALE_kcat = 32, GALE_k_udpglc = 0.082;
  EDEF_16: at ((time > 0) && (deficiency == 16)), t0=false: GALE_kcat = 0.046, GALE_k_udpglc = 0.093;
  EDEF_17: at ((time > 0) && (deficiency == 17)), t0=false: GALE_kcat = 1.1, GALE_k_udpglc = 0.16;
  EDEF_18: at ((time > 0) && (deficiency == 18)), t0=false: GALE_kcat = 5, GALE_k_udpglc = 0.14;
  EDEF_19: at ((time > 0) && (deficiency == 19)), t0=false: GALE_kcat = 11, GALE_k_udpglc = 0.097;
  EDEF_20: at ((time > 0) && (deficiency == 20)), t0=false: GALE_kcat = 5.1, GALE_k_udpglc = 0.066;
  EDEF_21: at ((time > 0) && (deficiency == 21)), t0=false: GALE_kcat = 5.8, GALE_k_udpglc = 0.035;
  EDEF_22: at ((time > 0) && (deficiency == 22)), t0=false: GALE_kcat = 30, GALE_k_udpglc = 0.078;
  EDEF_23: at ((time > 0) && (deficiency == 23)), t0=false: GALE_kcat = 15, GALE_k_udpglc = 0.099;

  // Unit definitions:
  unit s = second;
  unit m = metre;
  unit m2 = metre^2;
  unit m3 = metre^3;
  unit mole_per_s = mole / second;
  unit m_per_s = metre / second;
  unit m2_per_s = metre^2 / second;
  unit m3_per_s = metre^3 / second;
  unit mole_per_m3 = mole / metre^3;
  unit mM = mole / metre^3;
  unit per_mM = metre^3 / mole;
  unit per_s = 1 / second;
end
