// SBML level 3 version 1

model Galactose_v5_Nc1_Nf1_annotated()
  // Galactose
  // model units - substance: mole, time: s, volume: m3, area: m2, length: m, extent: mole

  // Compartments:
  compartment PP; PP has m3; PP is "[PP] periportal";
  compartment S001_Sinusoid_Space_1; S001_Sinusoid_Space_1 has m3; S001_Sinusoid_Space_1 is "[S001] Sinusoid Space 1";
  compartment D001; D001 has m3; D001 is "[D001] Disse Space 1";
  compartment PV; PV has m3; PV is "[PV] perivenious";
  compartment H01; H01 has m3; H01 is "[H01] Hepatocyte 1";

  // Species:
  species $PP__rbcM in PP = 0;
  species S001__rbcM in S001_Sinusoid_Space_1 = 0;
  species D001__rbcM in D001 = 0;
  species PV__rbcM in PV = 0;
  species $PP__suc in PP = 0;
  species S001__suc in S001_Sinusoid_Space_1 = 0;
  species D001__suc in D001 = 0;
  species PV__suc in PV = 0;
  species $PP__alb in PP = 0;
  species S001__alb in S001_Sinusoid_Space_1 = 0;
  species D001__alb in D001 = 0;
  species PV__alb in PV = 0;
  species $PP__gal in PP = 0.00012;
  species S001__gal in S001_Sinusoid_Space_1 = 0.00012;
  species D001__gal in D001 = 0.00012;
  species PV__gal in PV = 0.00012;
  species $PP__galM in PP = 0;
  species S001__galM in S001_Sinusoid_Space_1 = 0;
  species D001__galM in D001 = 0;
  species PV__galM in PV = 0;
  species $PP__h2oM in PP = 0;
  species S001__h2oM in S001_Sinusoid_Space_1 = 0;
  species D001__h2oM in D001 = 0;
  species PV__h2oM in PV = 0;
  species H01__gal in H01 = 0.00012; H01__gal is "D-galactose";  // CHEBI:4139; kegg.compound:C00124
  species H01__galM in H01 = 0; H01__galM is "D-galactose M";  // CHEBI:4139; kegg.compound:C00124
  species H01__h2oM in H01 = 0; H01__h2oM is "H2O M";
  species H01__glc1p in H01 = 0.012; H01__glc1p is "D-glucose-1-phosphate";  // CHEBI:58601; kegg.compound:C00103
  species H01__glc6p in H01 = 0.12; H01__glc6p is "D-glucose-6-phosphate";  // CHEBI:58225; kegg.compound:C00668
  species H01__gal1p in H01 = 0.001; H01__gal1p is "D-galactose-1-phosphate";  // CHEBI:58336; kegg.compound:C00446
  species H01__udpglc in H01 = 0.34; H01__udpglc is "UDP-D-glucose";  // CHEBI:58885; kegg.compound:C00029
  species H01__udpgal in H01 = 0.11; H01__udpgal is "UDP-D-galactose";  // CHEBI:66914; kegg.compound:C00052
  species H01__galtol in H01 = 0.001; H01__galtol is "D-galactitol";  // CHEBI:456216; kegg.compound:C01697
  species H01__atp in H01 = 2.7; H01__atp is "ATP";  // CHEBI:30616; kegg.compound:C00002
  species H01__adp in H01 = 1.2; H01__adp is "ADP";  // CHEBI:456216; kegg.compound:C00008
  species H01__utp in H01 = 0.27; H01__utp is "UTP";  // CHEBI:46398; kegg.compound:C00075
  species H01__udp in H01 = 0.09; H01__udp is "UDP";  // CHEBI:58223; kegg.compound:C00015
  species H01__phos in H01 = 5; H01__phos is "Phosphate";  // CHEBI:33019; kegg.compound:C00009
  species H01__ppi in H01 = 0.008; H01__ppi is "Pyrophosphate";  // CHEBI:33019; kegg.compound:C00013
  species H01__nadp in H01 = 0.1; H01__nadp is "NADP";  // CHEBI:58349; kegg.compound:C00006
  species H01__nadph in H01 = 0.1; H01__nadph is "NADPH";  // CHEBI:57783; kegg.compound:C00005

  // Parameters:
  L = 0.0005 m;
  y_sin = 4.4e-6 m;
  y_dis = 8e-7 m;
  y_cell = 6.25e-6 m;
  flow_sin = 6e-5 m_per_s;
  Nc = 1 dimensionless;
  Nf = 1 dimensionless;
  Nb has dimensionless;
  x_cell has m;
  x_sin has m;
  A_sin has m2;
  A_dis has m2;
  A_sindis has m2;
  Vol_sin has m3;
  Vol_dis has m3;
  Vol_cell has m3;
  Vol_pp has m3;
  Vol_pv has m3;
  DrbcM = 0 m2_per_s;
  Dx_sin_rbcM has m3_per_s;
  Dx_dis_rbcM has m3_per_s;
  Dy_sindis_rbcM has m3_per_s;
  Dsuc = 4e-10 m2_per_s;
  Dx_sin_suc has m3_per_s;
  Dx_dis_suc has m3_per_s;
  Dy_sindis_suc has m3_per_s;
  Dalb = 1e-10 m2_per_s;
  Dx_sin_alb has m3_per_s;
  Dx_dis_alb has m3_per_s;
  Dy_sindis_alb has m3_per_s;
  Dgal = 4e-10 m2_per_s;
  Dx_sin_gal has m3_per_s;
  Dx_dis_gal has m3_per_s;
  Dy_sindis_gal has m3_per_s;
  DgalM = 4e-10 m2_per_s;
  Dx_sin_galM has m3_per_s;
  Dx_dis_galM has m3_per_s;
  Dy_sindis_galM has m3_per_s;
  Dh2oM = 2e-9 m2_per_s;
  Dx_sin_h2oM has m3_per_s;
  Dx_dis_h2oM has m3_per_s;
  Dy_sindis_h2oM has m3_per_s;
  scale_f = 1e-14 dimensionless;
  scale has dimensionless;
  REF_P = 1 mM;
  deficiency = 0 dimensionless;
  H01__nadp_tot has mole_per_m3;
  H01__adp_tot has mole_per_m3;
  H01__udp_tot has mole_per_m3;
  H01__phos_tot has mole_per_m3;
  GALK_PA = 0.1 mole;
  GALK_keq = 50 dimensionless;
  GALK_k_gal1p = 1.5 mM;
  GALK_k_adp = 0.8 mM;
  GALK_ki_gal1p = 5.3 mM;
  GALK_kcat = 8.7 per_s;  // sabiork.kineticrecord:14785; isDescribedBy pubmed:12694189
  GALK_k_gal = 0.97 mM;  // sabiork.kineticrecord:14785; isDescribedBy pubmed:12694189; sabiork.kineticrecord:45367; isDescribedBy pubmed:15024738
  GALK_k_atp = 0.034 mM;  // sabiork.kineticrecord:14792; isDescribedBy pubmed:12694189
  H01__GALK_P = 1 mM;
  H01__GALK_Vmax has mole_per_s;
  H01__GALK_dm has DIMENSIONLESS;
  IMP_f = 0.05 dimensionless;
  IMP_k_gal1p = 0.35 mM;
  H01__IMP_P = 1 mM;
  H01__IMP_Vmax has mole_per_s;
  ATPS_f = 100 dimensionless;
  ATPS_keq = 0.58 per_mM;
  ATPS_k_adp = 0.1 mM;
  ATPS_k_atp = 0.5 mM;
  ATPS_k_phos = 0.1 mM;
  H01__ATPS_P = 1 mM;
  H01__ATPS_Vmax has mole_per_s;
  ALDR_f = 1000000 dimensionless;
  ALDR_keq = 4 dimensionless;
  ALDR_k_gal = 40 mM;  // sabiork.kineticrecord:22893; sabiork.kineticrecord:15695
  ALDR_k_galtol = 40 mM;
  ALDR_k_nadp = 0.1 mM;
  ALDR_k_nadph = 0.1 mM;
  H01__ALDR_P = 1 mM;
  H01__ALDR_Vmax has mole_per_s;
  NADPR_f = 1e-10 dimensionless;
  NADPR_keq = 1 dimensionless;
  NADPR_k_nadp = 0.015 mM;
  NADPR_ki_nadph = 0.01 mM;
  H01__NADPR_P = 1 mM;
  H01__NADPR_Vmax has mole_per_s;
  GALT_f = 0.01 dimensionless;
  GALT_keq = 1 dimensionless;
  GALT_k_glc1p = 0.37 mM;
  GALT_k_udpgal = 0.5 mM;
  GALT_ki_utp = 0.13 mM;
  GALT_ki_udp = 0.35 mM;
  GALT_vm = 804 dimensionless;
  GALT_k_gal1p = 1.25 mM;
  GALT_k_udpglc = 0.43 mM;
  H01__GALT_P = 1 mM;
  H01__GALT_Vmax has mole_per_s;
  GALE_f = 0.3 dimensionless;
  GALE_PA = 0.0278 s;
  GALE_kcat = 36 per_s;  // sabiork.kineticrecord:16222
  GALE_keq = 0.33 dimensionless;
  GALE_k_udpglc = 0.069 mM;
  GALE_k_udpgal = 0.3 mM;  // sabiork.kineticrecord:19823; sabiork.kineticrecord:46260; sabiork.kineticrecord:46263
  H01__GALE_P = 1 mM;
  H01__GALE_Vmax has mole_per_s;
  UGP_f = 2000 dimensionless;
  UGALP_f = 0.01 dimensionless;
  UGP_keq = 0.45 dimensionless;
  UGP_k_utp = 0.563 mM;
  UGP_k_glc1p = 0.172 mM;
  UGP_k_udpglc = 0.049 mM;
  UGP_k_ppi = 0.166 mM;
  UGP_k_gal1p = 5 mM;
  UGP_k_udpgal = 0.42 mM;
  UGP_ki_utp = 0.643 mM;
  UGP_ki_udpglc = 0.643 mM;
  H01__UGP_P = 1 mM;
  H01__UGP_Vmax has mole_per_s;
  H01__UGP_dm has DIMENSIONLESS;
  PPASE_f = 0.05 dimensionless;
  PPASE_k_ppi = 0.07 mM;
  PPASE_n = 4 dimensionless;
  H01__PPASE_P = 1 mM;
  H01__PPASE_Vmax has mole_per_s;
  NDKU_f = 2 dimensionless;
  NDKU_keq = 1 dimensionless;
  NDKU_k_atp = 1.33 mM;
  NDKU_k_adp = 0.042 mM;
  NDKU_k_utp = 27 mM;
  NDKU_k_udp = 0.19 mM;
  H01__NDKU_P = 1 mM;
  H01__NDKU_Vmax has mole_per_s;
  PGM1_f = 50 dimensionless;
  PGM1_keq = 10 dimensionless;
  PGM1_k_glc6p = 0.67 mM;
  PGM1_k_glc1p = 0.045 mM;
  H01__PGM1_P = 1 mM;
  H01__PGM1_Vmax has mole_per_s;
  GLY_f = 0.1 dimensionless;
  GLY_k_glc6p = 0.12 mM;
  GLY_k_p = 0.2 mM;
  H01__GLY_P = 1 mM;
  H01__GLY_Vmax has mole_per_s;
  GTF_f = 0.02 dimensionless;
  GTF_k_udpgal = 0.1 mM;
  GTF_k_udpglc = 0.1 mM;
  H01__GTF_P = 1 mM;
  H01__GTF_Vmax has mole_per_s;
  GLUT2_f = 1000000 dimensionless;
  GLUT2_k_gal = 85.5 mM;
  H01__GLUT2_P = 1 mM;
  H01__GLUT2_Vmax has mole_per_s;
  H01__GLUT2_dm has DIMENSIONLESS;
  H2OT_f = 10 mole_per_s;
  H2OT_k = 1 mM;
  H01__H2OT_Vmax has mole_per_s;
  H01__H2OTM has mole_per_m3;
  H01__GLUT2_GAL has mole_per_m3;
  H01__GLUT2_GALM has mole_per_m3;

  // Assignment rules:
  Nb := Nf*Nc;
  x_cell := L/Nc;
  x_sin := x_cell/Nf;
  A_sin := pi*y_sin^2;
  A_dis := pi*(y_sin + y_dis)^2 - A_sin;
  A_sindis := 2*pi*y_sin*x_sin;
  Vol_sin := A_sin*x_sin;
  Vol_dis := A_dis*x_sin;
  Vol_cell := pi*(y_sin + y_dis + y_cell)^2*x_cell - pi*(y_sin + y_dis)^2*x_cell;
  Vol_pp := Vol_sin;
  Vol_pv := Vol_sin;
  PP := Vol_pp;
  S001_Sinusoid_Space_1 := Vol_sin;
  D001 := Vol_dis;
  PV := Vol_pv;
  Dx_sin_rbcM := DrbcM/x_sin*A_sin;
  Dx_dis_rbcM := DrbcM/x_sin*A_dis;
  Dy_sindis_rbcM := DrbcM/y_dis*A_sindis;
  Dx_sin_suc := Dsuc/x_sin*A_sin;
  Dx_dis_suc := Dsuc/x_sin*A_dis;
  Dy_sindis_suc := Dsuc/y_dis*A_sindis;
  Dx_sin_alb := Dalb/x_sin*A_sin;
  Dx_dis_alb := Dalb/x_sin*A_dis;
  Dy_sindis_alb := Dalb/y_dis*A_sindis;
  Dx_sin_gal := Dgal/x_sin*A_sin;
  Dx_dis_gal := Dgal/x_sin*A_dis;
  Dy_sindis_gal := Dgal/y_dis*A_sindis;
  Dx_sin_galM := DgalM/x_sin*A_sin;
  Dx_dis_galM := DgalM/x_sin*A_dis;
  Dy_sindis_galM := DgalM/y_dis*A_sindis;
  Dx_sin_h2oM := Dh2oM/x_sin*A_sin;
  Dx_dis_h2oM := Dh2oM/x_sin*A_dis;
  Dy_sindis_h2oM := Dh2oM/y_dis*A_sindis;
  H01 := Vol_cell;
  scale := scale_f;
  H01__nadp_tot := H01__nadp + H01__nadph;
  H01__adp_tot := H01__atp + H01__adp;
  H01__udp_tot := H01__utp + H01__udp + H01__udpglc + H01__udpgal;
  H01__phos_tot := 3*H01__atp + 2*H01__adp + 3*H01__utp + 2*H01__udp + H01__phos + 2*H01__ppi + H01__glc1p + H01__glc6p + H01__gal1p + 2*H01__udpglc + 2*H01__udpgal;
  H01__GALK_Vmax := scale*GALK_PA*GALK_kcat*H01__GALK_P/REF_P;
  H01__GALK_dm := (1 + (H01__gal + H01__galM)/GALK_k_gal)*(1 + H01__atp/GALK_k_atp) + (1 + H01__gal1p/GALK_k_gal1p)*(1 + H01__adp/GALK_k_adp) - 1;
  H01__IMP_Vmax := IMP_f*H01__GALK_Vmax*H01__IMP_P/REF_P;
  H01__ATPS_Vmax := ATPS_f*H01__GALK_Vmax*H01__ATPS_P/REF_P;
  H01__ALDR_Vmax := ALDR_f*H01__GALK_Vmax*H01__ALDR_P/REF_P;
  H01__NADPR_Vmax := NADPR_f*H01__ALDR_Vmax*H01__NADPR_P/REF_P;
  H01__GALT_Vmax := H01__GALT_P/REF_P*GALT_f*H01__GALK_Vmax*GALT_vm;
  H01__GALE_Vmax := GALE_f*H01__GALK_Vmax*GALE_PA*GALE_kcat*H01__GALE_P/REF_P;
  H01__UGP_Vmax := UGP_f*H01__GALK_Vmax*H01__UGP_P/REF_P;
  H01__UGP_dm := (1 + H01__utp/UGP_k_utp + H01__udpglc/UGP_ki_udpglc)*(1 + H01__glc1p/UGP_k_glc1p + H01__gal1p/UGP_k_gal1p) + (1 + H01__udpglc/UGP_k_udpglc + H01__udpgal/UGP_k_udpgal + H01__utp/UGP_ki_utp)*(1 + H01__ppi/UGP_k_ppi) - 1;
  H01__PPASE_Vmax := PPASE_f*H01__UGP_Vmax*H01__PPASE_P/REF_P;
  H01__NDKU_Vmax := NDKU_f*H01__UGP_Vmax*H01__NDKU_P/REF_P;
  H01__PGM1_Vmax := PGM1_f*H01__GALK_Vmax*H01__PGM1_P/REF_P;
  H01__GLY_Vmax := GLY_f*H01__PGM1_Vmax*H01__GLY_P/REF_P;
  H01__GTF_Vmax := GTF_f*H01__GALK_Vmax*H01__GTF_P/REF_P;
  H01__GLUT2_Vmax := GLUT2_f*scale*H01__GLUT2_P/REF_P;
  H01__GLUT2_dm := 1 + (D001__gal + D001__galM)/GLUT2_k_gal + (H01__gal + H01__galM)/GLUT2_k_gal;
  H01__H2OT_Vmax := H2OT_f*scale;
  H01__H2OTM := D001__H2OTM;
  H01__GLUT2_GAL := D001__GLUT2_GAL;
  H01__GLUT2_GALM := D001__GLUT2_GALM;

  // Reactions:
  FlowPPS001_rbcM: $PP__rbcM -> S001__rbcM; flow_sin*PP__rbcM*A_sin;
  FlowS001PV_rbcM: S001__rbcM -> PV__rbcM; flow_sin*S001__rbcM*A_sin;
  FlowPVNULL_rbcM: PV__rbcM -> ; flow_sin*PV__rbcM*A_sin;
  FlowPPS001_suc: $PP__suc -> S001__suc; flow_sin*PP__suc*A_sin;
  FlowS001PV_suc: S001__suc -> PV__suc; flow_sin*S001__suc*A_sin;
  FlowPVNULL_suc: PV__suc -> ; flow_sin*PV__suc*A_sin;
  FlowPPS001_alb: $PP__alb -> S001__alb; flow_sin*PP__alb*A_sin;
  FlowS001PV_alb: S001__alb -> PV__alb; flow_sin*S001__alb*A_sin;
  FlowPVNULL_alb: PV__alb -> ; flow_sin*PV__alb*A_sin;
  FlowPPS001_gal: $PP__gal -> S001__gal; flow_sin*PP__gal*A_sin;
  FlowS001PV_gal: S001__gal -> PV__gal; flow_sin*S001__gal*A_sin;
  FlowPVNULL_gal: PV__gal -> ; flow_sin*PV__gal*A_sin;
  FlowPPS001_galM: $PP__galM -> S001__galM; flow_sin*PP__galM*A_sin;
  FlowS001PV_galM: S001__galM -> PV__galM; flow_sin*S001__galM*A_sin;
  FlowPVNULL_galM: PV__galM -> ; flow_sin*PV__galM*A_sin;
  FlowPPS001_h2oM: $PP__h2oM -> S001__h2oM; flow_sin*PP__h2oM*A_sin;
  FlowS001PV_h2oM: S001__h2oM -> PV__h2oM; flow_sin*S001__h2oM*A_sin;
  FlowPVNULL_h2oM: PV__h2oM -> ; flow_sin*PV__h2oM*A_sin;
  DiffPPS001_rbcM: $PP__rbcM -> S001__rbcM; Dx_sin_rbcM*(PP__rbcM - S001__rbcM);
  DiffS001PV_rbcM: S001__rbcM -> PV__rbcM; Dx_sin_rbcM*(S001__rbcM - PV__rbcM);
  DiffS001D001_rbcM: S001__rbcM -> D001__rbcM; Dy_sindis_rbcM*(S001__rbcM - D001__rbcM);
  DiffPPS001_suc: $PP__suc -> S001__suc; Dx_sin_suc*(PP__suc - S001__suc);
  DiffS001PV_suc: S001__suc -> PV__suc; Dx_sin_suc*(S001__suc - PV__suc);
  DiffS001D001_suc: S001__suc -> D001__suc; Dy_sindis_suc*(S001__suc - D001__suc);
  DiffPPS001_alb: $PP__alb -> S001__alb; Dx_sin_alb*(PP__alb - S001__alb);
  DiffS001PV_alb: S001__alb -> PV__alb; Dx_sin_alb*(S001__alb - PV__alb);
  DiffS001D001_alb: S001__alb -> D001__alb; Dy_sindis_alb*(S001__alb - D001__alb);
  DiffPPS001_gal: $PP__gal -> S001__gal; Dx_sin_gal*(PP__gal - S001__gal);
  DiffS001PV_gal: S001__gal -> PV__gal; Dx_sin_gal*(S001__gal - PV__gal);
  DiffS001D001_gal: S001__gal -> D001__gal; Dy_sindis_gal*(S001__gal - D001__gal);
  DiffPPS001_galM: $PP__galM -> S001__galM; Dx_sin_galM*(PP__galM - S001__galM);
  DiffS001PV_galM: S001__galM -> PV__galM; Dx_sin_galM*(S001__galM - PV__galM);
  DiffS001D001_galM: S001__galM -> D001__galM; Dy_sindis_galM*(S001__galM - D001__galM);
  DiffPPS001_h2oM: $PP__h2oM -> S001__h2oM; Dx_sin_h2oM*(PP__h2oM - S001__h2oM);
  DiffS001PV_h2oM: S001__h2oM -> PV__h2oM; Dx_sin_h2oM*(S001__h2oM - PV__h2oM);
  DiffS001D001_h2oM: S001__h2oM -> D001__h2oM; Dy_sindis_h2oM*(S001__h2oM - D001__h2oM);
  H01__GALK: H01__gal + H01__atp -> H01__gal1p + H01__adp; H01__GALK_Vmax/(GALK_k_gal*GALK_k_atp)*1/(1 + H01__gal1p/GALK_ki_gal1p)*(H01__gal*H01__atp - H01__gal1p*H01__adp/GALK_keq)/H01__GALK_dm; H01__GALK is "Galactokinase (H01)";  // ec-code:2.7.1.6; uniprot:P51570; kegg.reaction:R01092; rhea:13556
  H01__GALKM: H01__galM + H01__atp => H01__gal1p + H01__adp; H01__GALK_Vmax/(GALK_k_gal*GALK_k_atp)*1/(1 + H01__gal1p/GALK_ki_gal1p)*H01__galM*H01__atp/H01__GALK_dm; H01__GALKM is "Galactokinase (H01)";  // ec-code:2.7.1.6; uniprot:P51570; kegg.reaction:R01092; rhea:13556
  H01__IMP: H01__gal1p => H01__gal + H01__phos; H01__IMP_Vmax/IMP_k_gal1p*H01__gal1p/(1 + H01__gal1p/IMP_k_gal1p); H01__IMP is "Inositol monophosphatase (H01)";  // ec-code:3.1.3.25; uniprot:P29218
  H01__ATPS: H01__adp + H01__phos -> H01__atp; H01__ATPS_Vmax/(ATPS_k_adp*ATPS_k_phos)*(H01__adp*H01__phos - H01__atp/ATPS_keq)/((1 + H01__adp/ATPS_k_adp)*(1 + H01__phos/ATPS_k_phos) + H01__atp/ATPS_k_atp); H01__ATPS is "ATP synthase (H01)";
  H01__ALDR: H01__gal + H01__nadph -> H01__galtol + H01__nadp; H01__ALDR_Vmax/(ALDR_k_gal*ALDR_k_nadp)*(H01__gal*H01__nadph - H01__galtol*H01__nadp/ALDR_keq)/((1 + H01__gal/ALDR_k_gal)*(1 + H01__nadph/ALDR_k_nadph) + (1 + H01__galtol/ALDR_k_galtol)*(1 + H01__nadp/ALDR_k_nadp) - 1); H01__ALDR is "Aldose reductase (H01)";  // ec-code:1.1.1.21; rhea:12792; kegg.reaction:R01095; uniprot:P15121
  H01__NADPR: H01__nadp => H01__nadph; H01__NADPR_Vmax/NADPR_k_nadp*(H01__nadp - H01__nadph/NADPR_keq)/(1 + H01__nadp/NADPR_k_nadp + H01__nadph/NADPR_ki_nadph); H01__NADPR is "NADP Reductase (H01)";  // ec-code:1.1.1.49; rhea:15844; kegg.reaction:R00835; uniprot:P11413
  H01__GALT: H01__gal1p + H01__udpglc -> H01__glc1p + H01__udpgal; H01__GALT_Vmax/(GALT_k_gal1p*GALT_k_udpglc)*(H01__gal1p*H01__udpglc - H01__glc1p*H01__udpgal/GALT_keq)/((1 + H01__gal1p/GALT_k_gal1p)*(1 + H01__udpglc/GALT_k_udpglc + H01__udp/GALT_ki_udp + H01__utp/GALT_ki_utp) + (1 + H01__glc1p/GALT_k_glc1p)*(1 + H01__udpgal/GALT_k_udpgal) - 1); H01__GALT is "Galactose-1-phosphate uridyl transferase (H01)";  // modifiers: H01__udp, H01__utp; ec-code:2.7.7.12; uniprot:P07902; rhea:13992; kegg.reaction:R00955
  H01__GALE: H01__udpglc -> H01__udpgal; H01__GALE_Vmax/GALE_k_udpglc*(H01__udpglc - H01__udpgal/GALE_keq)/(1 + H01__udpglc/GALE_k_udpglc + H01__udpgal/GALE_k_udpgal); H01__GALE is "UDP-glucose 4-epimerase (H01)";  // ec-code:5.1.3.2; uniprot:Q14376; rhea:22171; kegg.reaction:R00291
  H01__UGP: H01__glc1p + H01__utp -> H01__udpglc + H01__ppi; H01__UGP_Vmax/(UGP_k_utp*UGP_k_glc1p)*(H01__glc1p*H01__utp - H01__udpglc*H01__ppi/UGP_keq)/H01__UGP_dm; H01__UGP is "UDP-glucose pyrophosphorylase (H01)";  // ec-code:2.7.7.9; rhea:19892; kegg.reaction:R00289; uniprot:Q16851
  H01__UGALP: H01__gal1p + H01__utp -> H01__udpgal + H01__ppi; UGALP_f*H01__UGP_Vmax/(UGP_k_utp*UGP_k_gal1p)*(H01__gal1p*H01__utp - H01__udpgal*H01__ppi/UGP_keq)/H01__UGP_dm; H01__UGALP is "UDP-galactose pyrophosphorylase (H01)";  // ec-code:2.7.7.10; rhea:14212; kegg.reaction:R00502; uniprot:Q16851
  H01__PPASE: H01__ppi => 2 H01__phos; H01__PPASE_Vmax*H01__ppi^PPASE_n/(H01__ppi^PPASE_n + PPASE_k_ppi^PPASE_n); H01__PPASE is "Pyrophosphatase (H01)";  // ec-code:3.6.1.1; rhea:24579; kegg.reaction:R00004; uniprot:Q15181
  H01__NDKU: H01__atp + H01__udp -> H01__adp + H01__utp; H01__NDKU_Vmax/NDKU_k_atp/NDKU_k_udp*(H01__atp*H01__udp - H01__adp*H01__utp/NDKU_keq)/((1 + H01__atp/NDKU_k_atp)*(1 + H01__udp/NDKU_k_udp) + (1 + H01__adp/NDKU_k_adp)*(1 + H01__utp/NDKU_k_utp) - 1); H01__NDKU is "ATP:UDP phosphotransferase (H01)";  // ec-code:2.7.4.6; rhea:25101; kegg.reaction:R00156
  H01__PGM1: H01__glc1p -> H01__glc6p; H01__PGM1_Vmax/PGM1_k_glc1p*(H01__glc1p - H01__glc6p/PGM1_keq)/(1 + H01__glc1p/PGM1_k_glc1p + H01__glc6p/PGM1_k_glc6p); H01__PGM1 is "Phosphoglucomutase-1 (H01)";  // ec-code:5.4.2.2; rhea:23539; kegg.reaction:R00959; uniprot:P36871
  H01__GLY: H01__glc6p -> H01__phos; H01__GLY_Vmax*(H01__glc6p - GLY_k_glc6p)/GLY_k_glc6p*H01__phos/(H01__phos + GLY_k_p); H01__GLY is "Glycolysis (H01)";
  H01__GTFGAL: H01__udpgal => H01__udp; H01__GTF_Vmax*H01__udpgal/(H01__udpgal + GTF_k_udpgal); H01__GTFGAL is "Glycosyltransferase galactose (H01)";
  H01__GTFGLC: H01__udpglc => H01__udp; 0*H01__GTF_Vmax*H01__udpglc/(H01__udpglc + GTF_k_udpglc); H01__GTFGLC is "Glycosyltransferase glucose (H01)";
  D001__GLUT2_GAL: D001__gal -> H01__gal; H01__GLUT2_Vmax/(GLUT2_k_gal*Nf)*(D001__gal - H01__gal)/H01__GLUT2_dm; D001__GLUT2_GAL is "galactose transport";  // uniprot:P11168; hasProperty omim:227810; isDescribedBy pubmed:227810
  D001__GLUT2_GALM: D001__galM -> H01__galM; H01__GLUT2_Vmax/(GLUT2_k_gal*Nf)*(D001__galM - H01__galM)/H01__GLUT2_dm; D001__GLUT2_GALM is "galactose transport";  // uniprot:P11168; hasProperty omim:227810; isDescribedBy pubmed:227810
  D001__H2OTM: D001__h2oM -> H01__h2oM; H01__H2OT_Vmax/H2OT_k/Nf*(D001__h2oM - H01__h2oM); D001__H2OTM is "H2O M transport";

  // Events:
  EDEF_00: at ((time > 0) && (deficiency == 0)), t0=false: GALK_kcat = 8.7, GALK_k_gal = 0.97, GALK_k_atp = 0.034, GALT_vm = 804, GALT_k_gal1p = 1.25, GALT_k_udpglc = 0.95, GALE_kcat = 36, GALE_k_udpglc = 0.069;
  EDEF_01: at ((time > 0) && (deficiency == 1)), t0=false: GALK_kcat = 2, GALK_k_gal = 7.7, GALK_k_atp = 0.13;
  EDEF_02: at ((time > 0) && (deficiency == 2)), t0=false: GALK_kcat = 3.9, GALK_k_gal = 0.43, GALK_k_atp = 0.11;
  EDEF_03: at ((time > 0) && (deficiency == 3)), t0=false: GALK_kcat = 5.9, GALK_k_gal = 0.66, GALK_k_atp = 0.026;
  EDEF_04: at ((time > 0) && (deficiency == 4)), t0=false: GALK_kcat = 0.4, GALK_k_gal = 1.1, GALK_k_atp = 0.005;
  EDEF_05: at ((time > 0) && (deficiency == 5)), t0=false: GALK_kcat = 1.1, GALK_k_gal = 13, GALK_k_atp = 0.089;
  EDEF_06: at ((time > 0) && (deficiency == 6)), t0=false: GALK_kcat = 1.8, GALK_k_gal = 1.7, GALK_k_atp = 0.039;
  EDEF_07: at ((time > 0) && (deficiency == 7)), t0=false: GALK_kcat = 6.7, GALK_k_gal = 1.9, GALK_k_atp = 0.035;
  EDEF_08: at ((time > 0) && (deficiency == 8)), t0=false: GALK_kcat = 0.9, GALK_k_gal = 0.14, GALK_k_atp = 0.0039;
  EDEF_09: at ((time > 0) && (deficiency == 9)), t0=false: GALT_vm = 396, GALT_k_gal1p = 1.89, GALT_k_udpglc = 0.58;
  EDEF_10: at ((time > 0) && (deficiency == 10)), t0=false: GALT_vm = 253, GALT_k_gal1p = 2.34, GALT_k_udpglc = 0.69;
  EDEF_11: at ((time > 0) && (deficiency == 11)), t0=false: GALT_vm = 297, GALT_k_gal1p = 1.12, GALT_k_udpglc = 0.76;
  EDEF_12: at ((time > 0) && (deficiency == 12)), t0=false: GALT_vm = 45, GALT_k_gal1p = 1.98, GALT_k_udpglc = 1.23;
  EDEF_13: at ((time > 0) && (deficiency == 13)), t0=false: GALT_vm = 306, GALT_k_gal1p = 2.14, GALT_k_udpglc = 0.48;
  EDEF_14: at ((time > 0) && (deficiency == 14)), t0=false: GALT_vm = 385, GALT_k_gal1p = 2.68, GALT_k_udpglc = 0.95;
  EDEF_15: at ((time > 0) && (deficiency == 15)), t0=false: GALE_kcat = 32, GALE_k_udpglc = 0.082;
  EDEF_16: at ((time > 0) && (deficiency == 16)), t0=false: GALE_kcat = 0.046, GALE_k_udpglc = 0.093;
  EDEF_17: at ((time > 0) && (deficiency == 17)), t0=false: GALE_kcat = 1.1, GALE_k_udpglc = 0.16;
  EDEF_18: at ((time > 0) && (deficiency == 18)), t0=false: GALE_kcat = 5, GALE_k_udpglc = 0.14;
  EDEF_19: at ((time > 0) && (deficiency == 19)), t0=false: GALE_kcat = 11, GALE_k_udpglc = 0.097;
  EDEF_20: at ((time > 0) && (deficiency == 20)), t0=false: GALE_kcat = 5.1, GALE_k_udpglc = 0.066;
  EDEF_21: at ((time > 0) && (deficiency == 21)), t0=false: GALE_kcat = 5.8, GALE_k_udpglc = 0.035;
  EDEF_22: at ((time > 0) && (deficiency == 22)), t0=false: GALE_kcat = 30, GALE_k_udpglc = 0.078;
  EDEF_23: at ((time > 0) && (deficiency == 23)), t0=false: GALE_kcat = 15, GALE_k_udpglc = 0.099;
  EDIL_1: at (time == 20): PP__gal = 1, PP__rbcM = 1, PP__alb = 1, PP__h2oM = 1, PP__suc = 1;
  EDIL_2: at (time == 25): PP__gal = 0.00012, PP__rbcM = 0, PP__alb = 0, PP__h2oM = 0, PP__suc = 0;

  // Unit definitions:
  unit s = second;
  unit m = metre;
  unit m2 = metre^2;
  unit m3 = metre^3;
  unit mole_per_s = mole / second;
  unit m_per_s = metre / second;
  unit m2_per_s = metre^2 / second;
  unit m3_per_s = metre^3 / second;
  unit mole_per_m3 = mole / metre^3;
  unit mM = mole / metre^3;
  unit per_mM = metre^3 / mole;
  unit per_s = 1 / second;
end
