// SBML level 3 version 1

model cell()
  // model units - substance: substance, volume: volume, area: area, length: length

  // Compartments:
  compartment comp;

  // Species:
  species gal_ext in comp;
  species gal in comp = 0; gal is "D-galactose";  // substance in mM

  // Parameters:
  GALI_vmax = 10 mmol_per_s;
  GALI_kgal = 1 mM;
  GALK_kgal = 0.3 mM;
  GALK_vmax = ;

  // Reactions:
  GALI: gal_ext -> gal; GALI_vmax/GALI_kgal*(gal - gal_ext)/(1 + gal/GALI_kgal + gal_ext/GALI_kgal); GALI is "Galactose Importer";
  GALK: gal => ; GALK_vmax*gal/(gal + GALK_kgal); GALK is "Galactose Clearance";

  // Unit definitions:
  unit substance = 1e-3 mole;
  unit volume = litre;
  unit area = metre^2;
  unit length = metre;
  unit mM = 1e-3 mole / litre;
  unit mmol_per_s = 1e-3 mole / second;
  unit per_s = 1 / second;
  unit mmol = 1e-3 mole;
end
