// SBML level 3 version 1

model cell(gal_ext, GALK_vmax, comp)
  // model units - substance: substance, volume: volume, area: area, length: length

  // Compartments:
  compartment comp; comp has litre;

  // Species:
  species gal_ext in comp;
  species gal in comp = 0; gal is "D-galactose";

  // Parameters:
  GALI_vmax = 10 mmol_per_s;
  GALI_kgal = 1 mM;
  GALK_kgal = 0.3 mM;
  GALK_vmax has mmol_per_s;

  // Reactions:
  GALI: gal_ext -> gal; GALI_vmax/GALI_kgal*(gal - gal_ext)/(1 + gal/GALI_kgal + gal_ext/GALI_kgal); GALI is "Galactose Importer";
  GALK: gal => ; GALK_vmax*gal/(gal + GALK_kgal);

  // Unit definitions:
  unit substance = 1e-3 mole;
  unit volume = litre;
  unit area = metre^2;
  unit length = metre;
  unit mM = 1e-3 mole / litre;
  unit mmol_per_s = 1e-3 mole / second;
  unit per_s = 1 / second;
  unit mmol = 1e-3 mole;
end

model full()
  // model units - substance: substance, volume: volume, area: area, length: length

  // Sub-modules:
  H1: cell();
  H2: cell();
  H3: cell();
  H4: cell();
  H5: cell();

  // Compartments:
  compartment default_compartment = 1; H1.default_compartment is default_compartment; H2.default_compartment is default_compartment; H3.default_compartment is default_compartment; H4.default_compartment is default_compartment; H5.default_compartment is default_compartment;
  compartment pp = 1e-11 litre; pp is "periportal";
  compartment blood1 = 1e-12 litre;
  compartment blood2 = 1e-12 litre;
  compartment blood3 = 1e-12 litre;
  compartment blood4 = 1e-12 litre;
  compartment blood5 = 1e-12 litre;
  compartment pv = 1e-12 litre; pv is "perivenous";
  compartment Hc1 = 1e-12 litre; Hc1 is "Hepatocyte 1";
  compartment Hc2 = 1e-12 litre; Hc2 is "Hepatocyte 2";
  compartment Hc3 = 1e-12 litre; Hc3 is "Hepatocyte 3";
  compartment Hc4 = 1e-12 litre; Hc4 is "Hepatocyte 4";
  compartment Hc5 = 1e-12 litre; Hc5 is "Hepatocyte 5";

  // Species:
  species $gal_pp in default_compartment = 10; gal_pp is "D-galactose";
  species gal_1 in default_compartment = 0; gal_1 is "D-galactose";
  species gal_2 in default_compartment = 0; gal_2 is "D-galactose";
  species gal_3 in default_compartment = 0; gal_3 is "D-galactose";
  species gal_4 in default_compartment = 0; gal_4 is "D-galactose";
  species gal_5 in default_compartment = 0; gal_5 is "D-galactose";
  species gal_pv in default_compartment = 0; gal_pv is "D-galactose";

  // Parameters:
  D = 10 per_s;
  k1 = 1 mmol_per_s;
  k2 = 2 mmol_per_s;
  k3 = 4 mmol_per_s;
  k4 = 8 mmol_per_s;
  k5 = 16 mmol_per_s;

  // Reactions:
  TPP: $gal_pp -> gal_1; D*(gal_1 - gal_pp);
  T1: gal_1 -> gal_2; D*(gal_2 - gal_1);
  T2: gal_2 -> gal_3; D*(gal_3 - gal_2);
  T3: gal_3 -> gal_4; D*(gal_4 - gal_3);
  T4: gal_4 -> gal_5; D*(gal_5 - gal_4);
  T5: gal_5 -> gal_pv; D*(gal_pv - gal_5);

  // Unit definitions:
  unit substance = 1e-3 mole;
  unit volume = litre;
  unit area = metre^2;
  unit length = metre;
  unit mM = 1e-3 mole / litre;
  unit mmol_per_s = 1e-3 mole / second;
  unit per_s = 1 / second;
  unit mmol = 1e-3 mole;
end
