// SBML level 3 version 1

model Koenig2014_demo_kinetic()
  // model units - volume: volume

  // Compartments:
  compartment outside = 1 litre; outside is "Outer Compartment";
  compartment inside = 1 litre; inside is "Inner Compartment";

  // Species:
  species A_in in inside = 0; A_in is "A inside";  // substance in mM_litre
  species B_in in inside = 0; B_in is "B inside";  // substance in mM_litre
  species C_in in inside = 0; C_in is "C inside";  // substance in mM_litre
  species A_out in inside = 10; A_out is "A outside";  // substance in mM_litre
  species B_out in inside = 0; B_out is "B outside";  // substance in mM_litre
  species C_out in inside = 0; C_out is "C outside";  // substance in mM_litre

  // Parameters:
  Km_A = 1 mM;
  Vmax_b1 = 5 mole_per_s;
  Km_B = 0 mM;
  Vmax_b2 = 2 mole_per_s;
  Km_C = 3 mM;
  Vmax_b3 = 2 mole_per_s;
  Keq_v1 = 10 dimensionless;
  Vmax_v1 = 1 mole_per_s;
  Vmax_v2 = 0 mole_per_s;
  Vmax_v3 = 0 mole_per_s;
  Keq_v4 = 2 dimensionless;
  Vmax_v4 = 0 mole_per_s;

  // Reactions:
  b1: A_out => A_in; Vmax_b1/Km_A*(A_out - A_in)/(1 + A_out/Km_A + A_in/Km_A); b1 is "A import";
  b2: B_in => B_out; Vmax_b2/Km_B*(B_in - B_out)/(1 + B_out/Km_B + B_in/Km_B); b2 is "B export";
  b3: C_in => C_out; Vmax_b3/Km_C*(C_in - C_out)/(1 + C_out/Km_C + C_in/Km_C); b3 is "C export";
  A_B: A_in -> B_in; Vmax_v1/Km_A*(A_in - 1/Keq_v1*B_in); A_B is "A -> B";
  A_C: A_in -> C_in; Vmax_v2/Km_A*A_in; A_C is "A -> C";
  C_A: C_in -> A_in; Vmax_v3/Km_A*C_in; C_A is "C -> A";
  C_B: C_in -> B_in; Vmax_v4/Km_A*(C_in - 1/Keq_v4*B_in); C_B is "C -> B";

  // Unit definitions:
  unit volume = metre^3;
  unit m3 = metre^3;
  unit mM = mole / metre^3;
  unit mole_per_s = mole / second;
  unit mM_litre = mole * litre / metre^3;
end
