// SBML level 3 version 1

function f1(G, Rm, C1, glucose_space, a1)
  Rm/(1 + exp((C1 - G/glucose_space)/a1));
end
f1 is "pancreatic insulin production";

function f2(G, Ub, C2, glucose_space)
  Ub*(1 - exp(-G/(C2*glucose_space)));
end
f2 is "insulin-independent glucose utilization";

function f3(G, C3, glucose_space)
  G/(C3*glucose_space);
end
f3 is "glucose utilization";

function f4(I, U0, Um, V1)
  U0 + Um/(1 + exp(-1.772*log10(I/V1) + 7.76));
end
f4 is "insulin-dependent glucose utilization";

function f5(I, Rg, a, V1, C5)
  Rg/(1 + exp(a*(I/V1 - C5)));
end
f5 is "influence of insulin on HGP";

model Engelborghs2001_1()
  // model units - substance: mg, time: min, volume: litre, area: m2, length: m, extent: mg

  // Compartments:
  compartment V1 = 3 litre; V1 has litre; V1 is "Vp distribution volume for insulin in plasma";
  compartment glucose_space = 10 litre; glucose_space has litre;

  // Parameters:
  a = 0.29 l_per_mU;
  a1 = 300 mg_per_l;
  b = 1.77 dimensionless;
  G = 12000 mg; G is "amount of glucose";
  I = 90 mU; I is "amount of insulin";
  Eg = 216 mg_per_min; Eg is "exogenous glucose supply";
  Ub = 72 mg_per_min;
  U0 = 4 mg_per_min;
  t1 = 100 min; t1 is "exponential insulin degradation time";
  Um = 90 mg_per_min;
  tau2 = 10 min;
  Rm = 210 mU_per_min;
  C3 = 1000 mg_per_l;
  C2 = 144 mg_per_l;
  td = 36 min;
  Rg = 180 mg_per_min;
  C1 = 2000 mg_per_l;
  C5 = 26 mU_per_l;
  C4 = 80 mU_per_l;

  // Rate rules:
  I' = f1(G, Rm, C1, glucose_space, a1) - I/t1;
  G' = Eg + f5(delay(I, tau2), Rg, a, V1, C5) - f2(G, Ub, C2, glucose_space) - f3(G, C3, glucose_space)*f4(I, U0, Um, V1);

  // Unit definitions:
  unit mg = 1e-3 gram;
  unit mU_per_l = 1.667e-11 katal / litre;
  unit min = 60 second;
  unit mU_per_min = 1.667e-11 katal / (60 second);
  unit mg_per_min = 1e-3 gram / (60 second);
  unit m = metre;
  unit l_per_mU = litre / (1.667e-11 katal);
  unit mg_per_l = 1e-3 gram / litre;
  unit mU = 1.667e-11 katal;
  unit m2 = metre^2;
  unit l_per_min = litre / (60 second);
end
