// SBML level 3 version 1

model pkpd_2()
  // Minimal PKPD model for liver clearance.
  // Description
  // This model is an example physiologically based pharmakokinetic model (PKPD) encoded in SBML format.
  // The model is available in the supplement of the article:
  // Basic Concepts in Physiologically Based Pharmacokinetic Modeling in Drug Discovery and Development.
  // HM Jones and K Rowland-Yeo
  // CPT Pharmacometrics Syst Pharmacol. 2013 Aug 14;2:e63. doi: 10.1038/psp.2013.41.
  // The content of this model has been carefully created in a manual research effort.
  // This file has been produced by Matthias Koenig.
  // Terms of use
  // Copyright © 2016 Matthias Koenig.
  // Redistribution and use of any part of this model, with or without modification, are permitted provided that the following conditions are met:
  // Redistributions of this SBML file must retain the above copyright notice, this list of conditions and the following disclaimer.
  // Redistributions in a different form must reproduce the above copyright notice, this list of conditions and the following disclaimer in the documentation and/or other materials provided with the distribution.
  // This model is distributed in the hope that it will be useful, but WITHOUT ANY WARRANTY; without even the implied warranty of MERCHANTABILITY or FITNESS FOR A PARTICULAR PURPOSE.
  // model units - substance: mg, time: h, volume: litre, area: m2, length: m, extent: mg

  // Compartments:
  compartment Vre; Vre has litre; Vre is "rest of body";
  compartment Vgu; Vgu has litre; Vgu is "gut";
  compartment Vki; Vki has litre; Vki is "kidney";
  compartment Vli; Vli has litre; Vli is "liver";
  compartment Vlu; Vlu has litre; Vlu is "lung";
  compartment Vsp; Vsp has litre; Vsp is "spleen";
  compartment Vve; Vve has litre; Vve is "venous blood";
  compartment Var; Var has litre; Var is "arterial blood";
  compartment Vpl; Vpl has litre; Vpl is "plasma";
  compartment Vplas_ven; Vplas_ven has litre; Vplas_ven is "venous plasma";
  compartment Vplas_art; Vplas_art has litre; Vplas_art is "arterial plasma";

  // Parameters:
  fup = 1 dimensionless; fup is "fraction unbound in plasma";
  BP = 1 dimensionless; BP is "blood to plasma ratio";
  fumic = 1 dimensionless; fumic is "fraction unbound in microsomes";
  HLM_CLint = 10 mulitre_per_min_mg; HLM_CLint is "HLM CLint apparent [mul/min/mg]";
  CLrenal = 0 litre_per_h; CLrenal is "CLint renal [L/hr]";
  MPPGL = 45 mg_per_g; MPPGL is "mg microsomal protein per g liver";
  Ka = 1 per_h; Ka is "Ka [1/hr] absorption";
  F = 1 dimensionless; F is "fraction absorbed";
  Ave = IVDOSE; Ave has mg;
  D = PODOSE; D has mg; D is "oral dose [mg]";
  DCL = 0 mg;
  IVDOSE = 0 mg; IVDOSE is "IV bolus dose [mg]";
  PODOSE = 100 mg; PODOSE is "oral bolus dose [mg]";
  BW = 70 kg; BW is "body weight";
  CO = 108.33 ml_per_s; CO is "cardiac output [ml/s]";
  QC has litre_per_h; QC is "cardiac output [L/hr]";
  FVre = 0.9049 litre_per_kg; FVre is "rest of body fractional tissue volume";
  FVgu = 0.0171 litre_per_kg; FVgu is "gut fractional tissue volume";
  FVki = 0.0044 litre_per_kg; FVki is "kidney fractional tissue volume";
  FVli = 0.021 litre_per_kg; FVli is "liver fractional tissue volume";
  FVlu = 0.0076 litre_per_kg; FVlu is "lung fractional tissue volume";
  FVsp = 0.0026 litre_per_kg; FVsp is "spleen fractional tissue volume";
  FVve = 0.0514 litre_per_kg; FVve is "venous fractional tissue volume";
  FVar = 0.0257 litre_per_kg; FVar is "arterial fractional tissue volume";
  FVpl = 0.0424 litre_per_kg; FVpl is "plasma fractional tissue volume";
  FQgu = 0.146462 dimensionless; FQgu is "gut fractional tissue blood flow";
  FQki = 0.19 dimensionless; FQki is "kidney fractional tissue blood flow";
  FQh = 0.215385 dimensionless; FQh is "hepatic (venous side) fractional tissue blood flow";
  FQlu = 1 dimensionless; FQlu is "lung fractional tissue blood flow";
  FQsp = 0.017231 dimensionless; FQsp is "spleen fractional tissue blood flow";
  FQre = 0.594615 dimensionless; FQre is "rest of body fractional tissue blood flow";
  Kpgu = 1 dimensionless; Kpgu is "gut tissue plasma partition coefficient";
  Kpki = 1 dimensionless; Kpki is "kidney tissue plasma partition coefficient";
  Kpli = 1 dimensionless; Kpli is "liver tissue plasma partition coefficient";
  Kplu = 1 dimensionless; Kplu is "lung tissue plasma partition coefficient";
  Kpsp = 1 dimensionless; Kpsp is "spleen tissue plasma partition coefficient";
  Kpre = 1 dimensionless; Kpre is "rest tissue plasma partition coefficient";
  Agu = 0 mg;
  Aki = 0 mg;
  Ali = 0 mg;
  Alu = 0 mg;
  Asp = 0 mg;
  Are = 0 mg;
  Aar = 0 mg;
  Cgu has mg_per_litre; Cgu is "C [mg/l] gut";
  Cki has mg_per_litre; Cki is "C [mg/l] kidney";
  Cli has mg_per_litre; Cli is "C [mg/l] liver";
  Clu has mg_per_litre; Clu is "C [mg/l] lung";
  Csp has mg_per_litre; Csp is "C [mg/l] spleen";
  Cre has mg_per_litre; Cre is "C [mg/l] rest of body";
  Cve has mg_per_litre; Cve is "C [mg/l] venous blood";
  Car has mg_per_litre; Car is "C [mg/l] arterial blood";
  Cpl_ve has mg_per_litre;
  Cli_free has mg_per_litre; Cli_free is "free liver concentration";
  Cki_free has mg_per_litre; Cki_free is "free kidney concentration";
  CLmet has litre_per_h; CLmet is "CLint scaled [l/hr]";
  Qgu has litre_per_h; Qgu is "gut blood flow";
  Qki has litre_per_h; Qki is "kidney blood flow";
  Qh has litre_per_h; Qh is "hepatic (venous side) blood flow";
  Qha has litre_per_h; Qha is "hepatic artery blood flow";
  Qlu has litre_per_h; Qlu is "lung blood flow";
  Qsp has litre_per_h; Qsp is "spleen blood flow";
  Qre has litre_per_h; Qre is "rest of body blood flow";
  Absorption has mg_per_h;
  Venous has mg_per_h;
  Abody has mg;

  // Assignment rules:
  Cgu := Agu/Vgu;
  Cki := Aki/Vki;
  Cli := Ali/Vli;
  Clu := Alu/Vlu;
  Csp := Asp/Vsp;
  Cre := Are/Vre;
  Cve := Ave/Vve;
  Car := Aar/Var;
  Cpl_ve := Cve/BP;
  Cli_free := Cli*fup;
  Cki_free := Cki*fup;
  CLmet := HLM_CLint/fumic*MPPGL*Vli*60 min_per_h/(1000 mulitre_per_g);
  Vgu := BW*FVgu;
  Vki := BW*FVki;
  Vli := BW*FVli;
  Vlu := BW*FVlu;
  Vsp := BW*FVsp;
  Vve := BW*FVve;
  Var := BW*FVar;
  Vpl := BW*FVpl;
  Vre := BW*FVre;
  Vplas_ven := Vpl*Vve/(Vve + Var);
  Vplas_art := Vpl*Var/(Vve + Var);
  QC := CO/(1000 ml_per_litre)*3600 s_per_h;
  Qgu := QC*FQgu;
  Qki := QC*FQki;
  Qh := QC*FQh;
  Qha := Qh - Qgu - Qsp;
  Qlu := QC*FQlu;
  Qsp := QC*FQsp;
  Qre := QC*FQre;
  Absorption := Ka*D*F;
  Venous := Qki*(Cki/Kpki)*BP + Qh*(Cli/Kpli)*BP + Qre*(Cre/Kpre)*BP;
  Abody := Aar + Agu + Aki + Ali + Alu + Asp + Are + Ave;

  // Rate rules:
  Agu' = Absorption + Qgu*(Car - Cgu/Kpgu*BP);
  Aki' = Qki*(Car - Cki/Kpki*BP) - CLrenal*Cki_free;
  Ali' = Qha*Car + Qgu*(Cgu/Kpgu)*BP + Qsp*(Csp/Kpsp)*BP - Qh*(Cli/Kpli)*BP - Cli_free*CLmet;
  Alu' = Qlu*Cve - Qlu*(Clu/Kplu)*BP;
  Asp' = Qsp*(Car - Csp/Kpsp*BP);
  Ave' = Venous - Qlu*Cve;
  Aar' = Qlu*(Clu/Kplu)*BP - Qlu*Car;
  Are' = Qre*(Car - Cre/Kpre*BP);
  D' = -Absorption;
  DCL' = CLrenal*Cki_free + Cli_free*CLmet;

  // Unit definitions:
  unit h = 3600 second;
  unit kg = 1000 gram;
  unit m = metre;
  unit m2 = metre^2;
  unit per_h = 1 / (3600 second);
  unit mg = 1e-3 gram;
  unit mg_per_litre = 1e-3 gram / litre;
  unit mg_per_g = 1e-3 gram / gram;
  unit mg_per_h = 1e-3 gram / (3600 second);
  unit litre_per_h = litre / (3600 second);
  unit litre_per_kg = litre / (1000 gram);
  unit mulitre_per_min_mg = 1e-6 litre / (60 second * 1e-3 gram);
  unit ml_per_s = 1e-3 litre / second;
  unit s_per_h = second / (3600 second);
  unit min_per_h = 60 second / (3600 second);
  unit ml_per_litre = 1e-3 litre / litre;
  unit mulitre_per_g = 1e-6 litre / gram;
end
