// SBML level 3 version 1

function f1(G, Rm, C1, Vg, a1)
  Rm/(1 + exp((C1 - G/Vg)/a1));
end
f1 is "pancreatic insulin production";

function f2(G, Ub, C2, Vg)
  Ub*(1 - exp(-G/(C2*Vg)));
end
f2 is "insulin-independent glucose utilization";

function f3(G, C3, Vg)
  G/(C3*Vg);
end
f3 is "glucose utilization";

function f4(Ii, U0, Um, b, C4, Vi, E, ti)
  U0 + (Um - U0)/(1 + exp(-b*ln(Ii/C4*(1/Vi + 1/(E*ti)))));
end
f4 is "insulin-dependent glucose utilization";

function f5(delay_variable_x3, Rg, a, Vp, C5)
  Rg/(1 + exp(a*(delay_variable_x3/Vp - C5)));
end
f5 is "influence of insulin on HGP";

model Sturis1991_1()
  // model units - substance: mg, time: min, volume: litre, area: m2, length: m, extent: mg

  // Compartments:
  compartment Vp = 3 litre; Vp has litre; Vp is "plasma space";
  compartment Vi = 11 litre; Vi has litre; Vi is "insulin space";
  compartment Vg = 10 litre; Vg has litre; Vg is "glucose space";

  // Parameters:
  U0 = 40 mg_per_min;
  Rg = 180 mg_per_min;
  Rm = 210 mU_per_min;
  tp = 6 min;
  ti = 100 min;
  C3 = 1000 mg_per_l;
  C2 = 144 mg_per_l;
  td = 36 min;
  C5 = 26 mU_per_l;
  C4 = 80 mU_per_l;
  E = 0.2 l_per_min;
  G = 0 mg; G is "amount of glucose in plasma and intracellular space";
  a1 = 300 mg_per_l;
  delay_variable_x2 = 0 mU;
  delay_variable_x3 = 0 mU;
  delay_variable_x1 = 0 mU;
  C1 = 2000 mg_per_l;
  Ub = 72 mg_per_min;
  a = 0.29 l_per_mU;
  Um = 940 mg_per_min;
  b = 1.77 dimensionless;
  Ip = 0 mU; Ip is "amount of insulin in plasma";
  Ii = 0 mU; Ii is "amount of insulin in intracellular space";

  // Rate rules:
  delay_variable_x1' = 3/td*(Ip - delay_variable_x1);

  // Unit definitions:
  unit mg = 1e-3 gram;
  unit mU_per_l = 1.667e-11 katal / litre;
  unit min = 60 second;
  unit mU_per_min = 1.667e-11 katal / (60 second);
  unit mg_per_min = 1e-3 gram / (60 second);
  unit m = metre;
  unit l_per_mU = litre / (1.667e-11 katal);
  unit mg_per_l = 1e-3 gram / litre;
  unit mU = 1.667e-11 katal;
  unit m2 = metre^2;
  unit l_per_min = litre / (60 second);
end
