// SBML level 3 version 1

model Hepatic_caffeine_1()
  // Koenig Human Caffeine Metabolism
  // Description
  // This is a metabolism model of Human caffeine metabolism in SBML format.
  // The content of this model has been carefully created in a manual research effort.
  // This file has been produced by Matthias Koenig.
  // Terms of use
  // Copyright © 2016 Matthias Koenig.
  // Redistribution and use of any part of this model, with or without modification, are permitted provided that the following conditions are met:
  // Redistributions of this SBML file must retain the above copyright notice, this list of conditions and the following disclaimer.
  // Redistributions in a different form must reproduce the above copyright notice, this list of conditions and the following disclaimer in the documentation and/or other materials provided with the distribution.
  // This model is distributed in the hope that it will be useful, but WITHOUT ANY WARRANTY; without even the implied warranty of MERCHANTABILITY or FITNESS FOR A PARTICULAR PURPOSE.
  // model units - substance: mole, time: s, volume: m3, area: m2, length: m, extent: mole

  // Compartments:
  compartment e; e has m3; e is "external";
  compartment h; h has m3; h is "hepatocyte";
  compartment c; c has m3; c is "cytosol";
  compartment pm; pm has m2; pm is "plasma membrane";  // 2-D

  // Species:
  species caf_ext in e = 0.0021; caf_ext is "caffeine";
  species px_ext in e = 0.01; px_ext is "paraxanthine";
  species tb_ext in e = 0.0011; tb_ext is "theobromine";
  species tp_ext in e = 0.029; tp_ext is "theophylline";
  species caf in c = 0; caf is "caffeine";
  species px in c = 0; px is "paraxanthine";
  species tb in c = 0; tb is "theobromine";
  species tp in c = 0; tp is "theophylline";

  // Parameters:
  f_met = 0.31 per_m3; f_met is "metabolic scaling factor";
  y_cell = 9.4e-6 m; y_cell is "width hepatocyte";
  x_cell = 2.5e-5 m; x_cell is "length hepatocyte";
  f_tissue = 0.8 dimensionless; f_tissue is "parenchymal fraction of liver";
  f_cyto = 0.4 dimensionless; f_cyto is "cytosolic fraction of hepatocyte";
  Vol_h = x_cell*x_cell*y_cell; Vol_h has m3; Vol_h is "volume hepatocyte";
  Vol_e = Vol_h; Vol_e has m3; Vol_e is "volume cytosol";
  Vol_c = f_cyto*Vol_h; Vol_c has m3; Vol_c is "volume external compartment";
  A_m = x_cell*x_cell; A_m has m2; A_m is "area plasma membrane";
  f_caf has dimensionless; f_caf is "scaling factor";
  CAFT_keq = 1 dimensionless;
  CAFT_k_caf = 0.1 mM;
  CAFT_Vmax = 10 mole_per_s;
  PXT_keq = 1 dimensionless;
  PXT_k_px = 0.1 mM;
  PXT_Vmax = 2 mole_per_s;
  TBT_keq = 1 dimensionless;
  TBT_k_tb = 0.1 mM;
  TBT_Vmax = 2 mole_per_s;
  TPT_keq = 1 dimensionless;
  TPT_k_tp = 0.1 mM;
  TPT_Vmax = 2 mole_per_s;
  CAF2PX_k_caf = 0.1 mM;
  CAF2PX_Vmax = 8.4 mole_per_s;
  CAF2TB_k_caf = 0.1 mM;
  CAF2TB_Vmax = 1.2 mole_per_s;
  CAF2TP_k_caf = 0.1 mM;
  CAF2TP_Vmax = 0.4 mole_per_s;

  // Assignment rules:
  e := Vol_e;
  h := Vol_h;
  c := Vol_c;
  pm := A_m;
  f_caf := f_met*Vol_h;

  // Reactions:
  CAFT: caf_ext -> caf; f_caf*(CAFT_Vmax/CAFT_k_caf)*(caf_ext - caf/CAFT_keq)/(1 + caf_ext/CAFT_k_caf + caf/CAFT_k_caf); CAFT is "caffeine transporter";
  PXT: px -> px_ext; f_caf*(PXT_Vmax/PXT_k_px)*(px - px_ext/PXT_keq)/(1 + px_ext/PXT_k_px + px/PXT_k_px); PXT is "paraxanthine transporter";
  TBT: tb -> tb_ext; f_caf*(TBT_Vmax/TBT_k_tb)*(tb - tb_ext/TBT_keq)/(1 + tb_ext/TBT_k_tb + tb/TBT_k_tb); TBT is "theobromine transporter";
  TPT: tp -> tp_ext; f_caf*(TPT_Vmax/TPT_k_tp)*(tp - tp_ext/TPT_keq)/(1 + tp_ext/TPT_k_tp + tp/TPT_k_tp); TPT is "theophylline transporter";
  CAF2PX: caf => px; f_caf*CAF2PX_Vmax*caf/(CAF2PX_k_caf + caf);
  CAF2TB: caf => tb; f_caf*CAF2TB_Vmax*caf/(CAF2TB_k_caf + caf);
  CAF2TP: caf => tp; f_caf*CAF2TP_Vmax*caf/(CAF2TP_k_caf + caf);

  // Unit definitions:
  unit s = second;
  unit kg = kilogram;
  unit m = metre;
  unit m2 = metre^2;
  unit m3 = metre^3;
  unit per_s = 1 / second;
  unit mole_per_s = mole / second;
  unit mole_per_s_per_mM = metre^3 / second;
  unit mole_per_s_per_mM2 = metre^6 / (mole * second);
  unit m_per_s = metre / second;
  unit m2_per_s = metre^2 / second;
  unit m3_per_s = metre^3 / second;
  unit mM = mole / metre^3;
  unit mM_s = mole * second / metre^3;
  unit per_mM = metre^3 / mole;
  unit per_m2 = 1 / metre^2;
  unit per_m3 = 1 / metre^3;
  unit kg_per_m3 = kilogram / metre^3;
  unit m3_per_skg = metre^3 / (kilogram * second);
  unit Pa = pascal;
  unit Pa_s = pascal * second;
  unit Pa_s_per_m4 = pascal * second / metre^4;
  unit Pa_s_per_m3 = pascal * second / metre^3;
  unit Pa_s_per_m2 = pascal * second / metre^2;
  unit m6_per_Pa2_s2 = metre^6 / (pascal^2 * second^2);
end
