// SBML level 3 version 1

model Hepatic_clearance_1()
  // Hepatic clearance
  // Description
  // This is a metabolism model of clearance metabolism in SBML format.
  // The content of this model has been carefully created in a manual research effort.
  // This file has been produced by Matthias Koenig.
  // Terms of use
  // Copyright © 2016 Matthias Koenig.
  // Redistribution and use of any part of this model, with or without modification, are permitted provided that the following conditions are met:
  // Redistributions of this SBML file must retain the above copyright notice, this list of conditions and the following disclaimer.
  // Redistributions in a different form must reproduce the above copyright notice, this list of conditions and the following disclaimer in the documentation and/or other materials provided with the distribution.
  // This model is distributed in the hope that it will be useful, but WITHOUT ANY WARRANTY; without even the implied warranty of MERCHANTABILITY or FITNESS FOR A PARTICULAR PURPOSE.
  // model units - substance: mole, time: s, volume: m3, area: m2, length: m, extent: mole

  // Compartments:
  compartment e; e has m3; e is "external";
  compartment h; h has m3; h is "hepatocyte";
  compartment c; c has m3; c is "cytosol";
  compartment pm; pm has m2; pm is "plasma membrane";  // 2-D

  // Species:
  species S_ext in e = 0.0021; S_ext is "substance S";
  species S in c = 0; S is "substance S";
  species P in c = 0; P is "product P";
  species P_ext in e = 0; P_ext is "product P";

  // Parameters:
  f_met = 0.31 per_m3; f_met is "metabolic scaling factor";
  y_cell = 9.4e-6 m; y_cell is "width hepatocyte";
  x_cell = 2.5e-5 m; x_cell is "length hepatocyte";
  f_tissue = 0.8 dimensionless; f_tissue is "parenchymal fraction of liver";
  f_cyto = 0.4 dimensionless; f_cyto is "cytosolic fraction of hepatocyte";
  Vol_h = x_cell*x_cell*y_cell; Vol_h has m3; Vol_h is "volume hepatocyte";
  Vol_e = Vol_h; Vol_e has m3; Vol_e is "volume cytosol";
  Vol_c = f_cyto*Vol_h; Vol_c has m3; Vol_c is "volume external compartment";
  A_m = x_cell*x_cell; A_m has m2; A_m is "area plasma membrane";
  f_cl has dimensionless;
  ST_keq = 1 dimensionless;
  ST_k_S = 0.1 mM;
  ST_Vmax = 10 mole_per_s;
  S2P_k_S = 0.1 mM;
  S2P_Vmax = 8.4 mole_per_s;
  PT_keq = 1 dimensionless;
  PT_k_P = 0.1 mM;
  PT_Vmax = 10 mole_per_s;

  // Assignment rules:
  e := Vol_e;
  h := Vol_h;
  c := Vol_c;
  pm := A_m;
  f_cl := f_met*0.2*Vol_h;

  // Reactions:
  ST: S_ext -> S; f_cl*(ST_Vmax/ST_k_S)*(S_ext - S/ST_keq)/(1 + S_ext/ST_k_S + S/ST_k_S); ST is "S transporter";
  S2P: S => P; f_cl*S2P_Vmax*S/(S2P_k_S + S); S2P is "S2P (S => P)";
  PT: P_ext -> P; f_cl*(PT_Vmax/PT_k_P)*(P_ext - P/PT_keq)/(1 + P_ext/PT_k_P + P/PT_k_P); PT is "P transporter";

  // Unit definitions:
  unit s = second;
  unit kg = kilogram;
  unit m = metre;
  unit m2 = metre^2;
  unit m3 = metre^3;
  unit per_s = 1 / second;
  unit mole_per_s = mole / second;
  unit mole_per_s_per_mM = metre^3 / second;
  unit mole_per_s_per_mM2 = metre^6 / (mole * second);
  unit m_per_s = metre / second;
  unit m2_per_s = metre^2 / second;
  unit m3_per_s = metre^3 / second;
  unit mM = mole / metre^3;
  unit mM_s = mole * second / metre^3;
  unit per_mM = metre^3 / mole;
  unit per_m2 = 1 / metre^2;
  unit per_m3 = 1 / metre^3;
  unit kg_per_m3 = kilogram / metre^3;
  unit m3_per_skg = metre^3 / (kilogram * second);
  unit Pa = pascal;
  unit Pa_s = pascal * second;
  unit Pa_s_per_m4 = pascal * second / metre^4;
  unit Pa_s_per_m3 = pascal * second / metre^3;
  unit Pa_s_per_m2 = pascal * second / metre^2;
  unit m6_per_Pa2_s2 = metre^6 / (pascal^2 * second^2);
end
