// SBML level 3 version 1

model sinusoidal_flow_Nc20_v3()
  // Koenig Sinusoidal Unit Model
  // Description
  // This is the template model of the sinusodial unit in SBML format.
  // The content of this model has been carefully created in a manual research effort.
  // This file has been created by Matthias Koenig.
  // Terms of use
  // Copyright © 2016 Matthias Koenig.
  // Redistribution and use of any part of this model, with or without modification, are permitted provided that the following conditions are met:
  // Redistributions of this SBML file must retain the above copyright notice, this list of conditions and the following disclaimer.
  // Redistributions in a different form must reproduce the above copyright notice, this list of conditions and the following disclaimer in the documentation and/or other materials provided with the distribution.
  // This model is distributed in the hope that it will be useful, but WITHOUT ANY WARRANTY; without even the implied warranty of MERCHANTABILITY or FITNESS FOR A PARTICULAR PURPOSE.
  // model units - substance: mole, time: s, volume: m3, area: m2, length: m, extent: mole

  // Compartments:
  compartment PP; PP has m3; PP is "[PP] periportal";
  compartment PV; PV has m3; PV is "[PV] perivenious";
  compartment S01_sinusoid; S01_sinusoid has m3; S01_sinusoid is "[S01] sinusoid";
  compartment D01; D01 has m3; D01 is "[D01] disse";
  compartment H01; H01 has m3; H01 is "[H01] hepatocyte";
  compartment S02_sinusoid; S02_sinusoid has m3; S02_sinusoid is "[S02] sinusoid";
  compartment D02; D02 has m3; D02 is "[D02] disse";
  compartment H02; H02 has m3; H02 is "[H02] hepatocyte";
  compartment S03_sinusoid; S03_sinusoid has m3; S03_sinusoid is "[S03] sinusoid";
  compartment D03; D03 has m3; D03 is "[D03] disse";
  compartment H03; H03 has m3; H03 is "[H03] hepatocyte";
  compartment S04_sinusoid; S04_sinusoid has m3; S04_sinusoid is "[S04] sinusoid";
  compartment D04; D04 has m3; D04 is "[D04] disse";
  compartment H04; H04 has m3; H04 is "[H04] hepatocyte";
  compartment S05_sinusoid; S05_sinusoid has m3; S05_sinusoid is "[S05] sinusoid";
  compartment D05; D05 has m3; D05 is "[D05] disse";
  compartment H05; H05 has m3; H05 is "[H05] hepatocyte";
  compartment S06_sinusoid; S06_sinusoid has m3; S06_sinusoid is "[S06] sinusoid";
  compartment D06; D06 has m3; D06 is "[D06] disse";
  compartment H06; H06 has m3; H06 is "[H06] hepatocyte";
  compartment S07_sinusoid; S07_sinusoid has m3; S07_sinusoid is "[S07] sinusoid";
  compartment D07; D07 has m3; D07 is "[D07] disse";
  compartment H07; H07 has m3; H07 is "[H07] hepatocyte";
  compartment S08_sinusoid; S08_sinusoid has m3; S08_sinusoid is "[S08] sinusoid";
  compartment D08; D08 has m3; D08 is "[D08] disse";
  compartment H08; H08 has m3; H08 is "[H08] hepatocyte";
  compartment S09_sinusoid; S09_sinusoid has m3; S09_sinusoid is "[S09] sinusoid";
  compartment D09; D09 has m3; D09 is "[D09] disse";
  compartment H09; H09 has m3; H09 is "[H09] hepatocyte";
  compartment S10_sinusoid; S10_sinusoid has m3; S10_sinusoid is "[S10] sinusoid";
  compartment D10; D10 has m3; D10 is "[D10] disse";
  compartment H10; H10 has m3; H10 is "[H10] hepatocyte";
  compartment S11_sinusoid; S11_sinusoid has m3; S11_sinusoid is "[S11] sinusoid";
  compartment D11; D11 has m3; D11 is "[D11] disse";
  compartment H11; H11 has m3; H11 is "[H11] hepatocyte";
  compartment S12_sinusoid; S12_sinusoid has m3; S12_sinusoid is "[S12] sinusoid";
  compartment D12; D12 has m3; D12 is "[D12] disse";
  compartment H12; H12 has m3; H12 is "[H12] hepatocyte";
  compartment S13_sinusoid; S13_sinusoid has m3; S13_sinusoid is "[S13] sinusoid";
  compartment D13; D13 has m3; D13 is "[D13] disse";
  compartment H13; H13 has m3; H13 is "[H13] hepatocyte";
  compartment S14_sinusoid; S14_sinusoid has m3; S14_sinusoid is "[S14] sinusoid";
  compartment D14; D14 has m3; D14 is "[D14] disse";
  compartment H14; H14 has m3; H14 is "[H14] hepatocyte";
  compartment S15_sinusoid; S15_sinusoid has m3; S15_sinusoid is "[S15] sinusoid";
  compartment D15; D15 has m3; D15 is "[D15] disse";
  compartment H15; H15 has m3; H15 is "[H15] hepatocyte";
  compartment S16_sinusoid; S16_sinusoid has m3; S16_sinusoid is "[S16] sinusoid";
  compartment D16; D16 has m3; D16 is "[D16] disse";
  compartment H16; H16 has m3; H16 is "[H16] hepatocyte";
  compartment S17_sinusoid; S17_sinusoid has m3; S17_sinusoid is "[S17] sinusoid";
  compartment D17; D17 has m3; D17 is "[D17] disse";
  compartment H17; H17 has m3; H17 is "[H17] hepatocyte";
  compartment S18_sinusoid; S18_sinusoid has m3; S18_sinusoid is "[S18] sinusoid";
  compartment D18; D18 has m3; D18 is "[D18] disse";
  compartment H18; H18 has m3; H18 is "[H18] hepatocyte";
  compartment S19_sinusoid; S19_sinusoid has m3; S19_sinusoid is "[S19] sinusoid";
  compartment D19; D19 has m3; D19 is "[D19] disse";
  compartment H19; H19 has m3; H19 is "[H19] hepatocyte";
  compartment S20_sinusoid; S20_sinusoid has m3; S20_sinusoid is "[S20] sinusoid";
  compartment D20; D20 has m3; D20 is "[D20] disse";
  compartment H20; H20 has m3; H20 is "[H20] hepatocyte";

  // Species:
  species $PP__S in PP = 1; PP__S is "[PP] substance S";
  species PV__S in PV = 1; PV__S is "[PV] substance S";
  species S01__S in S01_sinusoid = 1; S01__S is "[S01] substance S";
  species D01__S in D01 = 1; D01__S is "[D01] substance S";
  species S02__S in S02_sinusoid = 1; S02__S is "[S02] substance S";
  species D02__S in D02 = 1; D02__S is "[D02] substance S";
  species S03__S in S03_sinusoid = 1; S03__S is "[S03] substance S";
  species D03__S in D03 = 1; D03__S is "[D03] substance S";
  species S04__S in S04_sinusoid = 1; S04__S is "[S04] substance S";
  species D04__S in D04 = 1; D04__S is "[D04] substance S";
  species S05__S in S05_sinusoid = 1; S05__S is "[S05] substance S";
  species D05__S in D05 = 1; D05__S is "[D05] substance S";
  species S06__S in S06_sinusoid = 1; S06__S is "[S06] substance S";
  species D06__S in D06 = 1; D06__S is "[D06] substance S";
  species S07__S in S07_sinusoid = 1; S07__S is "[S07] substance S";
  species D07__S in D07 = 1; D07__S is "[D07] substance S";
  species S08__S in S08_sinusoid = 1; S08__S is "[S08] substance S";
  species D08__S in D08 = 1; D08__S is "[D08] substance S";
  species S09__S in S09_sinusoid = 1; S09__S is "[S09] substance S";
  species D09__S in D09 = 1; D09__S is "[D09] substance S";
  species S10__S in S10_sinusoid = 1; S10__S is "[S10] substance S";
  species D10__S in D10 = 1; D10__S is "[D10] substance S";
  species S11__S in S11_sinusoid = 1; S11__S is "[S11] substance S";
  species D11__S in D11 = 1; D11__S is "[D11] substance S";
  species S12__S in S12_sinusoid = 1; S12__S is "[S12] substance S";
  species D12__S in D12 = 1; D12__S is "[D12] substance S";
  species S13__S in S13_sinusoid = 1; S13__S is "[S13] substance S";
  species D13__S in D13 = 1; D13__S is "[D13] substance S";
  species S14__S in S14_sinusoid = 1; S14__S is "[S14] substance S";
  species D14__S in D14 = 1; D14__S is "[D14] substance S";
  species S15__S in S15_sinusoid = 1; S15__S is "[S15] substance S";
  species D15__S in D15 = 1; D15__S is "[D15] substance S";
  species S16__S in S16_sinusoid = 1; S16__S is "[S16] substance S";
  species D16__S in D16 = 1; D16__S is "[D16] substance S";
  species S17__S in S17_sinusoid = 1; S17__S is "[S17] substance S";
  species D17__S in D17 = 1; D17__S is "[D17] substance S";
  species S18__S in S18_sinusoid = 1; S18__S is "[S18] substance S";
  species D18__S in D18 = 1; D18__S is "[D18] substance S";
  species S19__S in S19_sinusoid = 1; S19__S is "[S19] substance S";
  species D19__S in D19 = 1; D19__S is "[D19] substance S";
  species S20__S in S20_sinusoid = 1; S20__S is "[S20] substance S";
  species D20__S in D20 = 1; D20__S is "[D20] substance S";
  species $PP__P in PP = 0; PP__P is "[PP] product P";
  species PV__P in PV = 0; PV__P is "[PV] product P";
  species S01__P in S01_sinusoid = 0; S01__P is "[S01] product P";
  species D01__P in D01 = 0; D01__P is "[D01] product P";
  species S02__P in S02_sinusoid = 0; S02__P is "[S02] product P";
  species D02__P in D02 = 0; D02__P is "[D02] product P";
  species S03__P in S03_sinusoid = 0; S03__P is "[S03] product P";
  species D03__P in D03 = 0; D03__P is "[D03] product P";
  species S04__P in S04_sinusoid = 0; S04__P is "[S04] product P";
  species D04__P in D04 = 0; D04__P is "[D04] product P";
  species S05__P in S05_sinusoid = 0; S05__P is "[S05] product P";
  species D05__P in D05 = 0; D05__P is "[D05] product P";
  species S06__P in S06_sinusoid = 0; S06__P is "[S06] product P";
  species D06__P in D06 = 0; D06__P is "[D06] product P";
  species S07__P in S07_sinusoid = 0; S07__P is "[S07] product P";
  species D07__P in D07 = 0; D07__P is "[D07] product P";
  species S08__P in S08_sinusoid = 0; S08__P is "[S08] product P";
  species D08__P in D08 = 0; D08__P is "[D08] product P";
  species S09__P in S09_sinusoid = 0; S09__P is "[S09] product P";
  species D09__P in D09 = 0; D09__P is "[D09] product P";
  species S10__P in S10_sinusoid = 0; S10__P is "[S10] product P";
  species D10__P in D10 = 0; D10__P is "[D10] product P";
  species S11__P in S11_sinusoid = 0; S11__P is "[S11] product P";
  species D11__P in D11 = 0; D11__P is "[D11] product P";
  species S12__P in S12_sinusoid = 0; S12__P is "[S12] product P";
  species D12__P in D12 = 0; D12__P is "[D12] product P";
  species S13__P in S13_sinusoid = 0; S13__P is "[S13] product P";
  species D13__P in D13 = 0; D13__P is "[D13] product P";
  species S14__P in S14_sinusoid = 0; S14__P is "[S14] product P";
  species D14__P in D14 = 0; D14__P is "[D14] product P";
  species S15__P in S15_sinusoid = 0; S15__P is "[S15] product P";
  species D15__P in D15 = 0; D15__P is "[D15] product P";
  species S16__P in S16_sinusoid = 0; S16__P is "[S16] product P";
  species D16__P in D16 = 0; D16__P is "[D16] product P";
  species S17__P in S17_sinusoid = 0; S17__P is "[S17] product P";
  species D17__P in D17 = 0; D17__P is "[D17] product P";
  species S18__P in S18_sinusoid = 0; S18__P is "[S18] product P";
  species D18__P in D18 = 0; D18__P is "[D18] product P";
  species S19__P in S19_sinusoid = 0; S19__P is "[S19] product P";
  species D19__P in D19 = 0; D19__P is "[D19] product P";
  species S20__P in S20_sinusoid = 0; S20__P is "[S20] product P";
  species D20__P in D20 = 0; D20__P is "[D20] product P";

  // Parameters:
  L = 0.0005 m; L is "sinusoidal length";
  y_sin = 4.4e-6 m; y_sin is "sinusoidal radius";
  y_end = 1.65e-7 m; y_end is "endothelial cell thickness";
  y_dis = 2.3e-6 m; y_dis is "width space of Disse";
  y_cell = 9.4e-6 m; y_cell is "width hepatocyte";
  N_fen = 10000000000000 per_m2; N_fen is "fenestrations per area";
  r_fen = 5.35e-8 m; r_fen is "fenestration radius";
  rho_liv = 1250 kg_per_m3; rho_liv is "liver density";
  f_tissue = 0.8 dimensionless; f_tissue is "parenchymal fraction of liver";
  flow_sin = 0.000229 m_per_s; flow_sin is "sinusoidal flow velocity";
  Nc = 20 dimensionless; Nc is "cells in sinusoidal unit";
  DS = 9.1e-10 m2_per_s; DS is "diffusion constant S";
  r_S = 3.6e-10 m; r_S is "effective radius S";
  DP = 7.2e-10 m2_per_s; DP is "diffusion constant P";
  r_P = 4.4e-10 m; r_P is "effective radius P";
  x_cell has m; x_cell is "length cell compartment";
  x_sin has m; x_sin is "length sinusoidal compartment";
  A_sin has m2; A_sin is "cross section sinusoid";
  A_dis has m2; A_dis is "cross section space of Disse";
  A_sindis has m2; A_sindis is "exchange area between sinusoid and Disse";
  A_sinunit has m2; A_sinunit is "cross section sinusoidal unit";
  Vol_sin has m3; Vol_sin is "volume sinusoidal compartment";
  Vol_dis has m3; Vol_dis is "volume Disse compartment";
  Vol_cell has m3; Vol_cell is "volume cell compartment";
  Vol_pp has m3; Vol_pp is "volume periportal";
  Vol_pv has m3; Vol_pv is "volume perivenious";
  Vol_sinunit has m3; Vol_sinunit is "total volume sinusoidal unit";
  f_sin has dimensionless; f_sin is "sinusoidal fraction of volume";
  f_dis has dimensionless; f_dis is "Disse fraction of volume";
  f_cell has dimensionless; f_cell is "cell fraction of volume";
  f_fen has dimensionless; f_fen is "fenestration porosity";
  Q_sinunit has m3_per_s; Q_sinunit is "volume flow sinusoid";
  Dx_sin_S has m3_per_s;
  Dx_dis_S has m3_per_s;
  Dy_sindis_S has m3_per_s;
  Dx_sin_P has m3_per_s;
  Dx_dis_P has m3_per_s;
  Dy_sindis_P has m3_per_s;

  // Assignment rules:
  PP := Vol_pp;
  PV := Vol_pv;
  S01_sinusoid := Vol_sin;
  D01 := Vol_dis;
  H01 := Vol_cell;
  S02_sinusoid := Vol_sin;
  D02 := Vol_dis;
  H02 := Vol_cell;
  S03_sinusoid := Vol_sin;
  D03 := Vol_dis;
  H03 := Vol_cell;
  S04_sinusoid := Vol_sin;
  D04 := Vol_dis;
  H04 := Vol_cell;
  S05_sinusoid := Vol_sin;
  D05 := Vol_dis;
  H05 := Vol_cell;
  S06_sinusoid := Vol_sin;
  D06 := Vol_dis;
  H06 := Vol_cell;
  S07_sinusoid := Vol_sin;
  D07 := Vol_dis;
  H07 := Vol_cell;
  S08_sinusoid := Vol_sin;
  D08 := Vol_dis;
  H08 := Vol_cell;
  S09_sinusoid := Vol_sin;
  D09 := Vol_dis;
  H09 := Vol_cell;
  S10_sinusoid := Vol_sin;
  D10 := Vol_dis;
  H10 := Vol_cell;
  S11_sinusoid := Vol_sin;
  D11 := Vol_dis;
  H11 := Vol_cell;
  S12_sinusoid := Vol_sin;
  D12 := Vol_dis;
  H12 := Vol_cell;
  S13_sinusoid := Vol_sin;
  D13 := Vol_dis;
  H13 := Vol_cell;
  S14_sinusoid := Vol_sin;
  D14 := Vol_dis;
  H14 := Vol_cell;
  S15_sinusoid := Vol_sin;
  D15 := Vol_dis;
  H15 := Vol_cell;
  S16_sinusoid := Vol_sin;
  D16 := Vol_dis;
  H16 := Vol_cell;
  S17_sinusoid := Vol_sin;
  D17 := Vol_dis;
  H17 := Vol_cell;
  S18_sinusoid := Vol_sin;
  D18 := Vol_dis;
  H18 := Vol_cell;
  S19_sinusoid := Vol_sin;
  D19 := Vol_dis;
  H19 := Vol_cell;
  S20_sinusoid := Vol_sin;
  D20 := Vol_dis;
  H20 := Vol_cell;
  x_cell := L/Nc;
  x_sin := x_cell;
  A_sin := pi*y_sin^2;
  A_dis := pi*(y_sin + y_end + y_dis)^2 - pi*(y_sin + y_end)^2;
  A_sindis := 2*pi*y_sin*x_sin;
  A_sinunit := pi*(y_sin + y_end + y_dis + y_cell)^2;
  Vol_sin := A_sin*x_sin;
  Vol_dis := A_dis*x_sin;
  Vol_cell := pi*x_cell*((y_sin + y_end + y_dis + y_cell)^2 - (y_sin + y_end + y_dis)^2);
  Vol_pp := Vol_sin;
  Vol_pv := Vol_sin;
  Vol_sinunit := L*pi*(y_sin + y_end + y_dis + y_cell)^2;
  f_sin := Vol_sin/(A_sinunit*x_sin);
  f_dis := Vol_dis/(A_sinunit*x_sin);
  f_cell := Vol_cell/(A_sinunit*x_sin);
  f_fen := N_fen*pi*r_fen^2;
  Q_sinunit := pi*y_sin^2*flow_sin;
  Dx_sin_S := DS/x_sin*A_sin;
  Dx_dis_S := DS/x_sin*A_dis;
  Dy_sindis_S := DS/y_dis*f_fen*A_sindis*(1 - r_S/r_fen)^2*(1 - 2.104*r_S/r_fen + 2.09*(r_S/r_fen)^3 - 0.95*(r_S/r_fen)^5);
  Dx_sin_P := DP/x_sin*A_sin;
  Dx_dis_P := DP/x_sin*A_dis;
  Dy_sindis_P := DP/y_dis*f_fen*A_sindis*(1 - r_P/r_fen)^2*(1 - 2.104*r_P/r_fen + 2.09*(r_P/r_fen)^3 - 0.95*(r_P/r_fen)^5);

  // Reactions:
  F_PPS01_S: $PP__S => S01__S; Q_sinunit*PP__S; F_PPS01_S is "[PP -> S01] convection S";
  F_S01S02_S: S01__S => S02__S; Q_sinunit*S01__S; F_S01S02_S is "[S01 -> S02] convection S";
  F_S02S03_S: S02__S => S03__S; Q_sinunit*S02__S; F_S02S03_S is "[S02 -> S03] convection S";
  F_S03S04_S: S03__S => S04__S; Q_sinunit*S03__S; F_S03S04_S is "[S03 -> S04] convection S";
  F_S04S05_S: S04__S => S05__S; Q_sinunit*S04__S; F_S04S05_S is "[S04 -> S05] convection S";
  F_S05S06_S: S05__S => S06__S; Q_sinunit*S05__S; F_S05S06_S is "[S05 -> S06] convection S";
  F_S06S07_S: S06__S => S07__S; Q_sinunit*S06__S; F_S06S07_S is "[S06 -> S07] convection S";
  F_S07S08_S: S07__S => S08__S; Q_sinunit*S07__S; F_S07S08_S is "[S07 -> S08] convection S";
  F_S08S09_S: S08__S => S09__S; Q_sinunit*S08__S; F_S08S09_S is "[S08 -> S09] convection S";
  F_S09S10_S: S09__S => S10__S; Q_sinunit*S09__S; F_S09S10_S is "[S09 -> S10] convection S";
  F_S10S11_S: S10__S => S11__S; Q_sinunit*S10__S; F_S10S11_S is "[S10 -> S11] convection S";
  F_S11S12_S: S11__S => S12__S; Q_sinunit*S11__S; F_S11S12_S is "[S11 -> S12] convection S";
  F_S12S13_S: S12__S => S13__S; Q_sinunit*S12__S; F_S12S13_S is "[S12 -> S13] convection S";
  F_S13S14_S: S13__S => S14__S; Q_sinunit*S13__S; F_S13S14_S is "[S13 -> S14] convection S";
  F_S14S15_S: S14__S => S15__S; Q_sinunit*S14__S; F_S14S15_S is "[S14 -> S15] convection S";
  F_S15S16_S: S15__S => S16__S; Q_sinunit*S15__S; F_S15S16_S is "[S15 -> S16] convection S";
  F_S16S17_S: S16__S => S17__S; Q_sinunit*S16__S; F_S16S17_S is "[S16 -> S17] convection S";
  F_S17S18_S: S17__S => S18__S; Q_sinunit*S17__S; F_S17S18_S is "[S17 -> S18] convection S";
  F_S18S19_S: S18__S => S19__S; Q_sinunit*S18__S; F_S18S19_S is "[S18 -> S19] convection S";
  F_S19S20_S: S19__S => S20__S; Q_sinunit*S19__S; F_S19S20_S is "[S19 -> S20] convection S";
  F_S20PV_S: S20__S => PV__S; Q_sinunit*S20__S; F_S20PV_S is "[S20 -> PV] convection S";
  F_PVNONE_S: PV__S => ; Q_sinunit*PV__S; F_PVNONE_S is "[PV -> ] convection S";
  F_PPS01_P: $PP__P => S01__P; Q_sinunit*PP__P; F_PPS01_P is "[PP -> S01] convection P";
  F_S01S02_P: S01__P => S02__P; Q_sinunit*S01__P; F_S01S02_P is "[S01 -> S02] convection P";
  F_S02S03_P: S02__P => S03__P; Q_sinunit*S02__P; F_S02S03_P is "[S02 -> S03] convection P";
  F_S03S04_P: S03__P => S04__P; Q_sinunit*S03__P; F_S03S04_P is "[S03 -> S04] convection P";
  F_S04S05_P: S04__P => S05__P; Q_sinunit*S04__P; F_S04S05_P is "[S04 -> S05] convection P";
  F_S05S06_P: S05__P => S06__P; Q_sinunit*S05__P; F_S05S06_P is "[S05 -> S06] convection P";
  F_S06S07_P: S06__P => S07__P; Q_sinunit*S06__P; F_S06S07_P is "[S06 -> S07] convection P";
  F_S07S08_P: S07__P => S08__P; Q_sinunit*S07__P; F_S07S08_P is "[S07 -> S08] convection P";
  F_S08S09_P: S08__P => S09__P; Q_sinunit*S08__P; F_S08S09_P is "[S08 -> S09] convection P";
  F_S09S10_P: S09__P => S10__P; Q_sinunit*S09__P; F_S09S10_P is "[S09 -> S10] convection P";
  F_S10S11_P: S10__P => S11__P; Q_sinunit*S10__P; F_S10S11_P is "[S10 -> S11] convection P";
  F_S11S12_P: S11__P => S12__P; Q_sinunit*S11__P; F_S11S12_P is "[S11 -> S12] convection P";
  F_S12S13_P: S12__P => S13__P; Q_sinunit*S12__P; F_S12S13_P is "[S12 -> S13] convection P";
  F_S13S14_P: S13__P => S14__P; Q_sinunit*S13__P; F_S13S14_P is "[S13 -> S14] convection P";
  F_S14S15_P: S14__P => S15__P; Q_sinunit*S14__P; F_S14S15_P is "[S14 -> S15] convection P";
  F_S15S16_P: S15__P => S16__P; Q_sinunit*S15__P; F_S15S16_P is "[S15 -> S16] convection P";
  F_S16S17_P: S16__P => S17__P; Q_sinunit*S16__P; F_S16S17_P is "[S16 -> S17] convection P";
  F_S17S18_P: S17__P => S18__P; Q_sinunit*S17__P; F_S17S18_P is "[S17 -> S18] convection P";
  F_S18S19_P: S18__P => S19__P; Q_sinunit*S18__P; F_S18S19_P is "[S18 -> S19] convection P";
  F_S19S20_P: S19__P => S20__P; Q_sinunit*S19__P; F_S19S20_P is "[S19 -> S20] convection P";
  F_S20PV_P: S20__P => PV__P; Q_sinunit*S20__P; F_S20PV_P is "[S20 -> PV] convection P";
  F_PVNONE_P: PV__P => ; Q_sinunit*PV__P; F_PVNONE_P is "[PV -> ] convection P";
  D_PPS01_S: $PP__S -> S01__S; Dx_sin_S*(PP__S - S01__S); D_PPS01_S is "[PP <-> S01] diffusion S";
  D_S01S02_S: S01__S -> S02__S; Dx_sin_S*(S01__S - S02__S); D_S01S02_S is "[S01 <-> S02] diffusion S";
  D_S02S03_S: S02__S -> S03__S; Dx_sin_S*(S02__S - S03__S); D_S02S03_S is "[S02 <-> S03] diffusion S";
  D_S03S04_S: S03__S -> S04__S; Dx_sin_S*(S03__S - S04__S); D_S03S04_S is "[S03 <-> S04] diffusion S";
  D_S04S05_S: S04__S -> S05__S; Dx_sin_S*(S04__S - S05__S); D_S04S05_S is "[S04 <-> S05] diffusion S";
  D_S05S06_S: S05__S -> S06__S; Dx_sin_S*(S05__S - S06__S); D_S05S06_S is "[S05 <-> S06] diffusion S";
  D_S06S07_S: S06__S -> S07__S; Dx_sin_S*(S06__S - S07__S); D_S06S07_S is "[S06 <-> S07] diffusion S";
  D_S07S08_S: S07__S -> S08__S; Dx_sin_S*(S07__S - S08__S); D_S07S08_S is "[S07 <-> S08] diffusion S";
  D_S08S09_S: S08__S -> S09__S; Dx_sin_S*(S08__S - S09__S); D_S08S09_S is "[S08 <-> S09] diffusion S";
  D_S09S10_S: S09__S -> S10__S; Dx_sin_S*(S09__S - S10__S); D_S09S10_S is "[S09 <-> S10] diffusion S";
  D_S10S11_S: S10__S -> S11__S; Dx_sin_S*(S10__S - S11__S); D_S10S11_S is "[S10 <-> S11] diffusion S";
  D_S11S12_S: S11__S -> S12__S; Dx_sin_S*(S11__S - S12__S); D_S11S12_S is "[S11 <-> S12] diffusion S";
  D_S12S13_S: S12__S -> S13__S; Dx_sin_S*(S12__S - S13__S); D_S12S13_S is "[S12 <-> S13] diffusion S";
  D_S13S14_S: S13__S -> S14__S; Dx_sin_S*(S13__S - S14__S); D_S13S14_S is "[S13 <-> S14] diffusion S";
  D_S14S15_S: S14__S -> S15__S; Dx_sin_S*(S14__S - S15__S); D_S14S15_S is "[S14 <-> S15] diffusion S";
  D_S15S16_S: S15__S -> S16__S; Dx_sin_S*(S15__S - S16__S); D_S15S16_S is "[S15 <-> S16] diffusion S";
  D_S16S17_S: S16__S -> S17__S; Dx_sin_S*(S16__S - S17__S); D_S16S17_S is "[S16 <-> S17] diffusion S";
  D_S17S18_S: S17__S -> S18__S; Dx_sin_S*(S17__S - S18__S); D_S17S18_S is "[S17 <-> S18] diffusion S";
  D_S18S19_S: S18__S -> S19__S; Dx_sin_S*(S18__S - S19__S); D_S18S19_S is "[S18 <-> S19] diffusion S";
  D_S19S20_S: S19__S -> S20__S; Dx_sin_S*(S19__S - S20__S); D_S19S20_S is "[S19 <-> S20] diffusion S";
  D_S20PV_S: S20__S -> PV__S; Dx_sin_S*(S20__S - PV__S); D_S20PV_S is "[S20 <-> PV] diffusion S";
  D_D01D02_S: D01__S -> D02__S; Dx_dis_S*(D01__S - D02__S); D_D01D02_S is "[D01 <-> D02] diffusion S";
  D_D02D03_S: D02__S -> D03__S; Dx_dis_S*(D02__S - D03__S); D_D02D03_S is "[D02 <-> D03] diffusion S";
  D_D03D04_S: D03__S -> D04__S; Dx_dis_S*(D03__S - D04__S); D_D03D04_S is "[D03 <-> D04] diffusion S";
  D_D04D05_S: D04__S -> D05__S; Dx_dis_S*(D04__S - D05__S); D_D04D05_S is "[D04 <-> D05] diffusion S";
  D_D05D06_S: D05__S -> D06__S; Dx_dis_S*(D05__S - D06__S); D_D05D06_S is "[D05 <-> D06] diffusion S";
  D_D06D07_S: D06__S -> D07__S; Dx_dis_S*(D06__S - D07__S); D_D06D07_S is "[D06 <-> D07] diffusion S";
  D_D07D08_S: D07__S -> D08__S; Dx_dis_S*(D07__S - D08__S); D_D07D08_S is "[D07 <-> D08] diffusion S";
  D_D08D09_S: D08__S -> D09__S; Dx_dis_S*(D08__S - D09__S); D_D08D09_S is "[D08 <-> D09] diffusion S";
  D_D09D10_S: D09__S -> D10__S; Dx_dis_S*(D09__S - D10__S); D_D09D10_S is "[D09 <-> D10] diffusion S";
  D_D10D11_S: D10__S -> D11__S; Dx_dis_S*(D10__S - D11__S); D_D10D11_S is "[D10 <-> D11] diffusion S";
  D_D11D12_S: D11__S -> D12__S; Dx_dis_S*(D11__S - D12__S); D_D11D12_S is "[D11 <-> D12] diffusion S";
  D_D12D13_S: D12__S -> D13__S; Dx_dis_S*(D12__S - D13__S); D_D12D13_S is "[D12 <-> D13] diffusion S";
  D_D13D14_S: D13__S -> D14__S; Dx_dis_S*(D13__S - D14__S); D_D13D14_S is "[D13 <-> D14] diffusion S";
  D_D14D15_S: D14__S -> D15__S; Dx_dis_S*(D14__S - D15__S); D_D14D15_S is "[D14 <-> D15] diffusion S";
  D_D15D16_S: D15__S -> D16__S; Dx_dis_S*(D15__S - D16__S); D_D15D16_S is "[D15 <-> D16] diffusion S";
  D_D16D17_S: D16__S -> D17__S; Dx_dis_S*(D16__S - D17__S); D_D16D17_S is "[D16 <-> D17] diffusion S";
  D_D17D18_S: D17__S -> D18__S; Dx_dis_S*(D17__S - D18__S); D_D17D18_S is "[D17 <-> D18] diffusion S";
  D_D18D19_S: D18__S -> D19__S; Dx_dis_S*(D18__S - D19__S); D_D18D19_S is "[D18 <-> D19] diffusion S";
  D_D19D20_S: D19__S -> D20__S; Dx_dis_S*(D19__S - D20__S); D_D19D20_S is "[D19 <-> D20] diffusion S";
  D_S01D01_S: S01__S -> D01__S; Dy_sindis_S*(S01__S - D01__S); D_S01D01_S is "[S01 <-> D01] diffusion S";
  D_S02D02_S: S02__S -> D02__S; Dy_sindis_S*(S02__S - D02__S); D_S02D02_S is "[S02 <-> D02] diffusion S";
  D_S03D03_S: S03__S -> D03__S; Dy_sindis_S*(S03__S - D03__S); D_S03D03_S is "[S03 <-> D03] diffusion S";
  D_S04D04_S: S04__S -> D04__S; Dy_sindis_S*(S04__S - D04__S); D_S04D04_S is "[S04 <-> D04] diffusion S";
  D_S05D05_S: S05__S -> D05__S; Dy_sindis_S*(S05__S - D05__S); D_S05D05_S is "[S05 <-> D05] diffusion S";
  D_S06D06_S: S06__S -> D06__S; Dy_sindis_S*(S06__S - D06__S); D_S06D06_S is "[S06 <-> D06] diffusion S";
  D_S07D07_S: S07__S -> D07__S; Dy_sindis_S*(S07__S - D07__S); D_S07D07_S is "[S07 <-> D07] diffusion S";
  D_S08D08_S: S08__S -> D08__S; Dy_sindis_S*(S08__S - D08__S); D_S08D08_S is "[S08 <-> D08] diffusion S";
  D_S09D09_S: S09__S -> D09__S; Dy_sindis_S*(S09__S - D09__S); D_S09D09_S is "[S09 <-> D09] diffusion S";
  D_S10D10_S: S10__S -> D10__S; Dy_sindis_S*(S10__S - D10__S); D_S10D10_S is "[S10 <-> D10] diffusion S";
  D_S11D11_S: S11__S -> D11__S; Dy_sindis_S*(S11__S - D11__S); D_S11D11_S is "[S11 <-> D11] diffusion S";
  D_S12D12_S: S12__S -> D12__S; Dy_sindis_S*(S12__S - D12__S); D_S12D12_S is "[S12 <-> D12] diffusion S";
  D_S13D13_S: S13__S -> D13__S; Dy_sindis_S*(S13__S - D13__S); D_S13D13_S is "[S13 <-> D13] diffusion S";
  D_S14D14_S: S14__S -> D14__S; Dy_sindis_S*(S14__S - D14__S); D_S14D14_S is "[S14 <-> D14] diffusion S";
  D_S15D15_S: S15__S -> D15__S; Dy_sindis_S*(S15__S - D15__S); D_S15D15_S is "[S15 <-> D15] diffusion S";
  D_S16D16_S: S16__S -> D16__S; Dy_sindis_S*(S16__S - D16__S); D_S16D16_S is "[S16 <-> D16] diffusion S";
  D_S17D17_S: S17__S -> D17__S; Dy_sindis_S*(S17__S - D17__S); D_S17D17_S is "[S17 <-> D17] diffusion S";
  D_S18D18_S: S18__S -> D18__S; Dy_sindis_S*(S18__S - D18__S); D_S18D18_S is "[S18 <-> D18] diffusion S";
  D_S19D19_S: S19__S -> D19__S; Dy_sindis_S*(S19__S - D19__S); D_S19D19_S is "[S19 <-> D19] diffusion S";
  D_S20D20_S: S20__S -> D20__S; Dy_sindis_S*(S20__S - D20__S); D_S20D20_S is "[S20 <-> D20] diffusion S";
  D_PPS01_P: $PP__P -> S01__P; Dx_sin_P*(PP__P - S01__P); D_PPS01_P is "[PP <-> S01] diffusion P";
  D_S01S02_P: S01__P -> S02__P; Dx_sin_P*(S01__P - S02__P); D_S01S02_P is "[S01 <-> S02] diffusion P";
  D_S02S03_P: S02__P -> S03__P; Dx_sin_P*(S02__P - S03__P); D_S02S03_P is "[S02 <-> S03] diffusion P";
  D_S03S04_P: S03__P -> S04__P; Dx_sin_P*(S03__P - S04__P); D_S03S04_P is "[S03 <-> S04] diffusion P";
  D_S04S05_P: S04__P -> S05__P; Dx_sin_P*(S04__P - S05__P); D_S04S05_P is "[S04 <-> S05] diffusion P";
  D_S05S06_P: S05__P -> S06__P; Dx_sin_P*(S05__P - S06__P); D_S05S06_P is "[S05 <-> S06] diffusion P";
  D_S06S07_P: S06__P -> S07__P; Dx_sin_P*(S06__P - S07__P); D_S06S07_P is "[S06 <-> S07] diffusion P";
  D_S07S08_P: S07__P -> S08__P; Dx_sin_P*(S07__P - S08__P); D_S07S08_P is "[S07 <-> S08] diffusion P";
  D_S08S09_P: S08__P -> S09__P; Dx_sin_P*(S08__P - S09__P); D_S08S09_P is "[S08 <-> S09] diffusion P";
  D_S09S10_P: S09__P -> S10__P; Dx_sin_P*(S09__P - S10__P); D_S09S10_P is "[S09 <-> S10] diffusion P";
  D_S10S11_P: S10__P -> S11__P; Dx_sin_P*(S10__P - S11__P); D_S10S11_P is "[S10 <-> S11] diffusion P";
  D_S11S12_P: S11__P -> S12__P; Dx_sin_P*(S11__P - S12__P); D_S11S12_P is "[S11 <-> S12] diffusion P";
  D_S12S13_P: S12__P -> S13__P; Dx_sin_P*(S12__P - S13__P); D_S12S13_P is "[S12 <-> S13] diffusion P";
  D_S13S14_P: S13__P -> S14__P; Dx_sin_P*(S13__P - S14__P); D_S13S14_P is "[S13 <-> S14] diffusion P";
  D_S14S15_P: S14__P -> S15__P; Dx_sin_P*(S14__P - S15__P); D_S14S15_P is "[S14 <-> S15] diffusion P";
  D_S15S16_P: S15__P -> S16__P; Dx_sin_P*(S15__P - S16__P); D_S15S16_P is "[S15 <-> S16] diffusion P";
  D_S16S17_P: S16__P -> S17__P; Dx_sin_P*(S16__P - S17__P); D_S16S17_P is "[S16 <-> S17] diffusion P";
  D_S17S18_P: S17__P -> S18__P; Dx_sin_P*(S17__P - S18__P); D_S17S18_P is "[S17 <-> S18] diffusion P";
  D_S18S19_P: S18__P -> S19__P; Dx_sin_P*(S18__P - S19__P); D_S18S19_P is "[S18 <-> S19] diffusion P";
  D_S19S20_P: S19__P -> S20__P; Dx_sin_P*(S19__P - S20__P); D_S19S20_P is "[S19 <-> S20] diffusion P";
  D_S20PV_P: S20__P -> PV__P; Dx_sin_P*(S20__P - PV__P); D_S20PV_P is "[S20 <-> PV] diffusion P";
  D_D01D02_P: D01__P -> D02__P; Dx_dis_P*(D01__P - D02__P); D_D01D02_P is "[D01 <-> D02] diffusion P";
  D_D02D03_P: D02__P -> D03__P; Dx_dis_P*(D02__P - D03__P); D_D02D03_P is "[D02 <-> D03] diffusion P";
  D_D03D04_P: D03__P -> D04__P; Dx_dis_P*(D03__P - D04__P); D_D03D04_P is "[D03 <-> D04] diffusion P";
  D_D04D05_P: D04__P -> D05__P; Dx_dis_P*(D04__P - D05__P); D_D04D05_P is "[D04 <-> D05] diffusion P";
  D_D05D06_P: D05__P -> D06__P; Dx_dis_P*(D05__P - D06__P); D_D05D06_P is "[D05 <-> D06] diffusion P";
  D_D06D07_P: D06__P -> D07__P; Dx_dis_P*(D06__P - D07__P); D_D06D07_P is "[D06 <-> D07] diffusion P";
  D_D07D08_P: D07__P -> D08__P; Dx_dis_P*(D07__P - D08__P); D_D07D08_P is "[D07 <-> D08] diffusion P";
  D_D08D09_P: D08__P -> D09__P; Dx_dis_P*(D08__P - D09__P); D_D08D09_P is "[D08 <-> D09] diffusion P";
  D_D09D10_P: D09__P -> D10__P; Dx_dis_P*(D09__P - D10__P); D_D09D10_P is "[D09 <-> D10] diffusion P";
  D_D10D11_P: D10__P -> D11__P; Dx_dis_P*(D10__P - D11__P); D_D10D11_P is "[D10 <-> D11] diffusion P";
  D_D11D12_P: D11__P -> D12__P; Dx_dis_P*(D11__P - D12__P); D_D11D12_P is "[D11 <-> D12] diffusion P";
  D_D12D13_P: D12__P -> D13__P; Dx_dis_P*(D12__P - D13__P); D_D12D13_P is "[D12 <-> D13] diffusion P";
  D_D13D14_P: D13__P -> D14__P; Dx_dis_P*(D13__P - D14__P); D_D13D14_P is "[D13 <-> D14] diffusion P";
  D_D14D15_P: D14__P -> D15__P; Dx_dis_P*(D14__P - D15__P); D_D14D15_P is "[D14 <-> D15] diffusion P";
  D_D15D16_P: D15__P -> D16__P; Dx_dis_P*(D15__P - D16__P); D_D15D16_P is "[D15 <-> D16] diffusion P";
  D_D16D17_P: D16__P -> D17__P; Dx_dis_P*(D16__P - D17__P); D_D16D17_P is "[D16 <-> D17] diffusion P";
  D_D17D18_P: D17__P -> D18__P; Dx_dis_P*(D17__P - D18__P); D_D17D18_P is "[D17 <-> D18] diffusion P";
  D_D18D19_P: D18__P -> D19__P; Dx_dis_P*(D18__P - D19__P); D_D18D19_P is "[D18 <-> D19] diffusion P";
  D_D19D20_P: D19__P -> D20__P; Dx_dis_P*(D19__P - D20__P); D_D19D20_P is "[D19 <-> D20] diffusion P";
  D_S01D01_P: S01__P -> D01__P; Dy_sindis_P*(S01__P - D01__P); D_S01D01_P is "[S01 <-> D01] diffusion P";
  D_S02D02_P: S02__P -> D02__P; Dy_sindis_P*(S02__P - D02__P); D_S02D02_P is "[S02 <-> D02] diffusion P";
  D_S03D03_P: S03__P -> D03__P; Dy_sindis_P*(S03__P - D03__P); D_S03D03_P is "[S03 <-> D03] diffusion P";
  D_S04D04_P: S04__P -> D04__P; Dy_sindis_P*(S04__P - D04__P); D_S04D04_P is "[S04 <-> D04] diffusion P";
  D_S05D05_P: S05__P -> D05__P; Dy_sindis_P*(S05__P - D05__P); D_S05D05_P is "[S05 <-> D05] diffusion P";
  D_S06D06_P: S06__P -> D06__P; Dy_sindis_P*(S06__P - D06__P); D_S06D06_P is "[S06 <-> D06] diffusion P";
  D_S07D07_P: S07__P -> D07__P; Dy_sindis_P*(S07__P - D07__P); D_S07D07_P is "[S07 <-> D07] diffusion P";
  D_S08D08_P: S08__P -> D08__P; Dy_sindis_P*(S08__P - D08__P); D_S08D08_P is "[S08 <-> D08] diffusion P";
  D_S09D09_P: S09__P -> D09__P; Dy_sindis_P*(S09__P - D09__P); D_S09D09_P is "[S09 <-> D09] diffusion P";
  D_S10D10_P: S10__P -> D10__P; Dy_sindis_P*(S10__P - D10__P); D_S10D10_P is "[S10 <-> D10] diffusion P";
  D_S11D11_P: S11__P -> D11__P; Dy_sindis_P*(S11__P - D11__P); D_S11D11_P is "[S11 <-> D11] diffusion P";
  D_S12D12_P: S12__P -> D12__P; Dy_sindis_P*(S12__P - D12__P); D_S12D12_P is "[S12 <-> D12] diffusion P";
  D_S13D13_P: S13__P -> D13__P; Dy_sindis_P*(S13__P - D13__P); D_S13D13_P is "[S13 <-> D13] diffusion P";
  D_S14D14_P: S14__P -> D14__P; Dy_sindis_P*(S14__P - D14__P); D_S14D14_P is "[S14 <-> D14] diffusion P";
  D_S15D15_P: S15__P -> D15__P; Dy_sindis_P*(S15__P - D15__P); D_S15D15_P is "[S15 <-> D15] diffusion P";
  D_S16D16_P: S16__P -> D16__P; Dy_sindis_P*(S16__P - D16__P); D_S16D16_P is "[S16 <-> D16] diffusion P";
  D_S17D17_P: S17__P -> D17__P; Dy_sindis_P*(S17__P - D17__P); D_S17D17_P is "[S17 <-> D17] diffusion P";
  D_S18D18_P: S18__P -> D18__P; Dy_sindis_P*(S18__P - D18__P); D_S18D18_P is "[S18 <-> D18] diffusion P";
  D_S19D19_P: S19__P -> D19__P; Dy_sindis_P*(S19__P - D19__P); D_S19D19_P is "[S19 <-> D19] diffusion P";
  D_S20D20_P: S20__P -> D20__P; Dy_sindis_P*(S20__P - D20__P); D_S20D20_P is "[S20 <-> D20] diffusion P";

  // Unit definitions:
  unit s = second;
  unit kg = kilogram;
  unit m = metre;
  unit m2 = metre^2;
  unit m3 = metre^3;
  unit per_s = 1 / second;
  unit mole_per_s = mole / second;
  unit mole_per_s_per_mM = metre^3 / second;
  unit mole_per_s_per_mM2 = metre^6 / (mole * second);
  unit m_per_s = metre / second;
  unit m2_per_s = metre^2 / second;
  unit m3_per_s = metre^3 / second;
  unit mM = mole / metre^3;
  unit mM_s = mole * second / metre^3;
  unit per_mM = metre^3 / mole;
  unit per_m2 = 1 / metre^2;
  unit per_m3 = 1 / metre^3;
  unit kg_per_m3 = kilogram / metre^3;
  unit m3_per_skg = metre^3 / (kilogram * second);
  unit Pa = pascal;
  unit Pa_s = pascal * second;
  unit Pa_s_per_m4 = pascal * second / metre^4;
  unit Pa_s_per_m3 = pascal * second / metre^3;
  unit Pa_s_per_m2 = pascal * second / metre^2;
  unit m6_per_Pa2_s2 = metre^6 / (pascal^2 * second^2);
end
