// SBML level 3 version 1

model sinusoidal_flow_Nc5_v3_xflow()
  // Koenig Sinusoidal Unit Model
  // Description
  // This is the template model of the sinusodial unit in SBML format.
  // The content of this model has been carefully created in a manual research effort.
  // This file has been created by Matthias Koenig.
  // Terms of use
  // Copyright © 2016 Matthias Koenig.
  // Redistribution and use of any part of this model, with or without modification, are permitted provided that the following conditions are met:
  // Redistributions of this SBML file must retain the above copyright notice, this list of conditions and the following disclaimer.
  // Redistributions in a different form must reproduce the above copyright notice, this list of conditions and the following disclaimer in the documentation and/or other materials provided with the distribution.
  // This model is distributed in the hope that it will be useful, but WITHOUT ANY WARRANTY; without even the implied warranty of MERCHANTABILITY or FITNESS FOR A PARTICULAR PURPOSE.
  // model units - substance: mole, time: s, volume: m3, area: m2, length: m, extent: mole

  // Compartments:
  compartment PP; PP has m3; PP is "[PP] periportal";
  compartment PV; PV has m3; PV is "[PV] perivenious";
  compartment S01_sinusoid; S01_sinusoid has m3; S01_sinusoid is "[S01] sinusoid";
  compartment D01; D01 has m3; D01 is "[D01] disse";
  compartment H01; H01 has m3; H01 is "[H01] hepatocyte";
  compartment S02_sinusoid; S02_sinusoid has m3; S02_sinusoid is "[S02] sinusoid";
  compartment D02; D02 has m3; D02 is "[D02] disse";
  compartment H02; H02 has m3; H02 is "[H02] hepatocyte";
  compartment S03_sinusoid; S03_sinusoid has m3; S03_sinusoid is "[S03] sinusoid";
  compartment D03; D03 has m3; D03 is "[D03] disse";
  compartment H03; H03 has m3; H03 is "[H03] hepatocyte";
  compartment S04_sinusoid; S04_sinusoid has m3; S04_sinusoid is "[S04] sinusoid";
  compartment D04; D04 has m3; D04 is "[D04] disse";
  compartment H04; H04 has m3; H04 is "[H04] hepatocyte";
  compartment S05_sinusoid; S05_sinusoid has m3; S05_sinusoid is "[S05] sinusoid";
  compartment D05; D05 has m3; D05 is "[D05] disse";
  compartment H05; H05 has m3; H05 is "[H05] hepatocyte";

  // Species:
  species $PP__S in PP = 1; PP__S is "[PP] substance S";
  species PV__S in PV = 1; PV__S is "[PV] substance S";
  species S01__S in S01_sinusoid = 1; S01__S is "[S01] substance S";
  species D01__S in D01 = 1; D01__S is "[D01] substance S";
  species S02__S in S02_sinusoid = 1; S02__S is "[S02] substance S";
  species D02__S in D02 = 1; D02__S is "[D02] substance S";
  species S03__S in S03_sinusoid = 1; S03__S is "[S03] substance S";
  species D03__S in D03 = 1; D03__S is "[D03] substance S";
  species S04__S in S04_sinusoid = 1; S04__S is "[S04] substance S";
  species D04__S in D04 = 1; D04__S is "[D04] substance S";
  species S05__S in S05_sinusoid = 1; S05__S is "[S05] substance S";
  species D05__S in D05 = 1; D05__S is "[D05] substance S";
  species $PP__P in PP = 0; PP__P is "[PP] product P";
  species PV__P in PV = 0; PV__P is "[PV] product P";
  species S01__P in S01_sinusoid = 0; S01__P is "[S01] product P";
  species D01__P in D01 = 0; D01__P is "[D01] product P";
  species S02__P in S02_sinusoid = 0; S02__P is "[S02] product P";
  species D02__P in D02 = 0; D02__P is "[D02] product P";
  species S03__P in S03_sinusoid = 0; S03__P is "[S03] product P";
  species D03__P in D03 = 0; D03__P is "[D03] product P";
  species S04__P in S04_sinusoid = 0; S04__P is "[S04] product P";
  species D04__P in D04 = 0; D04__P is "[D04] product P";
  species S05__P in S05_sinusoid = 0; S05__P is "[S05] product P";
  species D05__P in D05 = 0; D05__P is "[D05] product P";

  // Parameters:
  L = 0.0005 m; L is "sinusoidal length";
  y_sin = 4.4e-6 m; y_sin is "sinusoidal radius";
  y_end = 1.65e-7 m; y_end is "endothelial cell thickness";
  y_dis = 2.3e-6 m; y_dis is "width space of Disse";
  y_cell = 9.4e-6 m; y_cell is "width hepatocyte";
  N_fen = 10000000000000 per_m2; N_fen is "fenestrations per area";
  r_fen = 5.35e-8 m; r_fen is "fenestration radius";
  rho_liv = 1250 kg_per_m3; rho_liv is "liver density";
  f_tissue = 0.8 dimensionless; f_tissue is "parenchymal fraction of liver";
  flow_sin = 0.000229 m_per_s; flow_sin is "sinusoidal flow velocity";
  Nc = 5 dimensionless; Nc is "cells in sinusoidal unit";
  DS = 9.1e-10 m2_per_s; DS is "diffusion constant S";
  r_S = 3.6e-10 m; r_S is "effective radius S";
  DP = 7.2e-10 m2_per_s; DP is "diffusion constant P";
  r_P = 4.4e-10 m; r_P is "effective radius P";
  x_cell has m; x_cell is "length cell compartment";
  x_sin has m; x_sin is "length sinusoidal compartment";
  A_sin has m2; A_sin is "cross section sinusoid";
  A_dis has m2; A_dis is "cross section space of Disse";
  A_sindis has m2; A_sindis is "exchange area between sinusoid and Disse";
  A_sinunit has m2; A_sinunit is "cross section sinusoidal unit";
  Vol_sin has m3; Vol_sin is "volume sinusoidal compartment";
  Vol_dis has m3; Vol_dis is "volume Disse compartment";
  Vol_cell has m3; Vol_cell is "volume cell compartment";
  Vol_pp has m3; Vol_pp is "volume periportal";
  Vol_pv has m3; Vol_pv is "volume perivenious";
  Vol_sinunit has m3; Vol_sinunit is "total volume sinusoidal unit";
  f_sin has dimensionless; f_sin is "sinusoidal fraction of volume";
  f_dis has dimensionless; f_dis is "Disse fraction of volume";
  f_cell has dimensionless; f_cell is "cell fraction of volume";
  f_fen has dimensionless; f_fen is "fenestration porosity";
  Q_sinunit has m3_per_s; Q_sinunit is "volume flow sinusoid";
  Dx_sin_S has m3_per_s;
  Dx_dis_S has m3_per_s;
  Dy_sindis_S has m3_per_s;
  Dx_sin_P has m3_per_s;
  Dx_dis_P has m3_per_s;
  Dy_sindis_P has m3_per_s;

  // Assignment rules:
  PP := Vol_pp;
  PV := Vol_pv;
  S01_sinusoid := Vol_sin;
  D01 := Vol_dis;
  H01 := Vol_cell;
  S02_sinusoid := Vol_sin;
  D02 := Vol_dis;
  H02 := Vol_cell;
  S03_sinusoid := Vol_sin;
  D03 := Vol_dis;
  H03 := Vol_cell;
  S04_sinusoid := Vol_sin;
  D04 := Vol_dis;
  H04 := Vol_cell;
  S05_sinusoid := Vol_sin;
  D05 := Vol_dis;
  H05 := Vol_cell;
  x_cell := L/Nc;
  x_sin := x_cell;
  A_sin := pi*y_sin^2;
  A_dis := pi*(y_sin + y_end + y_dis)^2 - pi*(y_sin + y_end)^2;
  A_sindis := 2*pi*y_sin*x_sin;
  A_sinunit := pi*(y_sin + y_end + y_dis + y_cell)^2;
  Vol_sin := A_sin*x_sin;
  Vol_dis := A_dis*x_sin;
  Vol_cell := pi*x_cell*((y_sin + y_end + y_dis + y_cell)^2 - (y_sin + y_end + y_dis)^2);
  Vol_pp := Vol_sin;
  Vol_pv := Vol_sin;
  Vol_sinunit := L*pi*(y_sin + y_end + y_dis + y_cell)^2;
  f_sin := Vol_sin/(A_sinunit*x_sin);
  f_dis := Vol_dis/(A_sinunit*x_sin);
  f_cell := Vol_cell/(A_sinunit*x_sin);
  f_fen := N_fen*pi*r_fen^2;
  Q_sinunit := pi*y_sin^2*flow_sin;
  Dx_sin_S := DS/x_sin*A_sin;
  Dx_dis_S := DS/x_sin*A_dis;
  Dy_sindis_S := DS/y_dis*f_fen*A_sindis*(1 - r_S/r_fen)^2*(1 - 2.104*r_S/r_fen + 2.09*(r_S/r_fen)^3 - 0.95*(r_S/r_fen)^5);
  Dx_sin_P := DP/x_sin*A_sin;
  Dx_dis_P := DP/x_sin*A_dis;
  Dy_sindis_P := DP/y_dis*f_fen*A_sindis*(1 - r_P/r_fen)^2*(1 - 2.104*r_P/r_fen + 2.09*(r_P/r_fen)^3 - 0.95*(r_P/r_fen)^5);

  // Reactions:
  F_PPS01_S: $PP__S => S01__S; Q_sinunit*PP__S; F_PPS01_S is "[PP -> S01] convection S";
  F_S01S02_S: S01__S => S02__S; Q_sinunit*S01__S; F_S01S02_S is "[S01 -> S02] convection S";
  F_S02S03_S: S02__S => S03__S; Q_sinunit*S02__S; F_S02S03_S is "[S02 -> S03] convection S";
  F_S03S04_S: S03__S => S04__S; Q_sinunit*S03__S; F_S03S04_S is "[S03 -> S04] convection S";
  F_S04S05_S: S04__S => S05__S; Q_sinunit*S04__S; F_S04S05_S is "[S04 -> S05] convection S";
  F_S05PV_S: S05__S => PV__S; Q_sinunit*S05__S; F_S05PV_S is "[S05 -> PV] convection S";
  F_PVNONE_S: PV__S => ; Q_sinunit*PV__S; F_PVNONE_S is "[PV -> ] convection S";
  F_PPS01_P: $PP__P => S01__P; Q_sinunit*PP__P; F_PPS01_P is "[PP -> S01] convection P";
  F_S01S02_P: S01__P => S02__P; Q_sinunit*S01__P; F_S01S02_P is "[S01 -> S02] convection P";
  F_S02S03_P: S02__P => S03__P; Q_sinunit*S02__P; F_S02S03_P is "[S02 -> S03] convection P";
  F_S03S04_P: S03__P => S04__P; Q_sinunit*S03__P; F_S03S04_P is "[S03 -> S04] convection P";
  F_S04S05_P: S04__P => S05__P; Q_sinunit*S04__P; F_S04S05_P is "[S04 -> S05] convection P";
  F_S05PV_P: S05__P => PV__P; Q_sinunit*S05__P; F_S05PV_P is "[S05 -> PV] convection P";
  F_PVNONE_P: PV__P => ; Q_sinunit*PV__P; F_PVNONE_P is "[PV -> ] convection P";
  D_PPS01_S: $PP__S -> S01__S; Dx_sin_S*(PP__S - S01__S); D_PPS01_S is "[PP <-> S01] diffusion S";
  D_S01S02_S: S01__S -> S02__S; Dx_sin_S*(S01__S - S02__S); D_S01S02_S is "[S01 <-> S02] diffusion S";
  D_S02S03_S: S02__S -> S03__S; Dx_sin_S*(S02__S - S03__S); D_S02S03_S is "[S02 <-> S03] diffusion S";
  D_S03S04_S: S03__S -> S04__S; Dx_sin_S*(S03__S - S04__S); D_S03S04_S is "[S03 <-> S04] diffusion S";
  D_S04S05_S: S04__S -> S05__S; Dx_sin_S*(S04__S - S05__S); D_S04S05_S is "[S04 <-> S05] diffusion S";
  D_S05PV_S: S05__S -> PV__S; Dx_sin_S*(S05__S - PV__S); D_S05PV_S is "[S05 <-> PV] diffusion S";
  D_D01D02_S: D01__S -> D02__S; Dx_dis_S*(D01__S - D02__S); D_D01D02_S is "[D01 <-> D02] diffusion S";
  D_D02D03_S: D02__S -> D03__S; Dx_dis_S*(D02__S - D03__S); D_D02D03_S is "[D02 <-> D03] diffusion S";
  D_D03D04_S: D03__S -> D04__S; Dx_dis_S*(D03__S - D04__S); D_D03D04_S is "[D03 <-> D04] diffusion S";
  D_D04D05_S: D04__S -> D05__S; Dx_dis_S*(D04__S - D05__S); D_D04D05_S is "[D04 <-> D05] diffusion S";
  D_S01D01_S: S01__S -> D01__S; Dy_sindis_S*(S01__S - D01__S); D_S01D01_S is "[S01 <-> D01] diffusion S";
  D_S02D02_S: S02__S -> D02__S; Dy_sindis_S*(S02__S - D02__S); D_S02D02_S is "[S02 <-> D02] diffusion S";
  D_S03D03_S: S03__S -> D03__S; Dy_sindis_S*(S03__S - D03__S); D_S03D03_S is "[S03 <-> D03] diffusion S";
  D_S04D04_S: S04__S -> D04__S; Dy_sindis_S*(S04__S - D04__S); D_S04D04_S is "[S04 <-> D04] diffusion S";
  D_S05D05_S: S05__S -> D05__S; Dy_sindis_S*(S05__S - D05__S); D_S05D05_S is "[S05 <-> D05] diffusion S";
  D_PPS01_P: $PP__P -> S01__P; Dx_sin_P*(PP__P - S01__P); D_PPS01_P is "[PP <-> S01] diffusion P";
  D_S01S02_P: S01__P -> S02__P; Dx_sin_P*(S01__P - S02__P); D_S01S02_P is "[S01 <-> S02] diffusion P";
  D_S02S03_P: S02__P -> S03__P; Dx_sin_P*(S02__P - S03__P); D_S02S03_P is "[S02 <-> S03] diffusion P";
  D_S03S04_P: S03__P -> S04__P; Dx_sin_P*(S03__P - S04__P); D_S03S04_P is "[S03 <-> S04] diffusion P";
  D_S04S05_P: S04__P -> S05__P; Dx_sin_P*(S04__P - S05__P); D_S04S05_P is "[S04 <-> S05] diffusion P";
  D_S05PV_P: S05__P -> PV__P; Dx_sin_P*(S05__P - PV__P); D_S05PV_P is "[S05 <-> PV] diffusion P";
  D_D01D02_P: D01__P -> D02__P; Dx_dis_P*(D01__P - D02__P); D_D01D02_P is "[D01 <-> D02] diffusion P";
  D_D02D03_P: D02__P -> D03__P; Dx_dis_P*(D02__P - D03__P); D_D02D03_P is "[D02 <-> D03] diffusion P";
  D_D03D04_P: D03__P -> D04__P; Dx_dis_P*(D03__P - D04__P); D_D03D04_P is "[D03 <-> D04] diffusion P";
  D_D04D05_P: D04__P -> D05__P; Dx_dis_P*(D04__P - D05__P); D_D04D05_P is "[D04 <-> D05] diffusion P";
  D_S01D01_P: S01__P -> D01__P; Dy_sindis_P*(S01__P - D01__P); D_S01D01_P is "[S01 <-> D01] diffusion P";
  D_S02D02_P: S02__P -> D02__P; Dy_sindis_P*(S02__P - D02__P); D_S02D02_P is "[S02 <-> D02] diffusion P";
  D_S03D03_P: S03__P -> D03__P; Dy_sindis_P*(S03__P - D03__P); D_S03D03_P is "[S03 <-> D03] diffusion P";
  D_S04D04_P: S04__P -> D04__P; Dy_sindis_P*(S04__P - D04__P); D_S04D04_P is "[S04 <-> D04] diffusion P";
  D_S05D05_P: S05__P -> D05__P; Dy_sindis_P*(S05__P - D05__P); D_S05D05_P is "[S05 <-> D05] diffusion P";

  // Unit definitions:
  unit s = second;
  unit kg = kilogram;
  unit m = metre;
  unit m2 = metre^2;
  unit m3 = metre^3;
  unit per_s = 1 / second;
  unit mole_per_s = mole / second;
  unit mole_per_s_per_mM = metre^3 / second;
  unit mole_per_s_per_mM2 = metre^6 / (mole * second);
  unit m_per_s = metre / second;
  unit m2_per_s = metre^2 / second;
  unit m3_per_s = metre^3 / second;
  unit mM = mole / metre^3;
  unit mM_s = mole * second / metre^3;
  unit per_mM = metre^3 / mole;
  unit per_m2 = 1 / metre^2;
  unit per_m3 = 1 / metre^3;
  unit kg_per_m3 = kilogram / metre^3;
  unit m3_per_skg = metre^3 / (kilogram * second);
  unit Pa = pascal;
  unit Pa_s = pascal * second;
  unit Pa_s_per_m4 = pascal * second / metre^4;
  unit Pa_s_per_m3 = pascal * second / metre^3;
  unit Pa_s_per_m2 = pascal * second / metre^2;
  unit m6_per_Pa2_s2 = metre^6 / (pascal^2 * second^2);
end
