// SBML level 3 version 1

model galactose_29()
  // Koenig Human Galactose Metabolism
  // Description
  // This is a metabolism model of Human galactose metabolism in SBML format.
  // The content of this model has been carefully created in a manual research effort.
  // This file has been produced by Matthias Koenig.
  // Terms of use
  // Copyright © 2015 Matthias Koenig.
  // Redistribution and use of any part of this model, with or without modification, are permitted provided that the following conditions are met:
  // Redistributions of this SBML file must retain the above copyright notice, this list of conditions and the following disclaimer.
  // Redistributions in a different form must reproduce the above copyright notice, this list of conditions and the following disclaimer in the documentation and/or other materials provided with the distribution.
  // This model is distributed in the hope that it will be useful, but WITHOUT ANY WARRANTY; without even the implied warranty of MERCHANTABILITY or FITNESS FOR A PARTICULAR PURPOSE.
  // model units - substance: mole, time: s, volume: m3, area: m2, length: m, extent: mole

  // Compartments:
  compartment h; h has m3; h is "hepatocyte";
  compartment c; c has m3; c is "cytosol";
  compartment e; e has m3; e is "external";
  compartment m; m has m2; m is "plasma membrane";  // 2-D

  // Species:
  species c__ppi in c = 0.008; c__ppi is "pyrophosphate";
  species e__h2oM in e = 0; e__h2oM is "water M*";
  species c__glc1p in c = 0.012; c__glc1p is "D-glucose 1-phophate";
  species $c__acptgal in c = 0; c__acptgal is "Acceptor-galactose";
  species $c__acpt in c = 0; c__acpt is "Acceptor (glc/gal)";
  species c__udpgal in c = 0.11; c__udpgal is "UDP-D-galactose";
  species c__udp in c = 0.09; c__udp is "UDP";
  species c__atp in c = 2.7; c__atp is "ATP";
  species c__utp in c = 0.27; c__utp is "UTP";
  species e__gal in e = 0.00012; e__gal is "D-galactose";
  species c__gal1pM in c = 0; c__gal1pM is "D-galactose 1-phosphate M*";
  species c__gal in c = 0.00012; c__gal is "D-galactose";
  species $c__acptgalM in c = 0; c__acptgalM is "Acceptor-galactose M*";
  species $c__acptglc in c = 0; c__acptglc is "Acceptor-glucose";
  species c__galtolM in c = 0; c__galtolM is "D-galactitol M*";
  species e__galM in e = 0; e__galM is "D-galactose M*";
  species $c__o2 in c = 0; c__o2 is "O2";
  species c__glc6p in c = 0.12; c__glc6p is "D-glucose 6-phosphate";
  species c__adp in c = 1.2; c__adp is "ADP";
  species h__h2oM in h = 0; h__h2oM is "water M*";
  species $c__co2 in c = 0; c__co2 is "CO2";
  species c__nadp in c = 0.1; c__nadp is "NADP";
  species $c__hydron in c = 0; c__hydron is "H+";
  species c__udpgalM in c = 0; c__udpgalM is "UDP-D-galactose M*";
  species c__galM in c = 0; c__galM is "D-galactose M*";
  species c__galtol in c = 0.001; c__galtol is "D-galactitol";
  species c__nadph in c = 0.1; c__nadph is "NADPH";
  species c__glc6pM in c = 0; c__glc6pM is "D-glucose 6-phosphate M*";
  species c__glc1pM in c = 0; c__glc1pM is "D-glucose 1-phophate M*";
  species c__udpglc in c = 0.34; c__udpglc is "UDP-D-glucose";
  species $c__h2o in c = 0; c__h2o is "water";
  species c__gal1p in c = 0.001; c__gal1p is "D-galactose 1-phosphate";
  species $c__h2 in c = 0; c__h2 is "H2";
  species $c__acptglcM in c = 0; c__acptglcM is "Acceptor-glucose M*";
  species c__udpglcM in c = 0; c__udpglcM is "UDP-D-glucose M*";
  species c__phos in c = 5; c__phos is "phosphate";

  // Parameters:
  scale_f = 0.31 per_m3; scale_f is "metabolic scaling factor";
  y_cell = 9.4e-6 m; y_cell is "width hepatocyte";
  x_cell = 2.5e-5 m; x_cell is "length hepatocyte";
  f_cyto = 0.4 dimensionless; f_cyto is "cytosolic fraction of hepatocyte";
  Nf = 1 dimensionless;
  deficiency = 0 dimensionless; deficiency is "type of galactosemia";
  REF_P = 1 mM; REF_P is "reference protein amount";
  f_tissue = 0.8 dimensionless; f_tissue is "parenchymal fraction of liver";
  Vol_e = Vol_h; Vol_e has m3; Vol_e is "volume external compartment";
  Vol_c = f_cyto*Vol_h; Vol_c has m3; Vol_c is "volume cytosol";
  A_m = x_cell*x_cell; A_m has m2; A_m is "area plasma membrane";
  Vol_h = x_cell*x_cell*y_cell; Vol_h has m3; Vol_h is "volume hepatocyte";
  c__gal_tot has mM;
  e__gal_tot has mM;
  c__udpglc_tot has mM;
  c__adp_bal has mM; c__adp_bal is "ADP balance";
  c__phos_bal has mM; c__phos_bal is "Phosphate balance";
  c__glc6p_tot has mM;
  c__gal1p_tot has mM;
  c__scale has dimensionless;
  c__galtol_tot has mM;
  c__glc1p_tot has mM;
  c__udpgal_tot has mM;
  c__udp_bal has mM; c__udp_bal is "UDP balance";
  c__nadp_bal has mM; c__nadp_bal is "NADP balance";
  GALK_PA = 0.024 mole;
  GALK_keq = 50 dimensionless;
  GALK_k_gal1p = 1.5 mM;
  GALK_k_adp = 0.8 mM;
  GALK_ki_gal1p = 5.3 mM;
  GALK_kcat = 8.7 per_s;
  GALK_k_gal = 0.14 mM;
  GALK_k_atp = 0.034 mM;
  c__GALK_P = 1 mM;
  c__GALK_V has mole_per_s_per_mM2;
  c__GALK_Vb has mole_per_s;
  c__GALK_Vmax has mole_per_s;
  c__GALK_dm has dimensionless;
  c__GALK_Vf has mole_per_s;
  IMP_f = 0.05 dimensionless;
  IMP_k_gal1p = 0.35 mM;
  c__IMP_P = 1 mM;
  c__IMP_dm has dimensionless;
  c__IMP_Vf has mole_per_s;
  c__IMP_Vmax has mole_per_s;
  ATPS_f = 100 dimensionless;
  ATPS_keq = 0.58 per_mM;
  ATPS_k_adp = 0.1 mM;
  ATPS_k_atp = 0.5 mM;
  ATPS_k_phos = 0.1 mM;
  c__ATPS_P = 1 mM;
  c__ATPS_Vmax has mole_per_s;
  ALDR_f = 1000000 dimensionless;
  ALDR_keq = 4 dimensionless;
  ALDR_k_gal = 40 mM;
  ALDR_k_galtol = 40 mM;
  ALDR_k_nadp = 0.1 mM;
  ALDR_k_nadph = 0.1 mM;
  c__ALDR_P = 1 mM;
  c__ALDR_Vb has mole_per_s;
  c__ALDR_V has mole_per_s_per_mM2;
  c__ALDR_Vmax has mole_per_s;
  c__ALDR_dm has dimensionless;
  c__ALDR_Vf has mole_per_s;
  NADPR_f = 1e-10 dimensionless;
  NADPR_keq = 1 dimensionless;
  NADPR_k_nadp = 0.015 mM;
  NADPR_ki_nadph = 0.01 mM;
  c__NADPR_P = 1 mM;
  c__NADPR_Vmax has mole_per_s;
  GALT_f = 0.01 dimensionless;
  GALT_keq = 1 dimensionless;
  GALT_k_glc1p = 0.37 mM;
  GALT_k_udpgal = 0.5 mM;
  GALT_ki_utp = 0.13 mM;
  GALT_ki_udp = 0.35 mM;
  GALT_vm = 804 dimensionless;
  GALT_k_gal1p = 1.25 mM;
  GALT_k_udpglc = 0.43 mM;
  c__GALT_P = 1 mM;
  c__GALT_Vf has mole_per_s;
  c__GALT_V has mole_per_s_per_mM2;
  c__GALT_Vmax has mole_per_s;
  c__GALT_Vb has mole_per_s;
  c__GALT_dm has dimensionless;
  GALE_f = 0.3 dimensionless;
  GALE_PA = 0.0278 s;
  GALE_kcat = 36 per_s;
  GALE_keq = 0.33 dimensionless;
  GALE_k_udpglc = 0.069 mM;
  GALE_k_udpgal = 0.3 mM;
  c__GALE_P = 1 mM;
  c__GALE_Vb has mole_per_s;
  c__GALE_V has mole_per_s_per_mM;
  c__GALE_Vmax has mole_per_s;
  c__GALE_dm has dimensionless;
  c__GALE_Vf has mole_per_s;
  UGP_f = 2000 dimensionless;
  UGP_keq = 0.45 dimensionless;
  UGP_k_utp = 0.563 mM;
  UGP_k_glc1p = 0.172 mM;
  UGP_k_udpglc = 0.049 mM;
  UGP_k_ppi = 0.166 mM;
  UGP_k_gal1p = 5 mM;
  UGP_k_udpgal = 0.42 mM;
  UGP_ki_utp = 0.643 mM;
  UGP_ki_udpglc = 0.643 mM;
  c__UGP_P = 1 mM;
  c__UGP_Vf has mole_per_s;
  c__UGP_V has mole_per_s_per_mM2;
  c__UGP_Vmax has mole_per_s;
  c__UGP_dm has dimensionless;
  c__UGP_Vb has mole_per_s;
  UGALP_f = 0.01 dimensionless;
  c__UGALP_Vb has mole_per_s;
  c__UGALP_V has mole_per_s_per_mM2;
  c__UGALP_Vf has mole_per_s;
  PPASE_f = 0.05 dimensionless;
  PPASE_k_ppi = 0.07 mM;
  PPASE_n = 4 dimensionless;
  c__PPASE_P = 1 mM;
  c__PPASE_Vmax has mole_per_s;
  NDKU_f = 2 dimensionless;
  NDKU_keq = 1 dimensionless;
  NDKU_k_atp = 1.33 mM;
  NDKU_k_adp = 0.042 mM;
  NDKU_k_utp = 27 mM;
  NDKU_k_udp = 0.19 mM;
  c__NDKU_P = 1 mM;
  c__NDKU_Vmax has mole_per_s;
  PGM1_f = 50 dimensionless;
  PGM1_keq = 10 dimensionless;
  PGM1_k_glc6p = 0.67 mM;
  PGM1_k_glc1p = 0.045 mM;
  c__PGM1_P = 1 mM;
  c__PGM1_Vb has mole_per_s;
  c__PGM1_V has mole_per_s_per_mM;
  c__PGM1_Vmax has mole_per_s;
  c__PGM1_dm has dimensionless;
  c__PGM1_Vf has mole_per_s;
  GLY_f = 0.1 dimensionless;
  GLY_k_glc6p = 0.12 mM;
  GLY_k_p = 0.2 mM;
  c__GLY_P = 1 mM;
  c__GLY_Vmax has mole_per_s;
  GTF_f = 0.02 dimensionless;
  GTF_k_udpgal = 0.1 mM;
  GTF_k_udpglc = 0.1 mM;
  c__GTF_P = 1 mM;
  c__GTFGAL_Vf has mole_per_s;
  c__GTF_Vmax has mole_per_s;
  c__GTFGLC_Vf has mole_per_s;
  H2OT_f = 8 mole_per_s;
  H2OT_k = 1 mM;
  c__H2OT_Vmax has mole_per_s;
  GLUT2_f = 17 mole_per_s;
  GLUT2_k_gal = 27.8 mM;
  c__GLUT2_P = 1 mM;
  c__GLUT2_dm has dimensionless;
  c__GLUT2_Vb has mole_per_s;
  c__GLUT2_V has mole_per_s_per_mM;
  c__GLUT2_Vf has mole_per_s;
  c__GLUT2_Vmax has mole_per_s;

  // Assignment rules:
  h := Vol_h;
  c := Vol_c;
  e := Vol_e;
  m := A_m;
  c__gal_tot := c__gal + c__galM;
  e__gal_tot := e__gal + e__galM;
  c__udpglc_tot := c__udpglc + c__udpglcM;
  c__adp_bal := c__atp + c__adp;
  c__phos_bal := 3*c__atp + 2*c__adp + 3*c__utp + 2*c__udp + c__phos + 2*c__ppi + c__glc1p + c__glc6p + c__gal1p + 2*c__udpglc + 2*c__udpgal + c__glc1pM + c__glc6pM + c__gal1pM + 2*c__udpglcM + 2*c__udpgalM;
  c__glc6p_tot := c__glc6p + c__glc6pM;
  c__gal1p_tot := c__gal1p + c__gal1pM;
  c__scale := scale_f*Vol_h;
  c__galtol_tot := c__galtol + c__galtolM;
  c__glc1p_tot := c__glc1p + c__glc1pM;
  c__udpgal_tot := c__udpgal + c__udpgalM;
  c__udp_bal := c__utp + c__udp + c__udpglc + c__udpgal + c__udpglcM + c__udpgalM;
  c__nadp_bal := c__nadp + c__nadph;
  c__GALK_V := c__GALK_Vmax/(GALK_k_gal*GALK_k_atp)*1/(1 + c__gal1p_tot/GALK_ki_gal1p)*1/c__GALK_dm;
  c__GALK_Vb := c__GALK_V*c__gal1p_tot*c__adp/GALK_keq;
  c__GALK_Vmax := c__scale*GALK_PA*GALK_kcat*c__GALK_P/REF_P;
  c__GALK_dm := (1 + c__gal_tot/GALK_k_gal)*(1 + c__atp/GALK_k_atp) + (1 + c__gal1p_tot/GALK_k_gal1p)*(1 + c__adp/GALK_k_adp) - 1;
  c__GALK_Vf := c__GALK_V*c__gal_tot*c__atp;
  c__IMP_dm := 1 + c__gal1p_tot/IMP_k_gal1p;
  c__IMP_Vf := c__IMP_Vmax/IMP_k_gal1p*c__gal1p_tot/c__IMP_dm;
  c__IMP_Vmax := IMP_f*c__GALK_Vmax*c__IMP_P/REF_P;
  c__ATPS_Vmax := ATPS_f*c__GALK_Vmax*c__ATPS_P/REF_P;
  c__ALDR_Vb := c__ALDR_V*c__galtol_tot*c__nadp/ALDR_keq;
  c__ALDR_V := c__ALDR_Vmax/(ALDR_k_gal*ALDR_k_nadp)*1/c__ALDR_dm;
  c__ALDR_Vmax := ALDR_f*c__GALK_Vmax*c__ALDR_P/REF_P;
  c__ALDR_dm := (1 + c__gal_tot/ALDR_k_gal)*(1 + c__nadph/ALDR_k_nadph) + (1 + c__galtol_tot/ALDR_k_galtol)*(1 + c__nadp/ALDR_k_nadp) - 1;
  c__ALDR_Vf := c__ALDR_V*c__gal_tot*c__nadph;
  c__NADPR_Vmax := NADPR_f*c__ALDR_Vmax*c__NADPR_P/REF_P;
  c__GALT_Vf := c__GALT_V*c__gal1p_tot*c__udpglc_tot;
  c__GALT_V := c__GALT_Vmax/(GALT_k_gal1p*GALT_k_udpglc)*1/c__GALT_dm;
  c__GALT_Vmax := c__GALT_P/REF_P*GALT_f*c__GALK_Vmax*GALT_vm;
  c__GALT_Vb := c__GALT_V*c__glc1p_tot*c__udpgal_tot/GALT_keq;
  c__GALT_dm := (1 + c__gal1p_tot/GALT_k_gal1p)*(1 + c__udpglc_tot/GALT_k_udpglc + c__udp/GALT_ki_udp + c__utp/GALT_ki_utp) + (1 + c__glc1p_tot/GALT_k_glc1p)*(1 + c__udpgal_tot/GALT_k_udpgal) - 1;
  c__GALE_Vb := c__GALE_V*c__udpgal_tot/GALE_keq;
  c__GALE_V := c__GALE_Vmax/GALE_k_udpglc*1/c__GALE_dm;
  c__GALE_Vmax := GALE_f*c__GALK_Vmax*GALE_PA*GALE_kcat*c__GALE_P/REF_P;
  c__GALE_dm := 1 + c__udpglc_tot/GALE_k_udpglc + c__udpgal_tot/GALE_k_udpgal;
  c__GALE_Vf := c__GALE_V*c__udpglc_tot;
  c__UGP_Vf := c__UGP_V*c__glc1p_tot*c__utp;
  c__UGP_V := c__UGP_Vmax/(UGP_k_utp*UGP_k_glc1p)*1/c__UGP_dm;
  c__UGP_Vmax := UGP_f*c__GALK_Vmax*c__UGP_P/REF_P;
  c__UGP_dm := (1 + c__utp/UGP_k_utp + c__udpglc_tot/UGP_ki_udpglc)*(1 + c__glc1p_tot/UGP_k_glc1p + c__gal1p_tot/UGP_k_gal1p) + (1 + c__udpglc_tot/UGP_k_udpglc + c__udpgal_tot/UGP_k_udpgal + c__utp/UGP_ki_utp)*(1 + c__ppi/UGP_k_ppi) - 1;
  c__UGP_Vb := c__UGP_V*c__udpglc_tot*c__ppi/UGP_keq;
  c__UGALP_Vb := c__UGALP_V*c__udpgal_tot*c__ppi/UGP_keq;
  c__UGALP_V := UGALP_f*c__UGP_Vmax/(UGP_k_utp*UGP_k_gal1p)*1/c__UGP_dm;
  c__UGALP_Vf := c__UGALP_V*c__gal1p_tot*c__utp;
  c__PPASE_Vmax := PPASE_f*c__UGP_Vmax*c__PPASE_P/REF_P;
  c__NDKU_Vmax := NDKU_f*c__UGP_Vmax*c__NDKU_P/REF_P;
  c__PGM1_Vb := c__PGM1_V*c__glc6p_tot/PGM1_keq;
  c__PGM1_V := c__PGM1_Vmax/PGM1_k_glc1p*1/c__PGM1_dm;
  c__PGM1_Vmax := PGM1_f*c__GALK_Vmax*c__PGM1_P/REF_P;
  c__PGM1_dm := 1 + c__glc1p_tot/PGM1_k_glc1p + c__glc6p_tot/PGM1_k_glc6p;
  c__PGM1_Vf := c__PGM1_V*c__glc1p_tot;
  c__GLY_Vmax := GLY_f*c__PGM1_Vmax*c__GLY_P/REF_P;
  c__GTFGAL_Vf := c__GTF_Vmax/GTF_k_udpgal*c__udpgal_tot/(1 + c__udpgal_tot/GTF_k_udpgal);
  c__GTF_Vmax := GTF_f*c__GALK_Vmax*c__GTF_P/REF_P;
  c__GTFGLC_Vf := 0*c__GTF_Vmax/GTF_k_udpglc*c__udpglc_tot/(1 + c__udpglc_tot/GTF_k_udpglc);
  c__H2OT_Vmax := H2OT_f/Nf*c__scale;
  c__GLUT2_dm := 1 + e__gal_tot/GLUT2_k_gal + c__gal_tot/GLUT2_k_gal;
  c__GLUT2_Vb := c__GLUT2_V*c__gal_tot;
  c__GLUT2_V := c__GLUT2_Vmax/GLUT2_k_gal*1/c__GLUT2_dm;
  c__GLUT2_Vf := c__GLUT2_V*e__gal_tot;
  c__GLUT2_Vmax := GLUT2_f/Nf*c__scale*c__GLUT2_P/REF_P;

  // Reactions:
  c__GALK: c__gal + c__atp -> c__gal1p + c__adp + $c__hydron; c__gal/c__gal_tot*c__GALK_Vf - c__gal1p/c__gal1p_tot*c__GALK_Vb; c__GALK is "Galactokinase [c__]";  // modifiers: c__galM, c__gal1pM
  c__GALKM: c__galM + c__atp => c__gal1pM + c__adp + $c__hydron; c__galM/c__gal_tot*c__GALK_Vf - c__gal1pM/c__gal1p_tot*c__GALK_Vb; c__GALKM is "Galactokinase M [c__]";  // modifiers: c__gal, c__gal1p
  c__IMP: c__gal1p + $c__h2o => c__gal + c__phos; c__gal1p/c__gal1p_tot*c__IMP_Vf; c__IMP is "Inositol monophosphatase [c__]";  // modifiers: c__gal1pM
  c__IMPM: c__gal1pM + $c__h2o => c__galM + c__phos; c__gal1pM/c__gal1p_tot*c__IMP_Vf; c__IMPM is "Inositol monophosphatase M [c__]";  // modifiers: c__gal1p
  c__ATPS: c__adp + c__phos + $c__hydron -> c__atp + $c__h2o; c__ATPS_Vmax/(ATPS_k_adp*ATPS_k_phos)*(c__adp*c__phos - c__atp/ATPS_keq)/((1 + c__adp/ATPS_k_adp)*(1 + c__phos/ATPS_k_phos) + c__atp/ATPS_k_atp); c__ATPS is "ATP synthase [c__]";
  c__ALDR: c__gal + c__nadph + $c__hydron -> c__galtol + c__nadp; c__gal/c__gal_tot*c__ALDR_Vf - c__galtol/c__galtol_tot*c__ALDR_Vb; c__ALDR is "Aldose reductase [c__]";  // modifiers: c__galM, c__galtolM
  c__ALDRM: c__galM + c__nadph + $c__hydron -> c__galtolM + c__nadp; c__galM/c__gal_tot*c__ALDR_Vf - c__galtolM/c__galtol_tot*c__ALDR_Vb; c__ALDRM is "Aldose reductase M [c__]";  // modifiers: c__gal, c__galtol
  c__NADPR: c__nadp + $c__h2 -> c__nadph + $c__hydron; c__NADPR_Vmax/NADPR_k_nadp*(c__nadp - c__nadph/NADPR_keq)/(1 + c__nadp/NADPR_k_nadp + c__nadph/NADPR_ki_nadph); c__NADPR is "NADP Reductase [c__]";
  c__GALT: c__gal1p + c__udpglc -> c__glc1p + c__udpgal; c__gal1p/c__gal1p_tot*c__udpglc/c__udpglc_tot*c__GALT_Vf - c__glc1p/c__glc1p_tot*c__udpgal/c__udpgal_tot*c__GALT_Vb; c__GALT is "Galactose-1-phosphate uridyl transferase [c__]";  // modifiers: c__utp, c__udp, c__gal1pM, c__udpglcM, c__udpgalM
  c__GALTM1: c__gal1pM + c__udpglc -> c__glc1p + c__udpgalM; c__gal1pM/c__gal1p_tot*c__udpglc/c__udpglc_tot*c__GALT_Vf - c__glc1p/c__glc1p_tot*c__udpgalM/c__udpgal_tot*c__GALT_Vb; c__GALTM1 is "Galactose-1-phosphate uridyl transferase M1 [c__]";  // modifiers: c__utp, c__udp, c__gal1p, c__udpglcM, c__glc1pM, c__udpgal
  c__GALTM2: c__gal1p + c__udpglcM -> c__glc1pM + c__udpgal; c__gal1p/c__gal1p_tot*c__udpglcM/c__udpglc_tot*c__GALT_Vf - c__glc1pM/c__glc1p_tot*c__udpgal/c__udpgal_tot*c__GALT_Vb; c__GALTM2 is "Galactose-1-phosphate uridyl transferase M2 [c__]";  // modifiers: c__utp, c__udp, c__gal1pM, c__udpglc, c__glc1p, c__udpgalM
  c__GALTM3: c__gal1pM + c__udpglcM -> c__glc1pM + c__udpgalM; c__gal1pM/c__gal1p_tot*c__udpglcM/c__udpglc_tot*c__GALT_Vf - c__glc1pM/c__glc1p_tot*c__udpgalM/c__udpgal_tot*c__GALT_Vb; c__GALTM3 is "Galactose-1-phosphate uridyl transferase M3 [c__]";  // modifiers: c__utp, c__udp, c__gal1p, c__udpglc, c__glc1p, c__udpgal
  c__GALE: c__udpglc -> c__udpgal; c__udpglc/c__udpglc_tot*c__GALE_Vf - c__udpgal/c__udpgal_tot*c__GALE_Vb; c__GALE is "UDP-glucose 4-epimerase [c__]";  // modifiers: c__udpglcM, c__udpgalM
  c__GALEM: c__udpglcM -> c__udpgalM; c__udpglcM/c__udpglc_tot*c__GALE_Vf - c__udpgalM/c__udpgal_tot*c__GALE_Vb; c__GALEM is "UDP-glucose 4-epimerase M [c__]";  // modifiers: c__udpglc, c__udpgal
  c__UGP: c__glc1p + c__utp + $c__hydron -> c__udpglc + c__ppi; c__glc1p/c__glc1p_tot*c__UGP_Vf - c__udpglc/c__udpglc_tot*c__UGP_Vb; c__UGP is "UDP-glucose pyrophosphorylase [c__]";  // modifiers: c__glc1pM, c__udpglcM, c__gal1p, c__gal1pM, c__udpgal, c__udpgalM
  c__UGPM: c__glc1pM + c__utp + $c__hydron -> c__udpglcM + c__ppi; c__glc1pM/c__glc1p_tot*c__UGP_Vf - c__udpglcM/c__udpglc_tot*c__UGP_Vb; c__UGPM is "UDP-glucose pyrophosphorylase M [c__]";  // modifiers: c__glc1p, c__udpglc, c__gal1p, c__gal1pM, c__udpgal, c__udpgalM
  c__UGALP: c__gal1p + c__utp + $c__hydron -> c__udpgal + c__ppi; c__gal1p/c__gal1p_tot*c__UGALP_Vf - c__udpgal/c__udpgal_tot*c__UGALP_Vb; c__UGALP is "UDP-galactose pyrophosphorylase [c__]";  // modifiers: c__glc1p, c__glc1pM, c__udpglc, c__udpglcM, c__gal1pM, c__udpgalM
  c__UGALPM: c__gal1pM + c__utp + $c__hydron -> c__udpgalM + c__ppi; c__gal1pM/c__gal1p_tot*c__UGALP_Vf - c__udpgalM/c__udpgal_tot*c__UGALP_Vb; c__UGALPM is "UDP-galactose pyrophosphorylase M [c__]";  // modifiers: c__glc1p, c__glc1pM, c__udpglc, c__udpglcM, c__gal1p, c__udpgal
  c__PPASE: c__ppi + $c__h2o => 2 c__phos + $c__hydron; c__PPASE_Vmax*c__ppi^PPASE_n/(c__ppi^PPASE_n + PPASE_k_ppi^PPASE_n); c__PPASE is "Pyrophosphatase [c__]";
  c__NDKU: c__atp + c__udp -> c__adp + c__utp; c__NDKU_Vmax/NDKU_k_atp/NDKU_k_udp*(c__atp*c__udp - c__adp*c__utp/NDKU_keq)/((1 + c__atp/NDKU_k_atp)*(1 + c__udp/NDKU_k_udp) + (1 + c__adp/NDKU_k_adp)*(1 + c__utp/NDKU_k_utp) - 1); c__NDKU is "ATP:UDP phosphotransferase [c__]";
  c__PGM1: c__glc1p -> c__glc6p; c__glc1p/c__glc1p_tot*c__PGM1_Vf - c__glc6p/c__glc6p_tot*c__PGM1_Vb; c__PGM1 is "Phosphoglucomutase-1 [c__]";  // modifiers: c__glc1pM, c__glc6pM
  c__PGM1M: c__glc1pM -> c__glc6pM; c__glc1pM/c__glc1p_tot*c__PGM1_Vf - c__glc6pM/c__glc6p_tot*c__PGM1_Vb; c__PGM1M is "Phosphoglucomutase-1 M [c__]";  // modifiers: c__glc1p, c__glc6p
  c__GLY: c__glc6p + 5 $c__o2 -> c__phos + 6 $c__co2 + 5 $c__h2o; c__GLY_Vmax/GLY_k_glc6p*(c__glc6p - GLY_k_glc6p)*c__phos/(c__phos + GLY_k_p); c__GLY is "Glycolysis [c__]";
  c__GLYM: c__glc6pM + 5 $c__o2 => c__phos + 6 $c__co2 + 5 $c__h2o; c__GLY_Vmax/GLY_k_glc6p*c__glc6pM*c__phos/(c__phos + GLY_k_p); c__GLYM is "Glycolysis M [c__]";
  c__GTFGAL: c__udpgal + $c__acpt => c__udp + $c__acptgal + $c__hydron; c__udpgal/c__udpgal_tot*c__GTFGAL_Vf; c__GTFGAL is "Glycosyltransferase galactose [c__]";  // modifiers: c__udpgalM
  c__GTFGALM: c__udpgalM + $c__acpt => c__udp + $c__acptgalM + $c__hydron; c__udpgalM/c__udpgal_tot*c__GTFGAL_Vf; c__GTFGALM is "Glycosyltransferase galactose M [c__]";  // modifiers: c__udpgal
  c__GTFGLC: c__udpglc + $c__acpt => c__udp + $c__acptglc + $c__hydron; c__udpglc/c__udpglc_tot*c__GTFGLC_Vf; c__GTFGLC is "Glycosyltransferase glucose [c__]";  // modifiers: c__udpglcM
  c__GTFGLCM: c__udpglcM + $c__acpt => c__udp + $c__acptglcM + $c__hydron; c__udpglcM/c__udpglc_tot*c__GTFGLC_Vf; c__GTFGLCM is "Glycosyltransferase glucose M [c__]";  // modifiers: c__udpglc
  e__H2OTM: e__h2oM -> h__h2oM; c__H2OT_Vmax/H2OT_k*(e__h2oM - h__h2oM); e__H2OTM is "H2O M transport [e__]";
  e__GLUT2_GAL: e__gal -> c__gal; e__gal/e__gal_tot*c__GLUT2_Vf - c__gal/c__gal_tot*c__GLUT2_Vb; e__GLUT2_GAL is "galactose transport [e__]";  // modifiers: e__galM, c__galM
  e__GLUT2_GALM: e__galM -> c__galM; e__galM/e__gal_tot*c__GLUT2_Vf - c__galM/c__gal_tot*c__GLUT2_Vb; e__GLUT2_GALM is "galactose transport M [e__]";  // modifiers: e__gal, c__gal

  // Unit definitions:
  unit Pa_s_per_m2 = pascal * second / metre^2;
  unit Pa_s_per_m3 = pascal * second / metre^3;
  unit Pa_s_per_m4 = pascal * second / metre^4;
  unit Pa = pascal;
  unit m_per_s = metre / second;
  unit per_m3 = 1 / metre^3;
  unit per_m2 = 1 / metre^2;
  unit mole_per_s = mole / second;
  unit m2_per_s = metre^2 / second;
  unit mole_per_s_per_mM2 = metre^6 / (mole * second);
  unit m3_per_skg = metre^3 / (kilogram * second);
  unit m2 = metre^2;
  unit mM_s = mole * second / metre^3;
  unit per_s = 1 / second;
  unit m3 = metre^3;
  unit mM = mole / metre^3;
  unit mole_per_s_per_mM = metre^3 / second;
  unit kg_per_m3 = kilogram / metre^3;
  unit per_mM = metre^3 / mole;
  unit m6_per_Pa2_s2 = metre^6 / (pascal^2 * second^2);
  unit kg = kilogram;
  unit m = metre;
  unit s = second;
  unit Pa_s = pascal * second;
  unit m3_per_s = metre^3 / second;
end
