// SBML level 3 version 1

model AssignmentTest_1()
  // model units - substance: mg, time: h, volume: litre, area: m2, length: m, extent: mg

  // Parameters:
  IVDOSE = 0 mg;
  D = PODOSE; D has mg;
  FVve = 0.0514 litre_per_kg;
  k1 = 0.1 litre_per_h;
  BW = 70 kg;
  Ave = IVDOSE; Ave has mg;
  PODOSE = 100 mg;
  Vve has litre;
  Cve has mg_per_litre;

  // Assignment rules:
  Vve := BW*FVve;
  Cve := Ave/Vve;

  // Rate rules:
  Ave' = -k1*Cve;

  // Unit definitions:
  unit mulitre_per_g = 1e-6 litre / gram;
  unit mg = 1e-3 gram;
  unit kg = 1000 gram;
  unit s_per_h = second / (3600 second);
  unit mg_per_g = 1e-3 gram / gram;
  unit mg_per_h = 1e-3 gram / (3600 second);
  unit ml_per_litre = 1e-3 litre / litre;
  unit m = metre;
  unit litre_per_kg = litre / (1000 gram);
  unit h = 3600 second;
  unit mulitre_per_min_mg = 1e-6 litre / (60 second * 1e-3 gram);
  unit min_per_h = 60 second / (3600 second);
  unit litre_per_h = litre / (3600 second);
  unit m2 = metre^2;
  unit ml_per_s = 1e-3 litre / second;
  unit mg_per_litre = 1e-3 gram / litre;
  unit per_h = 1 / (3600 second);
end
