// SBML level 3 version 1

model Galactose_v43_Nc2_core()
  // model units - substance: mole, time: s, volume: m3, area: m2, length: m, extent: mole

  // Compartments:
  compartment D01; D01 has m3; D01 is "[D01] disse";
  compartment D02; D02 has m3; D02 is "[D02] disse";
  compartment PP; PP has m3; PP is "[PP] periportal";
  compartment PV; PV has m3; PV is "[PV] perivenious";
  compartment S01_sinusoid; S01_sinusoid has m3; S01_sinusoid is "[S01] sinusoid";
  compartment S02_sinusoid; S02_sinusoid has m3; S02_sinusoid is "[S02] sinusoid";
  compartment H01; H01 has m3; H01 is "[H01] hepatocyte";
  compartment H02; H02 has m3; H02 is "[H02] hepatocyte";

  // Species:
  species D01__alb in D01 = 0; D01__alb is "[D01] albumin";
  species D01__gal in D01 = 0.00012; D01__gal is "[D01] D-galactose";
  species D01__galM in D01 = 0; D01__galM is "[D01] D-galactose M*";
  species D01__h2oM in D01 = 0; D01__h2oM is "[D01] water M*";
  species D01__rbcM in D01 = 0; D01__rbcM is "[D01] red blood cells M*";
  species D01__suc in D01 = 0; D01__suc is "[D01] sucrose";
  species D02__alb in D02 = 0; D02__alb is "[D02] albumin";
  species D02__gal in D02 = 0.00012; D02__gal is "[D02] D-galactose";
  species D02__galM in D02 = 0; D02__galM is "[D02] D-galactose M*";
  species D02__h2oM in D02 = 0; D02__h2oM is "[D02] water M*";
  species D02__rbcM in D02 = 0; D02__rbcM is "[D02] red blood cells M*";
  species D02__suc in D02 = 0; D02__suc is "[D02] sucrose";
  species $PP__alb in PP = 0; PP__alb is "[PP] albumin";
  species $PP__gal in PP = 0.00012; PP__gal is "[PP] D-galactose";
  species $PP__galM in PP = 0; PP__galM is "[PP] D-galactose M*";
  species $PP__h2oM in PP = 0; PP__h2oM is "[PP] water M*";
  species $PP__rbcM in PP = 0; PP__rbcM is "[PP] red blood cells M*";
  species $PP__suc in PP = 0; PP__suc is "[PP] sucrose";
  species PV__alb in PV = 0; PV__alb is "[PV] albumin";
  species PV__gal in PV = 0.00012; PV__gal is "[PV] D-galactose";
  species PV__galM in PV = 0; PV__galM is "[PV] D-galactose M*";
  species PV__h2oM in PV = 0; PV__h2oM is "[PV] water M*";
  species PV__rbcM in PV = 0; PV__rbcM is "[PV] red blood cells M*";
  species PV__suc in PV = 0; PV__suc is "[PV] sucrose";
  species S01__alb in S01_sinusoid = 0; S01__alb is "[S01] albumin";
  species S01__gal in S01_sinusoid = 0.00012; S01__gal is "[S01] D-galactose";
  species S01__galM in S01_sinusoid = 0; S01__galM is "[S01] D-galactose M*";
  species S01__h2oM in S01_sinusoid = 0; S01__h2oM is "[S01] water M*";
  species S01__rbcM in S01_sinusoid = 0; S01__rbcM is "[S01] red blood cells M*";
  species S01__suc in S01_sinusoid = 0; S01__suc is "[S01] sucrose";
  species S02__alb in S02_sinusoid = 0; S02__alb is "[S02] albumin";
  species S02__gal in S02_sinusoid = 0.00012; S02__gal is "[S02] D-galactose";
  species S02__galM in S02_sinusoid = 0; S02__galM is "[S02] D-galactose M*";
  species S02__h2oM in S02_sinusoid = 0; S02__h2oM is "[S02] water M*";
  species S02__rbcM in S02_sinusoid = 0; S02__rbcM is "[S02] red blood cells M*";
  species S02__suc in S02_sinusoid = 0; S02__suc is "[S02] sucrose";
  species H01__adp in H01 = 1.2; H01__adp is "[H01] ADP";
  species H01__atp in H01 = 2.7; H01__atp is "[H01] ATP";
  species H01__gal in H01 = 0.00012; H01__gal is "[H01] D-galactose";
  species H01__gal1p in H01 = 0.001; H01__gal1p is "[H01] D-galactose 1-phosphate";
  species H01__galM in H01 = 0; H01__galM is "[H01] D-galactose M*";
  species H01__galtol in H01 = 0.001; H01__galtol is "[H01] D-galactitol";
  species H01__glc1p in H01 = 0.012; H01__glc1p is "[H01] D-glucose 1-phophate";
  species H01__glc6p in H01 = 0.12; H01__glc6p is "[H01] D-glucose 6-phosphate";
  species H01__h2oM in H01 = 0; H01__h2oM is "[H01] water M*";
  species H01__nadp in H01 = 0.1; H01__nadp is "[H01] NADP";
  species H01__nadph in H01 = 0.1; H01__nadph is "[H01] NADPH";
  species H01__phos in H01 = 5; H01__phos is "[H01] phosphate";
  species H01__ppi in H01 = 0.008; H01__ppi is "[H01] pyrophosphate";
  species H01__udp in H01 = 0.09; H01__udp is "[H01] UDP";
  species H01__udpgal in H01 = 0.11; H01__udpgal is "[H01] UDP-D-galactose";
  species H01__udpglc in H01 = 0.34; H01__udpglc is "[H01] UDP-D-glucose";
  species H01__utp in H01 = 0.27; H01__utp is "[H01] UTP";
  species H02__adp in H02 = 1.2; H02__adp is "[H02] ADP";
  species H02__atp in H02 = 2.7; H02__atp is "[H02] ATP";
  species H02__gal in H02 = 0.00012; H02__gal is "[H02] D-galactose";
  species H02__gal1p in H02 = 0.001; H02__gal1p is "[H02] D-galactose 1-phosphate";
  species H02__galM in H02 = 0; H02__galM is "[H02] D-galactose M*";
  species H02__galtol in H02 = 0.001; H02__galtol is "[H02] D-galactitol";
  species H02__glc1p in H02 = 0.012; H02__glc1p is "[H02] D-glucose 1-phophate";
  species H02__glc6p in H02 = 0.12; H02__glc6p is "[H02] D-glucose 6-phosphate";
  species H02__h2oM in H02 = 0; H02__h2oM is "[H02] water M*";
  species H02__nadp in H02 = 0.1; H02__nadp is "[H02] NADP";
  species H02__nadph in H02 = 0.1; H02__nadph is "[H02] NADPH";
  species H02__phos in H02 = 5; H02__phos is "[H02] phosphate";
  species H02__ppi in H02 = 0.008; H02__ppi is "[H02] pyrophosphate";
  species H02__udp in H02 = 0.09; H02__udp is "[H02] UDP";
  species H02__udpgal in H02 = 0.11; H02__udpgal is "[H02] UDP-D-galactose";
  species H02__udpglc in H02 = 0.34; H02__udpglc is "[H02] UDP-D-glucose";
  species H02__utp in H02 = 0.27; H02__utp is "[H02] UTP";

  // Parameters:
  r_suc = 4.4e-10 m; r_suc is "effective radius sucrose";
  y_cell = 7.58e-6 m; y_cell is "width hepatocyte";
  y_sin = 4.4e-6 m; y_sin is "sinusoidal radius";
  Dgal = 9.1e-10 m2_per_s; Dgal is "diffusion constant galactose";
  flow_sin = 0.00018 m_per_s; flow_sin is "sinusoidal flow velocity";
  rho_liv = 1080 kg_per_m3; rho_liv is "liver density";
  r_alb = 3.64e-9 m; r_alb is "effective radius albumin";
  r_h2oM = 1.5e-10 m; r_h2oM is "diffusion constant water M*";
  Dalb = 9e-11 m2_per_s; Dalb is "diffusion constant albumin";
  y_end = 1.65e-7 m; y_end is "endothelial cell thickness";
  r_rbcM = 3e-6 m; r_rbcM is "effective radius rbc M*";
  gal_challenge = 0 mM; gal_challenge is "galactose challenge periportal";
  N_fen = 10000000000000 per_m2; N_fen is "fenestrations per area";
  Nc = 2 dimensionless; Nc is "hepatocytes in sinusoid";
  DrbcM = 0 m2_per_s; DrbcM is "diffusion constant rbc M*";
  L = 0.0005 m; L is "sinusoidal length";
  r_gal = 3.6e-10 m; r_gal is "effective radius galactose";
  Dh2oM = 2.3e-9 m2_per_s; Dh2oM is "diffusion constant water M*";
  f_tissue = 0.8 dimensionless; f_tissue is "parenchymal fraction of liver";
  r_fen = 5.35e-8 m; r_fen is "fenestration radius";
  DgalM = 9.1e-10 m2_per_s; DgalM is "diffusion constant galactose M*";
  r_galM = 3.6e-10 m; r_galM is "effective radius galactose M*";
  y_dis = 1.2e-6 m; y_dis is "width space of Disse";
  Dsuc = 7.2e-10 m2_per_s; Dsuc is "diffusion constant sucrose";
  x_cell has m; x_cell is "length cell compartment";
  x_sin has m; x_sin is "length sinusoidal compartment";
  A_sin has m2; A_sin is "cross section sinusoid";
  A_dis has m2; A_dis is "cross section space of Disse";
  A_sindis has m2; A_sindis is "exchange area between sinusoid and Disse";
  A_sinunit has m2; A_sinunit is "cross section sinusoidal unit";
  Vol_sin has m3; Vol_sin is "volume sinusoidal compartment";
  Vol_dis has m3; Vol_dis is "volume Disse compartment";
  Vol_cell has m3; Vol_cell is "volume cell compartment";
  Vol_pp has m3; Vol_pp is "volume periportal";
  Vol_pv has m3; Vol_pv is "volume perivenious";
  Vol_sinunit has m3; Vol_sinunit is "total volume sinusoidal unit";
  f_sin has dimensionless; f_sin is "sinusoidal fraction of volume";
  f_dis has dimensionless; f_dis is "Disse fraction of volume";
  f_cell has dimensionless; f_cell is "cell fraction of volume";
  Q_sinunit has m3_per_s; Q_sinunit is "volume flow sinusoid";
  f_fen has dimensionless; f_fen is "fenestration porosity";
  Dx_sin_rbcM has m3_per_s;
  Dx_dis_rbcM has m3_per_s;
  Dy_sindis_rbcM has m3_per_s;
  Dx_sin_suc has m3_per_s;
  Dx_dis_suc has m3_per_s;
  Dy_sindis_suc has m3_per_s;
  Dx_sin_alb has m3_per_s;
  Dx_dis_alb has m3_per_s;
  Dy_sindis_alb has m3_per_s;
  Dx_sin_gal has m3_per_s;
  Dx_dis_gal has m3_per_s;
  Dy_sindis_gal has m3_per_s;
  Dx_sin_galM has m3_per_s;
  Dx_dis_galM has m3_per_s;
  Dy_sindis_galM has m3_per_s;
  Dx_sin_h2oM has m3_per_s;
  Dx_dis_h2oM has m3_per_s;
  Dy_sindis_h2oM has m3_per_s;
  deficiency = 0 dimensionless; deficiency is "type of galactosemia";
  REF_P = 1 mM; REF_P is "reference protein amount";
  scale_f = 5.3e-15 dimensionless; scale_f is "metabolic scaling factor";
  H01__scale has dimensionless;
  H02__scale has dimensionless;
  H01__nadp_tot has mM;
  H02__nadp_tot has mM;
  H01__adp_tot has mM;
  H02__adp_tot has mM;
  H01__udp_tot has mM;
  H02__udp_tot has mM;
  H01__phos_tot has mM;
  H02__phos_tot has mM;
  GALK_PA = 0.02 mole;
  GALK_keq = 50 dimensionless;
  GALK_k_gal1p = 1.5 mM;
  GALK_k_adp = 0.8 mM;
  GALK_ki_gal1p = 5.3 mM;
  GALK_kcat = 8.7 per_s;
  GALK_k_gal = 0.97 mM;
  GALK_k_atp = 0.034 mM;
  H01__GALK_P = 1 mM;
  H01__GALK_Vmax has mole_per_s;
  H01__GALK_dm has dimensionless;
  H02__GALK_P = 1 mM;
  H02__GALK_Vmax has mole_per_s;
  H02__GALK_dm has dimensionless;
  IMP_f = 0.05 dimensionless;
  IMP_k_gal1p = 0.35 mM;
  H01__IMP_P = 1 mM;
  H01__IMP_Vmax has mole_per_s;
  H02__IMP_P = 1 mM;
  H02__IMP_Vmax has mole_per_s;
  ATPS_f = 100 dimensionless;
  ATPS_keq = 0.58 per_mM;
  ATPS_k_adp = 0.1 mM;
  ATPS_k_atp = 0.5 mM;
  ATPS_k_phos = 0.1 mM;
  H01__ATPS_P = 1 mM;
  H01__ATPS_Vmax has mole_per_s;
  H02__ATPS_P = 1 mM;
  H02__ATPS_Vmax has mole_per_s;
  ALDR_f = 1000000 dimensionless;
  ALDR_keq = 4 dimensionless;
  ALDR_k_gal = 40 mM;
  ALDR_k_galtol = 40 mM;
  ALDR_k_nadp = 0.1 mM;
  ALDR_k_nadph = 0.1 mM;
  H01__ALDR_P = 1 mM;
  H01__ALDR_Vmax has mole_per_s;
  H02__ALDR_P = 1 mM;
  H02__ALDR_Vmax has mole_per_s;
  NADPR_f = 1e-10 dimensionless;
  NADPR_keq = 1 dimensionless;
  NADPR_k_nadp = 0.015 mM;
  NADPR_ki_nadph = 0.01 mM;
  H01__NADPR_P = 1 mM;
  H01__NADPR_Vmax has mole_per_s;
  H02__NADPR_P = 1 mM;
  H02__NADPR_Vmax has mole_per_s;
  GALT_f = 0.01 dimensionless;
  GALT_keq = 1 dimensionless;
  GALT_k_glc1p = 0.37 mM;
  GALT_k_udpgal = 0.5 mM;
  GALT_ki_utp = 0.13 mM;
  GALT_ki_udp = 0.35 mM;
  GALT_vm = 804 dimensionless;
  GALT_k_gal1p = 1.25 mM;
  GALT_k_udpglc = 0.43 mM;
  H01__GALT_P = 1 mM;
  H01__GALT_Vmax has mole_per_s;
  H02__GALT_P = 1 mM;
  H02__GALT_Vmax has mole_per_s;
  GALE_f = 0.3 dimensionless;
  GALE_PA = 0.0278 s;
  GALE_kcat = 36 per_s;
  GALE_keq = 0.33 dimensionless;
  GALE_k_udpglc = 0.069 mM;
  GALE_k_udpgal = 0.3 mM;
  H01__GALE_P = 1 mM;
  H01__GALE_Vmax has mole_per_s;
  H02__GALE_P = 1 mM;
  H02__GALE_Vmax has mole_per_s;
  UGP_f = 2000 dimensionless;
  UGP_keq = 0.45 dimensionless;
  UGP_k_utp = 0.563 mM;
  UGP_k_glc1p = 0.172 mM;
  UGP_k_udpglc = 0.049 mM;
  UGP_k_ppi = 0.166 mM;
  UGP_k_gal1p = 5 mM;
  UGP_k_udpgal = 0.42 mM;
  UGP_ki_utp = 0.643 mM;
  UGP_ki_udpglc = 0.643 mM;
  H01__UGP_P = 1 mM;
  H01__UGP_Vmax has mole_per_s;
  H01__UGP_dm has dimensionless;
  H02__UGP_P = 1 mM;
  H02__UGP_Vmax has mole_per_s;
  H02__UGP_dm has dimensionless;
  UGALP_f = 0.01 dimensionless;
  PPASE_f = 0.05 dimensionless;
  PPASE_k_ppi = 0.07 mM;
  PPASE_n = 4 dimensionless;
  H01__PPASE_P = 1 mM;
  H01__PPASE_Vmax has mole_per_s;
  H02__PPASE_P = 1 mM;
  H02__PPASE_Vmax has mole_per_s;
  NDKU_f = 2 dimensionless;
  NDKU_keq = 1 dimensionless;
  NDKU_k_atp = 1.33 mM;
  NDKU_k_adp = 0.042 mM;
  NDKU_k_utp = 27 mM;
  NDKU_k_udp = 0.19 mM;
  H01__NDKU_P = 1 mM;
  H01__NDKU_Vmax has mole_per_s;
  H02__NDKU_P = 1 mM;
  H02__NDKU_Vmax has mole_per_s;
  PGM1_f = 50 dimensionless;
  PGM1_keq = 10 dimensionless;
  PGM1_k_glc6p = 0.67 mM;
  PGM1_k_glc1p = 0.045 mM;
  H01__PGM1_P = 1 mM;
  H01__PGM1_Vmax has mole_per_s;
  H02__PGM1_P = 1 mM;
  H02__PGM1_Vmax has mole_per_s;
  GLY_f = 0.1 dimensionless;
  GLY_k_glc6p = 0.12 mM;
  GLY_k_p = 0.2 mM;
  H01__GLY_P = 1 mM;
  H01__GLY_Vmax has mole_per_s;
  H02__GLY_P = 1 mM;
  H02__GLY_Vmax has mole_per_s;
  GTF_f = 0.02 dimensionless;
  GTF_k_udpgal = 0.1 mM;
  H01__GTF_P = 1 mM;
  H01__GTF_Vmax has mole_per_s;
  H02__GTF_P = 1 mM;
  H02__GTF_Vmax has mole_per_s;
  GTF_k_udpglc = 0.1 mM;
  H2OT_f = 10 mole_per_s;
  H2OT_k = 1 mM;
  H01__H2OT_Vmax has mole_per_s;
  H02__H2OT_Vmax has mole_per_s;
  GLUT2_f = 10 mole_per_s;
  GLUT2_k_gal = 85.5 mM;
  H01__GLUT2_P = 1 mM;
  H01__GLUT2_Vmax has mole_per_s;
  H01__GLUT2_dm has dimensionless;
  H02__GLUT2_P = 1 mM;
  H02__GLUT2_Vmax has mole_per_s;
  H02__GLUT2_dm has dimensionless;

  // Assignment rules:
  x_cell := L/Nc;
  x_sin := x_cell;
  A_sin := pi*y_sin^2;
  A_dis := pi*(y_sin + y_end + y_dis)^2 - pi*(y_sin + y_end)^2;
  A_sindis := 2*pi*y_sin*x_sin;
  A_sinunit := pi*(y_sin + y_end + y_dis + y_cell)^2;
  Vol_sin := A_sin*x_sin;
  Vol_dis := A_dis*x_sin;
  Vol_cell := pi*x_cell*((y_sin + y_end + y_dis + y_cell)^2 - (y_sin + y_end + y_dis)^2);
  Vol_pp := Vol_sin;
  Vol_pv := Vol_sin;
  Vol_sinunit := L*pi*(y_sin + y_end + y_dis + y_cell)^2;
  f_sin := Vol_sin/(A_sinunit*x_sin);
  f_dis := Vol_dis/(A_sinunit*x_sin);
  f_cell := Vol_cell/(A_sinunit*x_sin);
  Q_sinunit := pi*y_sin^2*flow_sin;
  f_fen := N_fen*pi*r_fen^2;
  Dx_sin_rbcM := DrbcM/x_sin*A_sin;
  Dx_dis_rbcM := DrbcM/x_sin*A_dis;
  Dy_sindis_rbcM := 0 m3_per_s;
  Dx_sin_suc := Dsuc/x_sin*A_sin;
  Dx_dis_suc := Dsuc/x_sin*A_dis;
  Dy_sindis_suc := Dsuc/y_dis*f_fen*A_sindis*(1 - r_suc/r_fen)^2*(1 - 2.104*r_suc/r_fen + 2.09*(r_suc/r_fen)^3 - 0.95*(r_suc/r_fen)^5);
  Dx_sin_alb := Dalb/x_sin*A_sin;
  Dx_dis_alb := Dalb/x_sin*A_dis;
  Dy_sindis_alb := Dalb/y_dis*f_fen*A_sindis*(1 - r_alb/r_fen)^2*(1 - 2.104*r_alb/r_fen + 2.09*(r_alb/r_fen)^3 - 0.95*(r_alb/r_fen)^5);
  Dx_sin_gal := Dgal/x_sin*A_sin;
  Dx_dis_gal := Dgal/x_sin*A_dis;
  Dy_sindis_gal := Dgal/y_dis*f_fen*A_sindis*(1 - r_gal/r_fen)^2*(1 - 2.104*r_gal/r_fen + 2.09*(r_gal/r_fen)^3 - 0.95*(r_gal/r_fen)^5);
  Dx_sin_galM := DgalM/x_sin*A_sin;
  Dx_dis_galM := DgalM/x_sin*A_dis;
  Dy_sindis_galM := DgalM/y_dis*f_fen*A_sindis*(1 - r_galM/r_fen)^2*(1 - 2.104*r_galM/r_fen + 2.09*(r_galM/r_fen)^3 - 0.95*(r_galM/r_fen)^5);
  Dx_sin_h2oM := Dh2oM/x_sin*A_sin;
  Dx_dis_h2oM := Dh2oM/x_sin*A_dis;
  Dy_sindis_h2oM := Dh2oM/y_dis*f_fen*A_sindis*(1 - r_h2oM/r_fen)^2*(1 - 2.104*r_h2oM/r_fen + 2.09*(r_h2oM/r_fen)^3 - 0.95*(r_h2oM/r_fen)^5);
  D01 := Vol_dis;
  D02 := Vol_dis;
  PP := Vol_pp;
  PV := Vol_pv;
  S01_sinusoid := Vol_sin;
  S02_sinusoid := Vol_sin;
  H01 := Vol_cell;
  H02 := Vol_cell;
  H01__scale := scale_f;
  H02__scale := scale_f;
  H01__nadp_tot := H01__nadp + H01__nadph;
  H02__nadp_tot := H02__nadp + H02__nadph;
  H01__adp_tot := H01__atp + H01__adp;
  H02__adp_tot := H02__atp + H02__adp;
  H01__udp_tot := H01__utp + H01__udp + H01__udpglc + H01__udpgal;
  H02__udp_tot := H02__utp + H02__udp + H02__udpglc + H02__udpgal;
  H01__phos_tot := 3*H01__atp + 2*H01__adp + 3*H01__utp + 2*H01__udp + H01__phos + 2*H01__ppi + H01__glc1p + H01__glc6p + H01__gal1p + 2*H01__udpglc + 2*H01__udpgal;
  H02__phos_tot := 3*H02__atp + 2*H02__adp + 3*H02__utp + 2*H02__udp + H02__phos + 2*H02__ppi + H02__glc1p + H02__glc6p + H02__gal1p + 2*H02__udpglc + 2*H02__udpgal;
  H01__GALK_Vmax := H01__scale*GALK_PA*GALK_kcat*H01__GALK_P/REF_P;
  H01__GALK_dm := (1 + (H01__gal + H01__galM)/GALK_k_gal)*(1 + H01__atp/GALK_k_atp) + (1 + H01__gal1p/GALK_k_gal1p)*(1 + H01__adp/GALK_k_adp) - 1;
  H02__GALK_Vmax := H02__scale*GALK_PA*GALK_kcat*H02__GALK_P/REF_P;
  H02__GALK_dm := (1 + (H02__gal + H02__galM)/GALK_k_gal)*(1 + H02__atp/GALK_k_atp) + (1 + H02__gal1p/GALK_k_gal1p)*(1 + H02__adp/GALK_k_adp) - 1;
  H01__IMP_Vmax := IMP_f*H01__GALK_Vmax*H01__IMP_P/REF_P;
  H02__IMP_Vmax := IMP_f*H02__GALK_Vmax*H02__IMP_P/REF_P;
  H01__ATPS_Vmax := ATPS_f*H01__GALK_Vmax*H01__ATPS_P/REF_P;
  H02__ATPS_Vmax := ATPS_f*H02__GALK_Vmax*H02__ATPS_P/REF_P;
  H01__ALDR_Vmax := ALDR_f*H01__GALK_Vmax*H01__ALDR_P/REF_P;
  H02__ALDR_Vmax := ALDR_f*H02__GALK_Vmax*H02__ALDR_P/REF_P;
  H01__NADPR_Vmax := NADPR_f*H01__ALDR_Vmax*H01__NADPR_P/REF_P;
  H02__NADPR_Vmax := NADPR_f*H02__ALDR_Vmax*H02__NADPR_P/REF_P;
  H01__GALT_Vmax := H01__GALT_P/REF_P*GALT_f*H01__GALK_Vmax*GALT_vm;
  H02__GALT_Vmax := H02__GALT_P/REF_P*GALT_f*H02__GALK_Vmax*GALT_vm;
  H01__GALE_Vmax := GALE_f*H01__GALK_Vmax*GALE_PA*GALE_kcat*H01__GALE_P/REF_P;
  H02__GALE_Vmax := GALE_f*H02__GALK_Vmax*GALE_PA*GALE_kcat*H02__GALE_P/REF_P;
  H01__UGP_Vmax := UGP_f*H01__GALK_Vmax*H01__UGP_P/REF_P;
  H01__UGP_dm := (1 + H01__utp/UGP_k_utp + H01__udpglc/UGP_ki_udpglc)*(1 + H01__glc1p/UGP_k_glc1p + H01__gal1p/UGP_k_gal1p) + (1 + H01__udpglc/UGP_k_udpglc + H01__udpgal/UGP_k_udpgal + H01__utp/UGP_ki_utp)*(1 + H01__ppi/UGP_k_ppi) - 1;
  H02__UGP_Vmax := UGP_f*H02__GALK_Vmax*H02__UGP_P/REF_P;
  H02__UGP_dm := (1 + H02__utp/UGP_k_utp + H02__udpglc/UGP_ki_udpglc)*(1 + H02__glc1p/UGP_k_glc1p + H02__gal1p/UGP_k_gal1p) + (1 + H02__udpglc/UGP_k_udpglc + H02__udpgal/UGP_k_udpgal + H02__utp/UGP_ki_utp)*(1 + H02__ppi/UGP_k_ppi) - 1;
  H01__PPASE_Vmax := PPASE_f*H01__UGP_Vmax*H01__PPASE_P/REF_P;
  H02__PPASE_Vmax := PPASE_f*H02__UGP_Vmax*H02__PPASE_P/REF_P;
  H01__NDKU_Vmax := NDKU_f*H01__UGP_Vmax*H01__NDKU_P/REF_P;
  H02__NDKU_Vmax := NDKU_f*H02__UGP_Vmax*H02__NDKU_P/REF_P;
  H01__PGM1_Vmax := PGM1_f*H01__GALK_Vmax*H01__PGM1_P/REF_P;
  H02__PGM1_Vmax := PGM1_f*H02__GALK_Vmax*H02__PGM1_P/REF_P;
  H01__GLY_Vmax := GLY_f*H01__PGM1_Vmax*H01__GLY_P/REF_P;
  H02__GLY_Vmax := GLY_f*H02__PGM1_Vmax*H02__GLY_P/REF_P;
  H01__GTF_Vmax := GTF_f*H01__GALK_Vmax*H01__GTF_P/REF_P;
  H02__GTF_Vmax := GTF_f*H02__GALK_Vmax*H02__GTF_P/REF_P;
  H01__H2OT_Vmax := H2OT_f*H01__scale;
  H02__H2OT_Vmax := H2OT_f*H02__scale;
  H01__GLUT2_Vmax := GLUT2_f*H01__scale*H01__GLUT2_P/REF_P;
  H01__GLUT2_dm := 1 + (D01__gal + D01__galM)/GLUT2_k_gal + (H01__gal + H01__galM)/GLUT2_k_gal;
  H02__GLUT2_Vmax := GLUT2_f*H02__scale*H02__GLUT2_P/REF_P;
  H02__GLUT2_dm := 1 + (D02__gal + D02__galM)/GLUT2_k_gal + (H02__gal + H02__galM)/GLUT2_k_gal;

  // Reactions:
  F_PPS01_rbcM: $PP__rbcM => S01__rbcM; flow_sin*A_sin*PP__rbcM; F_PPS01_rbcM is "[PP -> S01] convection rbcM";
  F_S01S02_rbcM: S01__rbcM => S02__rbcM; flow_sin*A_sin*S01__rbcM; F_S01S02_rbcM is "[S01 -> S02] convection rbcM";
  F_S02PV_rbcM: S02__rbcM => PV__rbcM; flow_sin*A_sin*S02__rbcM; F_S02PV_rbcM is "[S02 -> PV] convection rbcM";
  F_PVNONE_rbcM: PV__rbcM => ; flow_sin*A_sin*PV__rbcM; F_PVNONE_rbcM is "[PV -> ] convection rbcM";
  F_PPS01_suc: $PP__suc => S01__suc; flow_sin*A_sin*PP__suc; F_PPS01_suc is "[PP -> S01] convection suc";
  F_S01S02_suc: S01__suc => S02__suc; flow_sin*A_sin*S01__suc; F_S01S02_suc is "[S01 -> S02] convection suc";
  F_S02PV_suc: S02__suc => PV__suc; flow_sin*A_sin*S02__suc; F_S02PV_suc is "[S02 -> PV] convection suc";
  F_PVNONE_suc: PV__suc => ; flow_sin*A_sin*PV__suc; F_PVNONE_suc is "[PV -> ] convection suc";
  F_PPS01_alb: $PP__alb => S01__alb; flow_sin*A_sin*PP__alb; F_PPS01_alb is "[PP -> S01] convection alb";
  F_S01S02_alb: S01__alb => S02__alb; flow_sin*A_sin*S01__alb; F_S01S02_alb is "[S01 -> S02] convection alb";
  F_S02PV_alb: S02__alb => PV__alb; flow_sin*A_sin*S02__alb; F_S02PV_alb is "[S02 -> PV] convection alb";
  F_PVNONE_alb: PV__alb => ; flow_sin*A_sin*PV__alb; F_PVNONE_alb is "[PV -> ] convection alb";
  F_PPS01_gal: $PP__gal => S01__gal; flow_sin*A_sin*PP__gal; F_PPS01_gal is "[PP -> S01] convection gal";
  F_S01S02_gal: S01__gal => S02__gal; flow_sin*A_sin*S01__gal; F_S01S02_gal is "[S01 -> S02] convection gal";
  F_S02PV_gal: S02__gal => PV__gal; flow_sin*A_sin*S02__gal; F_S02PV_gal is "[S02 -> PV] convection gal";
  F_PVNONE_gal: PV__gal => ; flow_sin*A_sin*PV__gal; F_PVNONE_gal is "[PV -> ] convection gal";
  F_PPS01_galM: $PP__galM => S01__galM; flow_sin*A_sin*PP__galM; F_PPS01_galM is "[PP -> S01] convection galM";
  F_S01S02_galM: S01__galM => S02__galM; flow_sin*A_sin*S01__galM; F_S01S02_galM is "[S01 -> S02] convection galM";
  F_S02PV_galM: S02__galM => PV__galM; flow_sin*A_sin*S02__galM; F_S02PV_galM is "[S02 -> PV] convection galM";
  F_PVNONE_galM: PV__galM => ; flow_sin*A_sin*PV__galM; F_PVNONE_galM is "[PV -> ] convection galM";
  F_PPS01_h2oM: $PP__h2oM => S01__h2oM; flow_sin*A_sin*PP__h2oM; F_PPS01_h2oM is "[PP -> S01] convection h2oM";
  F_S01S02_h2oM: S01__h2oM => S02__h2oM; flow_sin*A_sin*S01__h2oM; F_S01S02_h2oM is "[S01 -> S02] convection h2oM";
  F_S02PV_h2oM: S02__h2oM => PV__h2oM; flow_sin*A_sin*S02__h2oM; F_S02PV_h2oM is "[S02 -> PV] convection h2oM";
  F_PVNONE_h2oM: PV__h2oM => ; flow_sin*A_sin*PV__h2oM; F_PVNONE_h2oM is "[PV -> ] convection h2oM";
  D_PPS01_rbcM: $PP__rbcM -> S01__rbcM; Dx_sin_rbcM*(PP__rbcM - S01__rbcM); D_PPS01_rbcM is "[PP <-> S01] diffusion rbcM";
  D_S01S02_rbcM: S01__rbcM -> S02__rbcM; Dx_sin_rbcM*(S01__rbcM - S02__rbcM); D_S01S02_rbcM is "[S01 <-> S02] diffusion rbcM";
  D_S02PV_rbcM: S02__rbcM -> PV__rbcM; Dx_sin_rbcM*(S02__rbcM - PV__rbcM); D_S02PV_rbcM is "[S02 <-> PV] diffusion rbcM";
  D_D01D02_rbcM: D01__rbcM -> D02__rbcM; Dx_dis_rbcM*(D01__rbcM - D02__rbcM); D_D01D02_rbcM is "[D01 <-> D02] diffusion rbcM";
  D_S01D01_rbcM: S01__rbcM -> D01__rbcM; Dy_sindis_rbcM*(S01__rbcM - D01__rbcM); D_S01D01_rbcM is "[S01 <-> D01] diffusion rbcM";
  D_S02D02_rbcM: S02__rbcM -> D02__rbcM; Dy_sindis_rbcM*(S02__rbcM - D02__rbcM); D_S02D02_rbcM is "[S02 <-> D02] diffusion rbcM";
  D_PPS01_suc: $PP__suc -> S01__suc; Dx_sin_suc*(PP__suc - S01__suc); D_PPS01_suc is "[PP <-> S01] diffusion suc";
  D_S01S02_suc: S01__suc -> S02__suc; Dx_sin_suc*(S01__suc - S02__suc); D_S01S02_suc is "[S01 <-> S02] diffusion suc";
  D_S02PV_suc: S02__suc -> PV__suc; Dx_sin_suc*(S02__suc - PV__suc); D_S02PV_suc is "[S02 <-> PV] diffusion suc";
  D_D01D02_suc: D01__suc -> D02__suc; Dx_dis_suc*(D01__suc - D02__suc); D_D01D02_suc is "[D01 <-> D02] diffusion suc";
  D_S01D01_suc: S01__suc -> D01__suc; Dy_sindis_suc*(S01__suc - D01__suc); D_S01D01_suc is "[S01 <-> D01] diffusion suc";
  D_S02D02_suc: S02__suc -> D02__suc; Dy_sindis_suc*(S02__suc - D02__suc); D_S02D02_suc is "[S02 <-> D02] diffusion suc";
  D_PPS01_alb: $PP__alb -> S01__alb; Dx_sin_alb*(PP__alb - S01__alb); D_PPS01_alb is "[PP <-> S01] diffusion alb";
  D_S01S02_alb: S01__alb -> S02__alb; Dx_sin_alb*(S01__alb - S02__alb); D_S01S02_alb is "[S01 <-> S02] diffusion alb";
  D_S02PV_alb: S02__alb -> PV__alb; Dx_sin_alb*(S02__alb - PV__alb); D_S02PV_alb is "[S02 <-> PV] diffusion alb";
  D_D01D02_alb: D01__alb -> D02__alb; Dx_dis_alb*(D01__alb - D02__alb); D_D01D02_alb is "[D01 <-> D02] diffusion alb";
  D_S01D01_alb: S01__alb -> D01__alb; Dy_sindis_alb*(S01__alb - D01__alb); D_S01D01_alb is "[S01 <-> D01] diffusion alb";
  D_S02D02_alb: S02__alb -> D02__alb; Dy_sindis_alb*(S02__alb - D02__alb); D_S02D02_alb is "[S02 <-> D02] diffusion alb";
  D_PPS01_gal: $PP__gal -> S01__gal; Dx_sin_gal*(PP__gal - S01__gal); D_PPS01_gal is "[PP <-> S01] diffusion gal";
  D_S01S02_gal: S01__gal -> S02__gal; Dx_sin_gal*(S01__gal - S02__gal); D_S01S02_gal is "[S01 <-> S02] diffusion gal";
  D_S02PV_gal: S02__gal -> PV__gal; Dx_sin_gal*(S02__gal - PV__gal); D_S02PV_gal is "[S02 <-> PV] diffusion gal";
  D_D01D02_gal: D01__gal -> D02__gal; Dx_dis_gal*(D01__gal - D02__gal); D_D01D02_gal is "[D01 <-> D02] diffusion gal";
  D_S01D01_gal: S01__gal -> D01__gal; Dy_sindis_gal*(S01__gal - D01__gal); D_S01D01_gal is "[S01 <-> D01] diffusion gal";
  D_S02D02_gal: S02__gal -> D02__gal; Dy_sindis_gal*(S02__gal - D02__gal); D_S02D02_gal is "[S02 <-> D02] diffusion gal";
  D_PPS01_galM: $PP__galM -> S01__galM; Dx_sin_galM*(PP__galM - S01__galM); D_PPS01_galM is "[PP <-> S01] diffusion galM";
  D_S01S02_galM: S01__galM -> S02__galM; Dx_sin_galM*(S01__galM - S02__galM); D_S01S02_galM is "[S01 <-> S02] diffusion galM";
  D_S02PV_galM: S02__galM -> PV__galM; Dx_sin_galM*(S02__galM - PV__galM); D_S02PV_galM is "[S02 <-> PV] diffusion galM";
  D_D01D02_galM: D01__galM -> D02__galM; Dx_dis_galM*(D01__galM - D02__galM); D_D01D02_galM is "[D01 <-> D02] diffusion galM";
  D_S01D01_galM: S01__galM -> D01__galM; Dy_sindis_galM*(S01__galM - D01__galM); D_S01D01_galM is "[S01 <-> D01] diffusion galM";
  D_S02D02_galM: S02__galM -> D02__galM; Dy_sindis_galM*(S02__galM - D02__galM); D_S02D02_galM is "[S02 <-> D02] diffusion galM";
  D_PPS01_h2oM: $PP__h2oM -> S01__h2oM; Dx_sin_h2oM*(PP__h2oM - S01__h2oM); D_PPS01_h2oM is "[PP <-> S01] diffusion h2oM";
  D_S01S02_h2oM: S01__h2oM -> S02__h2oM; Dx_sin_h2oM*(S01__h2oM - S02__h2oM); D_S01S02_h2oM is "[S01 <-> S02] diffusion h2oM";
  D_S02PV_h2oM: S02__h2oM -> PV__h2oM; Dx_sin_h2oM*(S02__h2oM - PV__h2oM); D_S02PV_h2oM is "[S02 <-> PV] diffusion h2oM";
  D_D01D02_h2oM: D01__h2oM -> D02__h2oM; Dx_dis_h2oM*(D01__h2oM - D02__h2oM); D_D01D02_h2oM is "[D01 <-> D02] diffusion h2oM";
  D_S01D01_h2oM: S01__h2oM -> D01__h2oM; Dy_sindis_h2oM*(S01__h2oM - D01__h2oM); D_S01D01_h2oM is "[S01 <-> D01] diffusion h2oM";
  D_S02D02_h2oM: S02__h2oM -> D02__h2oM; Dy_sindis_h2oM*(S02__h2oM - D02__h2oM); D_S02D02_h2oM is "[S02 <-> D02] diffusion h2oM";
  H01__GALK: H01__gal + H01__atp -> H01__gal1p + H01__adp; H01__GALK_Vmax/(GALK_k_gal*GALK_k_atp)*1/(1 + H01__gal1p/GALK_ki_gal1p)*(H01__gal*H01__atp - H01__gal1p*H01__adp/GALK_keq)/H01__GALK_dm; H01__GALK is "Galactokinase [H01__]";
  H02__GALK: H02__gal + H02__atp -> H02__gal1p + H02__adp; H02__GALK_Vmax/(GALK_k_gal*GALK_k_atp)*1/(1 + H02__gal1p/GALK_ki_gal1p)*(H02__gal*H02__atp - H02__gal1p*H02__adp/GALK_keq)/H02__GALK_dm; H02__GALK is "Galactokinase [H02__]";
  H01__GALKM: H01__galM + H01__atp => H01__gal1p + H01__adp; H01__GALK_Vmax/(GALK_k_gal*GALK_k_atp)*1/(1 + H01__gal1p/GALK_ki_gal1p)*H01__galM*H01__atp/H01__GALK_dm; H01__GALKM is "Galactokinase M [H01__]";
  H02__GALKM: H02__galM + H02__atp => H02__gal1p + H02__adp; H02__GALK_Vmax/(GALK_k_gal*GALK_k_atp)*1/(1 + H02__gal1p/GALK_ki_gal1p)*H02__galM*H02__atp/H02__GALK_dm; H02__GALKM is "Galactokinase M [H02__]";
  H01__IMP: H01__gal1p => H01__gal + H01__phos; H01__IMP_Vmax/IMP_k_gal1p*H01__gal1p/(1 + H01__gal1p/IMP_k_gal1p); H01__IMP is "Inositol monophosphatase [H01__]";
  H02__IMP: H02__gal1p => H02__gal + H02__phos; H02__IMP_Vmax/IMP_k_gal1p*H02__gal1p/(1 + H02__gal1p/IMP_k_gal1p); H02__IMP is "Inositol monophosphatase [H02__]";
  H01__ATPS: H01__adp + H01__phos -> H01__atp; H01__ATPS_Vmax/(ATPS_k_adp*ATPS_k_phos)*(H01__adp*H01__phos - H01__atp/ATPS_keq)/((1 + H01__adp/ATPS_k_adp)*(1 + H01__phos/ATPS_k_phos) + H01__atp/ATPS_k_atp); H01__ATPS is "ATP synthase [H01__]";
  H02__ATPS: H02__adp + H02__phos -> H02__atp; H02__ATPS_Vmax/(ATPS_k_adp*ATPS_k_phos)*(H02__adp*H02__phos - H02__atp/ATPS_keq)/((1 + H02__adp/ATPS_k_adp)*(1 + H02__phos/ATPS_k_phos) + H02__atp/ATPS_k_atp); H02__ATPS is "ATP synthase [H02__]";
  H01__ALDR: H01__gal + H01__nadph -> H01__galtol + H01__nadp; H01__ALDR_Vmax/(ALDR_k_gal*ALDR_k_nadp)*(H01__gal*H01__nadph - H01__galtol*H01__nadp/ALDR_keq)/((1 + H01__gal/ALDR_k_gal)*(1 + H01__nadph/ALDR_k_nadph) + (1 + H01__galtol/ALDR_k_galtol)*(1 + H01__nadp/ALDR_k_nadp) - 1); H01__ALDR is "Aldose reductase [H01__]";
  H02__ALDR: H02__gal + H02__nadph -> H02__galtol + H02__nadp; H02__ALDR_Vmax/(ALDR_k_gal*ALDR_k_nadp)*(H02__gal*H02__nadph - H02__galtol*H02__nadp/ALDR_keq)/((1 + H02__gal/ALDR_k_gal)*(1 + H02__nadph/ALDR_k_nadph) + (1 + H02__galtol/ALDR_k_galtol)*(1 + H02__nadp/ALDR_k_nadp) - 1); H02__ALDR is "Aldose reductase [H02__]";
  H01__NADPR: H01__nadp -> H01__nadph; H01__NADPR_Vmax/NADPR_k_nadp*(H01__nadp - H01__nadph/NADPR_keq)/(1 + H01__nadp/NADPR_k_nadp + H01__nadph/NADPR_ki_nadph); H01__NADPR is "NADP Reductase [H01__]";
  H02__NADPR: H02__nadp -> H02__nadph; H02__NADPR_Vmax/NADPR_k_nadp*(H02__nadp - H02__nadph/NADPR_keq)/(1 + H02__nadp/NADPR_k_nadp + H02__nadph/NADPR_ki_nadph); H02__NADPR is "NADP Reductase [H02__]";
  H01__GALT: H01__gal1p + H01__udpglc -> H01__glc1p + H01__udpgal; H01__GALT_Vmax/(GALT_k_gal1p*GALT_k_udpglc)*(H01__gal1p*H01__udpglc - H01__glc1p*H01__udpgal/GALT_keq)/((1 + H01__gal1p/GALT_k_gal1p)*(1 + H01__udpglc/GALT_k_udpglc + H01__udp/GALT_ki_udp + H01__utp/GALT_ki_utp) + (1 + H01__glc1p/GALT_k_glc1p)*(1 + H01__udpgal/GALT_k_udpgal) - 1); H01__GALT is "Galactose-1-phosphate uridyl transferase [H01__]";  // modifiers: H01__utp, H01__udp
  H02__GALT: H02__gal1p + H02__udpglc -> H02__glc1p + H02__udpgal; H02__GALT_Vmax/(GALT_k_gal1p*GALT_k_udpglc)*(H02__gal1p*H02__udpglc - H02__glc1p*H02__udpgal/GALT_keq)/((1 + H02__gal1p/GALT_k_gal1p)*(1 + H02__udpglc/GALT_k_udpglc + H02__udp/GALT_ki_udp + H02__utp/GALT_ki_utp) + (1 + H02__glc1p/GALT_k_glc1p)*(1 + H02__udpgal/GALT_k_udpgal) - 1); H02__GALT is "Galactose-1-phosphate uridyl transferase [H02__]";  // modifiers: H02__utp, H02__udp
  H01__GALE: H01__udpglc -> H01__udpgal; H01__GALE_Vmax/GALE_k_udpglc*(H01__udpglc - H01__udpgal/GALE_keq)/(1 + H01__udpglc/GALE_k_udpglc + H01__udpgal/GALE_k_udpgal); H01__GALE is "UDP-glucose 4-epimerase [H01__]";
  H02__GALE: H02__udpglc -> H02__udpgal; H02__GALE_Vmax/GALE_k_udpglc*(H02__udpglc - H02__udpgal/GALE_keq)/(1 + H02__udpglc/GALE_k_udpglc + H02__udpgal/GALE_k_udpgal); H02__GALE is "UDP-glucose 4-epimerase [H02__]";
  H01__UGP: H01__glc1p + H01__utp -> H01__udpglc + H01__ppi; H01__UGP_Vmax/(UGP_k_utp*UGP_k_glc1p)*(H01__glc1p*H01__utp - H01__udpglc*H01__ppi/UGP_keq)/H01__UGP_dm; H01__UGP is "UDP-glucose pyrophosphorylase [H01__]";
  H02__UGP: H02__glc1p + H02__utp -> H02__udpglc + H02__ppi; H02__UGP_Vmax/(UGP_k_utp*UGP_k_glc1p)*(H02__glc1p*H02__utp - H02__udpglc*H02__ppi/UGP_keq)/H02__UGP_dm; H02__UGP is "UDP-glucose pyrophosphorylase [H02__]";
  H01__UGALP: H01__gal1p + H01__utp -> H01__udpgal + H01__ppi; UGALP_f*H01__UGP_Vmax/(UGP_k_utp*UGP_k_gal1p)*(H01__gal1p*H01__utp - H01__udpgal*H01__ppi/UGP_keq)/H01__UGP_dm; H01__UGALP is "UDP-galactose pyrophosphorylase [H01__]";
  H02__UGALP: H02__gal1p + H02__utp -> H02__udpgal + H02__ppi; UGALP_f*H02__UGP_Vmax/(UGP_k_utp*UGP_k_gal1p)*(H02__gal1p*H02__utp - H02__udpgal*H02__ppi/UGP_keq)/H02__UGP_dm; H02__UGALP is "UDP-galactose pyrophosphorylase [H02__]";
  H01__PPASE: H01__ppi => 2 H01__phos; H01__PPASE_Vmax*H01__ppi^PPASE_n/(H01__ppi^PPASE_n + PPASE_k_ppi^PPASE_n); H01__PPASE is "Pyrophosphatase [H01__]";
  H02__PPASE: H02__ppi => 2 H02__phos; H02__PPASE_Vmax*H02__ppi^PPASE_n/(H02__ppi^PPASE_n + PPASE_k_ppi^PPASE_n); H02__PPASE is "Pyrophosphatase [H02__]";
  H01__NDKU: H01__atp + H01__udp -> H01__adp + H01__utp; H01__NDKU_Vmax/NDKU_k_atp/NDKU_k_udp*(H01__atp*H01__udp - H01__adp*H01__utp/NDKU_keq)/((1 + H01__atp/NDKU_k_atp)*(1 + H01__udp/NDKU_k_udp) + (1 + H01__adp/NDKU_k_adp)*(1 + H01__utp/NDKU_k_utp) - 1); H01__NDKU is "ATP:UDP phosphotransferase [H01__]";
  H02__NDKU: H02__atp + H02__udp -> H02__adp + H02__utp; H02__NDKU_Vmax/NDKU_k_atp/NDKU_k_udp*(H02__atp*H02__udp - H02__adp*H02__utp/NDKU_keq)/((1 + H02__atp/NDKU_k_atp)*(1 + H02__udp/NDKU_k_udp) + (1 + H02__adp/NDKU_k_adp)*(1 + H02__utp/NDKU_k_utp) - 1); H02__NDKU is "ATP:UDP phosphotransferase [H02__]";
  H01__PGM1: H01__glc1p -> H01__glc6p; H01__PGM1_Vmax/PGM1_k_glc1p*(H01__glc1p - H01__glc6p/PGM1_keq)/(1 + H01__glc1p/PGM1_k_glc1p + H01__glc6p/PGM1_k_glc6p); H01__PGM1 is "Phosphoglucomutase-1 [H01__]";
  H02__PGM1: H02__glc1p -> H02__glc6p; H02__PGM1_Vmax/PGM1_k_glc1p*(H02__glc1p - H02__glc6p/PGM1_keq)/(1 + H02__glc1p/PGM1_k_glc1p + H02__glc6p/PGM1_k_glc6p); H02__PGM1 is "Phosphoglucomutase-1 [H02__]";
  H01__GLY: H01__glc6p -> H01__phos; H01__GLY_Vmax*(H01__glc6p - GLY_k_glc6p)/GLY_k_glc6p*H01__phos/(H01__phos + GLY_k_p); H01__GLY is "Glycolysis [H01__]";
  H02__GLY: H02__glc6p -> H02__phos; H02__GLY_Vmax*(H02__glc6p - GLY_k_glc6p)/GLY_k_glc6p*H02__phos/(H02__phos + GLY_k_p); H02__GLY is "Glycolysis [H02__]";
  H01__GTFGAL: H01__udpgal => H01__udp; H01__GTF_Vmax*H01__udpgal/(H01__udpgal + GTF_k_udpgal); H01__GTFGAL is "Glycosyltransferase galactose [H01__]";
  H02__GTFGAL: H02__udpgal => H02__udp; H02__GTF_Vmax*H02__udpgal/(H02__udpgal + GTF_k_udpgal); H02__GTFGAL is "Glycosyltransferase galactose [H02__]";
  H01__GTFGLC: H01__udpglc => H01__udp; 0*H01__GTF_Vmax*H01__udpglc/(H01__udpglc + GTF_k_udpglc); H01__GTFGLC is "Glycosyltransferase glucose [H01__]";
  H02__GTFGLC: H02__udpglc => H02__udp; 0*H02__GTF_Vmax*H02__udpglc/(H02__udpglc + GTF_k_udpglc); H02__GTFGLC is "Glycosyltransferase glucose [H02__]";
  H01__H2OM: D01__h2oM -> H01__h2oM; H01__H2OT_Vmax/H2OT_k*(D01__h2oM - H01__h2oM); H01__H2OM is "H2O M transport [H01__]";
  H02__H2OM: D02__h2oM -> H02__h2oM; H02__H2OT_Vmax/H2OT_k*(D02__h2oM - H02__h2oM); H02__H2OM is "H2O M transport [H02__]";
  H01__GLUT2_GAL: D01__gal -> H01__gal; H01__GLUT2_Vmax/GLUT2_k_gal*(D01__gal - H01__gal)/H01__GLUT2_dm; H01__GLUT2_GAL is "galactose transport [H01__]";
  H02__GLUT2_GAL: D02__gal -> H02__gal; H02__GLUT2_Vmax/GLUT2_k_gal*(D02__gal - H02__gal)/H02__GLUT2_dm; H02__GLUT2_GAL is "galactose transport [H02__]";
  H01__GLUT2_GALM: D01__galM -> H01__galM; H01__GLUT2_Vmax/GLUT2_k_gal*(D01__galM - H01__galM)/H01__GLUT2_dm; H01__GLUT2_GALM is "galactose transport M [H01__]";
  H02__GLUT2_GALM: D02__galM -> H02__galM; H02__GLUT2_Vmax/GLUT2_k_gal*(D02__galM - H02__galM)/H02__GLUT2_dm; H02__GLUT2_GALM is "galactose transport M [H02__]";

  // Events:
  EDEF_00: at ((time > 0) && (deficiency == 0)), t0=false: GALT_k_udpglc = 0.95 mM, GALT_k_gal1p = 1.25 mM, GALK_k_gal = 0.97 mM, GALT_vm = 804, GALE_kcat = 36 per_s, GALE_k_udpglc = 0.069 mM, GALK_k_atp = 0.034 mM, GALK_kcat = 8.7 per_s;
  EDEF_01: at ((time > 0) && (deficiency == 1)), t0=false: GALK_k_atp = 0.13 mM, GALK_k_gal = 7.7 mM, GALK_kcat = 2 per_s;
  EDEF_02: at ((time > 0) && (deficiency == 2)), t0=false: GALK_k_atp = 0.11 mM, GALK_k_gal = 0.43 mM, GALK_kcat = 3.9 per_s;
  EDEF_03: at ((time > 0) && (deficiency == 3)), t0=false: GALK_k_atp = 0.026 mM, GALK_k_gal = 0.66 mM, GALK_kcat = 5.9 per_s;
  EDEF_04: at ((time > 0) && (deficiency == 4)), t0=false: GALK_k_atp = 0.005 mM, GALK_k_gal = 1.1 mM, GALK_kcat = 0.4 per_s;
  EDEF_05: at ((time > 0) && (deficiency == 5)), t0=false: GALK_k_atp = 0.089 mM, GALK_k_gal = 13 mM, GALK_kcat = 1.1 per_s;
  EDEF_06: at ((time > 0) && (deficiency == 6)), t0=false: GALK_k_atp = 0.039 mM, GALK_k_gal = 1.7 mM, GALK_kcat = 1.8 per_s;
  EDEF_07: at ((time > 0) && (deficiency == 7)), t0=false: GALK_k_atp = 0.035 mM, GALK_k_gal = 1.9 mM, GALK_kcat = 6.7 per_s;
  EDEF_08: at ((time > 0) && (deficiency == 8)), t0=false: GALK_k_atp = 0.0039 mM, GALK_k_gal = 0.14 mM, GALK_kcat = 0.9 per_s;
  EDEF_09: at ((time > 0) && (deficiency == 9)), t0=false: GALT_k_udpglc = 0.58 mM, GALT_k_gal1p = 1.89 mM, GALT_vm = 396;
  EDEF_10: at ((time > 0) && (deficiency == 10)), t0=false: GALT_k_udpglc = 0.69 mM, GALT_k_gal1p = 2.34 mM, GALT_vm = 253;
  EDEF_11: at ((time > 0) && (deficiency == 11)), t0=false: GALT_k_udpglc = 0.76 mM, GALT_k_gal1p = 1.12 mM, GALT_vm = 297;
  EDEF_12: at ((time > 0) && (deficiency == 12)), t0=false: GALT_k_udpglc = 1.23 mM, GALT_k_gal1p = 1.98 mM, GALT_vm = 45;
  EDEF_13: at ((time > 0) && (deficiency == 13)), t0=false: GALT_k_udpglc = 0.48 mM, GALT_k_gal1p = 2.14 mM, GALT_vm = 306;
  EDEF_14: at ((time > 0) && (deficiency == 14)), t0=false: GALT_k_udpglc = 0.95 mM, GALT_k_gal1p = 2.68 mM, GALT_vm = 385;
  EDEF_15: at ((time > 0) && (deficiency == 15)), t0=false: GALE_kcat = 32 per_s, GALE_k_udpglc = 0.082 mM;
  EDEF_16: at ((time > 0) && (deficiency == 16)), t0=false: GALE_kcat = 0.046 per_s, GALE_k_udpglc = 0.093 mM;
  EDEF_17: at ((time > 0) && (deficiency == 17)), t0=false: GALE_kcat = 1.1 per_s, GALE_k_udpglc = 0.16 mM;
  EDEF_18: at ((time > 0) && (deficiency == 18)), t0=false: GALE_kcat = 5 per_s, GALE_k_udpglc = 0.14 mM;
  EDEF_19: at ((time > 0) && (deficiency == 19)), t0=false: GALE_kcat = 11 per_s, GALE_k_udpglc = 0.097 mM;
  EDEF_20: at ((time > 0) && (deficiency == 20)), t0=false: GALE_kcat = 5.1 per_s, GALE_k_udpglc = 0.066 mM;
  EDEF_21: at ((time > 0) && (deficiency == 21)), t0=false: GALE_kcat = 5.8 per_s, GALE_k_udpglc = 0.035 mM;
  EDEF_22: at ((time > 0) && (deficiency == 22)), t0=false: GALE_kcat = 30 per_s, GALE_k_udpglc = 0.078 mM;
  EDEF_23: at ((time > 0) && (deficiency == 23)), t0=false: GALE_kcat = 15 per_s, GALE_k_udpglc = 0.099 mM;

  // Unit definitions:
  unit kg = kilogram;
  unit m3 = metre^3;
  unit mM = mole / metre^3;
  unit m = metre;
  unit s = second;
  unit m2_per_s = metre^2 / second;
  unit m_per_s = metre / second;
  unit per_s = 1 / second;
  unit m3_per_skg = metre^3 / (kilogram * second);
  unit m2 = metre^2;
  unit kg_per_m3 = kilogram / metre^3;
  unit per_mM = metre^3 / mole;
  unit per_m2 = 1 / metre^2;
  unit mole_per_s = mole / second;
  unit m3_per_s = metre^3 / second;
end
