// SBML level 3 version 1

model Koenig2013_test()
  // model units - substance: substance, volume: volume, area: area, length: length

  // Compartments:
  compartment disse = 0.2 litre;
  compartment hepatocyte = 1 litre;

  // Species:
  species $gal_dis in disse = 5.5; gal_dis is "D-galactose[disse]";  // substance in mmol
  species gal in hepatocyte = 1; gal is "D-galactose";  // substance in mmol
  species gal1p in hepatocyte = 0.05; gal1p is "D-galactose";  // substance in mmol
  species atp in hepatocyte = 2; atp is "ATP";  // substance in mmol
  species adp in hepatocyte = 0.8; adp is "ADP";  // substance in mmol
  species galM in hepatocyte = 0; galM is "D-galactose M";  // substance in mmol

  // Parameters:
  GALK_Vmax = 0.2*scale*GALK_P*GALK_kcat; GALK_Vmax has mmol_per_s;
  GALK_ki_gal1p = 5.3 mM;
  GALK_k_gal = 0.97 mM;
  GALK_k_atp = 0.034 mM;
  GALK_keq = 50 dimensionless;
  GALK_dm = (1 + (gal + galM)/GALK_k_gal)*(1 + atp/GALK_k_atp) + (1 + gal1p/GALK_k_gal1p)*(1 + adp/GALK_k_adp) - 1; GALK_dm has dimensionless;
  deficiency = 0 dimensionless;
  GALK_kcat = 8.7 per_s;
  atp_tot has mM;
  scale = 1 dimensionless;
  GALK_P = 2 mmol;
  GALK_k_gal1p = 1.5 mM;
  GALK_k_adp = 0.8 mM;

  // Assignment rules:
  atp_tot := atp + adp;

  // Reactions:
  GALK: gal + atp -> gal1p + adp; GALK_Vmax/(1 + gal1p/GALK_ki_gal1p)/(GALK_k_gal*GALK_k_atp)*(gal*atp - gal1p*adp/GALK_keq)/GALK_dm; GALK is "Galactokinase";

  // Events:
  E1: at (deficiency == 1): GALK_k_atp = 0.13 mM, GALK_k_gal = 7.7 mM, GALK_kcat = 2 per_s;
  E2: at (deficiency == 2): GALK_k_atp = 0.11 mM, GALK_k_gal = 0.43 mM, GALK_kcat = 3.9 per_s;
  E3: at (deficiency == 3): GALK_k_atp = 0.026 mM, GALK_k_gal = 0.66 mM, GALK_kcat = 5.9 per_s;

  // Unit definitions:
  unit mmol_per_s = 1e-3 mole / second;
  unit mM = 1e-3 mole / litre;
  unit per_s = 1 / second;
  unit mmol = 1e-3 mole;
  unit substance = 1e-3 mole;
  unit volume = litre;
  unit area = metre^2;
  unit length = metre;
end
