// SBML level 3 version 1

model full()
  // model units - substance: substance, volume: volume, area: area, length: length

  // Compartments:
  compartment default_compartment = 1;
  compartment H1_comp; H1_comp has H1_litre;
  compartment H2_comp; H2_comp has H2_litre;
  compartment H3_comp; H3_comp has H3_litre;
  compartment H4_comp; H4_comp has H4_litre;
  compartment H5_comp; H5_comp has H5_litre;
  compartment pp = 1e-11 litre; pp is "periportal";
  compartment blood1 = 1e-12 litre;
  compartment blood2 = 1e-12 litre;
  compartment blood3 = 1e-12 litre;
  compartment blood4 = 1e-12 litre;
  compartment blood5 = 1e-12 litre;
  compartment pv = 1e-12 litre; pv is "perivenous";
  compartment Hc1 = 1e-12 litre; Hc1 is "Hepatocyte 1";
  compartment Hc2 = 1e-12 litre; Hc2 is "Hepatocyte 2";
  compartment Hc3 = 1e-12 litre; Hc3 is "Hepatocyte 3";
  compartment Hc4 = 1e-12 litre; Hc4 is "Hepatocyte 4";
  compartment Hc5 = 1e-12 litre; Hc5 is "Hepatocyte 5";

  // Species:
  species H1_gal_ext in H1_comp;
  species H1_gal in H1_comp = 0; H1_gal is "D-galactose";
  species H2_gal_ext in H2_comp;
  species H2_gal in H2_comp = 0; H2_gal is "D-galactose";
  species H3_gal_ext in H3_comp;
  species H3_gal in H3_comp = 0; H3_gal is "D-galactose";
  species H4_gal_ext in H4_comp;
  species H4_gal in H4_comp = 0; H4_gal is "D-galactose";
  species H5_gal_ext in H5_comp;
  species H5_gal in H5_comp = 0; H5_gal is "D-galactose";
  species $gal_pp in default_compartment = 10; gal_pp is "D-galactose";
  species gal_1 in default_compartment = 0; gal_1 is "D-galactose";
  species gal_2 in default_compartment = 0; gal_2 is "D-galactose";
  species gal_3 in default_compartment = 0; gal_3 is "D-galactose";
  species gal_4 in default_compartment = 0; gal_4 is "D-galactose";
  species gal_5 in default_compartment = 0; gal_5 is "D-galactose";
  species gal_pv in default_compartment = 0; gal_pv is "D-galactose";

  // Parameters:
  H1_GALI_vmax = 10 H1_mmol_per_s;
  H1_GALI_kgal = 1 H1_mM;
  H1_GALK_kgal = 0.3 H1_mM;
  H2_GALI_vmax = 10 H2_mmol_per_s;
  H2_GALI_kgal = 1 H2_mM;
  H2_GALK_kgal = 0.3 H2_mM;
  H3_GALI_vmax = 10 H3_mmol_per_s;
  H3_GALI_kgal = 1 H3_mM;
  H3_GALK_kgal = 0.3 H3_mM;
  H4_GALI_vmax = 10 H4_mmol_per_s;
  H4_GALI_kgal = 1 H4_mM;
  H4_GALK_kgal = 0.3 H4_mM;
  H5_GALI_vmax = 10 H5_mmol_per_s;
  H5_GALI_kgal = 1 H5_mM;
  H5_GALK_kgal = 0.3 H5_mM;
  D = 10 per_s;
  k1 = 1 mmol_per_s;
  k2 = 2 mmol_per_s;
  k3 = 4 mmol_per_s;
  k4 = 8 mmol_per_s;
  k5 = 16 mmol_per_s;
  H1_GALK_vmax has H1_mmol_per_s;
  H2_GALK_vmax has H2_mmol_per_s;
  H3_GALK_vmax has H3_mmol_per_s;
  H4_GALK_vmax has H4_mmol_per_s;
  H5_GALK_vmax has H5_mmol_per_s;

  // Reactions:
  H1_GALI: H1_gal_ext -> H1_gal; H1_GALI_vmax/H1_GALI_kgal*(H1_gal - H1_gal_ext)/(1 + H1_gal/H1_GALI_kgal + H1_gal_ext/H1_GALI_kgal); H1_GALI is "Galactose Importer";
  H1_GALK: H1_gal => ; H1_GALK_vmax*H1_gal/(H1_gal + H1_GALK_kgal);
  H2_GALI: H2_gal_ext -> H2_gal; H2_GALI_vmax/H2_GALI_kgal*(H2_gal - H2_gal_ext)/(1 + H2_gal/H2_GALI_kgal + H2_gal_ext/H2_GALI_kgal); H2_GALI is "Galactose Importer";
  H2_GALK: H2_gal => ; H2_GALK_vmax*H2_gal/(H2_gal + H2_GALK_kgal);
  H3_GALI: H3_gal_ext -> H3_gal; H3_GALI_vmax/H3_GALI_kgal*(H3_gal - H3_gal_ext)/(1 + H3_gal/H3_GALI_kgal + H3_gal_ext/H3_GALI_kgal); H3_GALI is "Galactose Importer";
  H3_GALK: H3_gal => ; H3_GALK_vmax*H3_gal/(H3_gal + H3_GALK_kgal);
  H4_GALI: H4_gal_ext -> H4_gal; H4_GALI_vmax/H4_GALI_kgal*(H4_gal - H4_gal_ext)/(1 + H4_gal/H4_GALI_kgal + H4_gal_ext/H4_GALI_kgal); H4_GALI is "Galactose Importer";
  H4_GALK: H4_gal => ; H4_GALK_vmax*H4_gal/(H4_gal + H4_GALK_kgal);
  H5_GALI: H5_gal_ext -> H5_gal; H5_GALI_vmax/H5_GALI_kgal*(H5_gal - H5_gal_ext)/(1 + H5_gal/H5_GALI_kgal + H5_gal_ext/H5_GALI_kgal); H5_GALI is "Galactose Importer";
  H5_GALK: H5_gal => ; H5_GALK_vmax*H5_gal/(H5_gal + H5_GALK_kgal);
  TPP: $gal_pp -> gal_1; D*(gal_1 - gal_pp);
  T1: gal_1 -> gal_2; D*(gal_2 - gal_1);
  T2: gal_2 -> gal_3; D*(gal_3 - gal_2);
  T3: gal_3 -> gal_4; D*(gal_4 - gal_3);
  T4: gal_4 -> gal_5; D*(gal_5 - gal_4);
  T5: gal_5 -> gal_pv; D*(gal_pv - gal_5);

  // Unit definitions:
  unit H1_substance = 1e-3 mole;
  unit H1_mole = mole;
  unit H1_volume = litre;
  unit H1_litre = litre;
  unit H1_area = metre^2;
  unit H1_metre = metre;
  unit H1_length = metre;
  unit H1_mM = 1e-3 mole / litre;
  unit H1_mmol_per_s = 1e-3 mole / second;
  unit H1_second = second;
  unit H1_per_s = 1 / second;
  unit H1_mmol = 1e-3 mole;
  unit H2_substance = 1e-3 mole;
  unit H2_mole = mole;
  unit H2_volume = litre;
  unit H2_litre = litre;
  unit H2_area = metre^2;
  unit H2_metre = metre;
  unit H2_length = metre;
  unit H2_mM = 1e-3 mole / litre;
  unit H2_mmol_per_s = 1e-3 mole / second;
  unit H2_second = second;
  unit H2_per_s = 1 / second;
  unit H2_mmol = 1e-3 mole;
  unit H3_substance = 1e-3 mole;
  unit H3_mole = mole;
  unit H3_volume = litre;
  unit H3_litre = litre;
  unit H3_area = metre^2;
  unit H3_metre = metre;
  unit H3_length = metre;
  unit H3_mM = 1e-3 mole / litre;
  unit H3_mmol_per_s = 1e-3 mole / second;
  unit H3_second = second;
  unit H3_per_s = 1 / second;
  unit H3_mmol = 1e-3 mole;
  unit H4_substance = 1e-3 mole;
  unit H4_mole = mole;
  unit H4_volume = litre;
  unit H4_litre = litre;
  unit H4_area = metre^2;
  unit H4_metre = metre;
  unit H4_length = metre;
  unit H4_mM = 1e-3 mole / litre;
  unit H4_mmol_per_s = 1e-3 mole / second;
  unit H4_second = second;
  unit H4_per_s = 1 / second;
  unit H4_mmol = 1e-3 mole;
  unit H5_substance = 1e-3 mole;
  unit H5_mole = mole;
  unit H5_volume = litre;
  unit H5_litre = litre;
  unit H5_area = metre^2;
  unit H5_metre = metre;
  unit H5_length = metre;
  unit H5_mM = 1e-3 mole / litre;
  unit H5_mmol_per_s = 1e-3 mole / second;
  unit H5_second = second;
  unit H5_per_s = 1 / second;
  unit H5_mmol = 1e-3 mole;
  unit substance = 1e-3 mole;
  unit volume = litre;
  unit area = metre^2;
  unit length = metre;
  unit mM = 1e-3 mole / litre;
  unit mmol_per_s = 1e-3 mole / second;
  unit per_s = 1 / second;
  unit mmol = 1e-3 mole;
end
