// SBML level 3 version 1

model full()
  // model units - substance: H5_substance, volume: H5_volume, area: H5_area, length: H5_length

  // Compartments:
  compartment pp = Vblood; pp has litre; pp is "periportal";
  compartment blood1 = Vblood; blood1 has litre;
  compartment blood2 = Vblood; blood2 has litre;
  compartment blood3 = Vblood; blood3 has litre;
  compartment blood4 = Vblood; blood4 has litre;
  compartment blood5 = Vblood; blood5 has litre;
  compartment pv = Vblood; pv has litre; pv is "perivenous";
  compartment H1_cell = 2*Vblood; H1_cell has H1_litre; H1_cell is "Hepatocyte";
  compartment H2_cell = 2*Vblood; H2_cell has H2_litre; H2_cell is "Hepatocyte";
  compartment H3_cell = 2*Vblood; H3_cell has H3_litre; H3_cell is "Hepatocyte";
  compartment H4_cell = 2*Vblood; H4_cell has H4_litre; H4_cell is "Hepatocyte";
  compartment H5_cell = 2*Vblood; H5_cell has H5_litre; H5_cell is "Hepatocyte";

  // Species:
  species $gal_pp in pp = 3; gal_pp is "D-galactose";
  species gal_1 in blood1 = 0; gal_1 is "D-galactose";
  species gal_2 in blood2 = 0; gal_2 is "D-galactose";
  species gal_3 in blood3 = 0; gal_3 is "D-galactose";
  species gal_4 in blood4 = 0; gal_4 is "D-galactose";
  species gal_5 in blood5 = 0; gal_5 is "D-galactose";
  species gal_pv in pv = 0; gal_pv is "D-galactose";
  species H1_gal in H1_cell = 0; H1_gal is "D-galactose";
  species H2_gal in H2_cell = 0; H2_gal is "D-galactose";
  species H3_gal in H3_cell = 0; H3_gal is "D-galactose";
  species H4_gal in H4_cell = 0; H4_gal is "D-galactose";
  species H5_gal in H5_cell = 0; H5_gal is "D-galactose";

  // Parameters:
  Vblood = 1e-9 litre;
  D = 5e-9 litre_per_s;
  k1 = 1e-10 mmol_per_s;
  k2 = 2e-10 mmol_per_s;
  k3 = 4e-10 mmol_per_s;
  k4 = 8e-10 mmol_per_s;
  k5 = 1.6e-9 mmol_per_s;
  H1_GALI_vmax = 1e-7 H1_mmol_per_s;
  H1_GALI_kgal = 1 H1_mM;
  H1_GALK_kgal = 0.3 H1_mM;
  H2_GALI_vmax = 1e-7 H2_mmol_per_s;
  H2_GALI_kgal = 1 H2_mM;
  H2_GALK_kgal = 0.3 H2_mM;
  H3_GALI_vmax = 1e-7 H3_mmol_per_s;
  H3_GALI_kgal = 1 H3_mM;
  H3_GALK_kgal = 0.3 H3_mM;
  H4_GALI_vmax = 1e-7 H4_mmol_per_s;
  H4_GALI_kgal = 1 H4_mM;
  H4_GALK_kgal = 0.3 H4_mM;
  H5_GALI_vmax = 1e-7 H5_mmol_per_s;
  H5_GALI_kgal = 1 H5_mM;
  H5_GALK_kgal = 0.3 H5_mM;

  // Reactions:
  TPP: $gal_pp -> gal_1; D*(gal_pp - gal_1);
  T1: gal_1 -> gal_2; D*(gal_1 - gal_2);
  T2: gal_2 -> gal_3; D*(gal_2 - gal_3);
  T3: gal_3 -> gal_4; D*(gal_3 - gal_4);
  T4: gal_4 -> gal_5; D*(gal_4 - gal_5);
  T5: gal_5 -> gal_pv; D*(gal_5 - gal_pv);
  TPV: gal_pv => ; D*gal_pv;
  H1_GALI: gal_1 -> H1_gal; H1_GALI_vmax/H1_GALI_kgal*(gal_1 - H1_gal)/(1 + H1_gal/H1_GALI_kgal + gal_1/H1_GALI_kgal); H1_GALI is "Galactose Importer";
  H1_GALK: H1_gal => ; k1*H1_gal/(H1_gal + H1_GALK_kgal); H1_GALK is "Galactose Clearance";
  H2_GALI: gal_2 -> H2_gal; H2_GALI_vmax/H2_GALI_kgal*(gal_2 - H2_gal)/(1 + H2_gal/H2_GALI_kgal + gal_2/H2_GALI_kgal); H2_GALI is "Galactose Importer";
  H2_GALK: H2_gal => ; k2*H2_gal/(H2_gal + H2_GALK_kgal); H2_GALK is "Galactose Clearance";
  H3_GALI: gal_3 -> H3_gal; H3_GALI_vmax/H3_GALI_kgal*(gal_3 - H3_gal)/(1 + H3_gal/H3_GALI_kgal + gal_3/H3_GALI_kgal); H3_GALI is "Galactose Importer";
  H3_GALK: H3_gal => ; k3*H3_gal/(H3_gal + H3_GALK_kgal); H3_GALK is "Galactose Clearance";
  H4_GALI: gal_4 -> H4_gal; H4_GALI_vmax/H4_GALI_kgal*(gal_4 - H4_gal)/(1 + H4_gal/H4_GALI_kgal + gal_4/H4_GALI_kgal); H4_GALI is "Galactose Importer";
  H4_GALK: H4_gal => ; k4*H4_gal/(H4_gal + H4_GALK_kgal); H4_GALK is "Galactose Clearance";
  H5_GALI: gal_5 -> H5_gal; H5_GALI_vmax/H5_GALI_kgal*(gal_5 - H5_gal)/(1 + H5_gal/H5_GALI_kgal + gal_5/H5_GALI_kgal); H5_GALI is "Galactose Importer";
  H5_GALK: H5_gal => ; k5*H5_gal/(H5_gal + H5_GALK_kgal); H5_GALK is "Galactose Clearance";

  // Events:
  _E0: at (time == 20): gal_pp = 0 mM;

  // Unit definitions:
  unit substance = 1e-3 mole;
  unit volume = litre;
  unit area = metre^2;
  unit length = metre;
  unit mM = 1e-3 mole / litre;
  unit mmol_per_s = 1e-3 mole / second;
  unit per_s = 1 / second;
  unit mmol = 1e-3 mole;
  unit litre_per_s = litre / second;
  unit H1_substance = 1e-3 mole;
  unit H1_mole = mole;
  unit H1_volume = litre;
  unit H1_litre = litre;
  unit H1_area = metre^2;
  unit H1_metre = metre;
  unit H1_length = metre;
  unit H1_mM = 1e-3 mole / litre;
  unit H1_mmol_per_s = 1e-3 mole / second;
  unit H1_second = second;
  unit H1_per_s = 1 / second;
  unit H1_mmol = 1e-3 mole;
  unit H2_substance = 1e-3 mole;
  unit H2_mole = mole;
  unit H2_volume = litre;
  unit H2_litre = litre;
  unit H2_area = metre^2;
  unit H2_metre = metre;
  unit H2_length = metre;
  unit H2_mM = 1e-3 mole / litre;
  unit H2_mmol_per_s = 1e-3 mole / second;
  unit H2_second = second;
  unit H2_per_s = 1 / second;
  unit H2_mmol = 1e-3 mole;
  unit H3_substance = 1e-3 mole;
  unit H3_mole = mole;
  unit H3_volume = litre;
  unit H3_litre = litre;
  unit H3_area = metre^2;
  unit H3_metre = metre;
  unit H3_length = metre;
  unit H3_mM = 1e-3 mole / litre;
  unit H3_mmol_per_s = 1e-3 mole / second;
  unit H3_second = second;
  unit H3_per_s = 1 / second;
  unit H3_mmol = 1e-3 mole;
  unit H4_substance = 1e-3 mole;
  unit H4_mole = mole;
  unit H4_volume = litre;
  unit H4_litre = litre;
  unit H4_area = metre^2;
  unit H4_metre = metre;
  unit H4_length = metre;
  unit H4_mM = 1e-3 mole / litre;
  unit H4_mmol_per_s = 1e-3 mole / second;
  unit H4_second = second;
  unit H4_per_s = 1 / second;
  unit H4_mmol = 1e-3 mole;
  unit H5_substance = 1e-3 mole;
  unit H5_mole = mole;
  unit H5_volume = litre;
  unit H5_litre = litre;
  unit H5_area = metre^2;
  unit H5_metre = metre;
  unit H5_length = metre;
  unit H5_mM = 1e-3 mole / litre;
  unit H5_mmol_per_s = 1e-3 mole / second;
  unit H5_second = second;
  unit H5_per_s = 1 / second;
  unit H5_mmol = 1e-3 mole;
end
